Simulations: Version=180
  Memo About this tutorial
    # Initialising soil carbon pools

    Val Snow (AgResearch, New Zealand) and Dean Holzworth (CSIRO, Australia)

    (Last updated 21 May 2024)

    The intention is that this documentation is read alongside the simulation that produced it to see the detail of the examples. The simulation is to be found under the "Examples" button, then select the “Tutorials” folder and open “InitialisingSoilCarbonPools.apsimx”.

    APSIM, like many other models, uses conceptual soil carbon pools in the simulation of carbon and nitrogen dynamics. See Probert et al. (1998) and Cichota et al (2021) for a description of these pools. Because the pools are conceptual, they cannot be measured and so a method to initialise them is needed and that is the purpose of this tutorial.

    The general approach is to set up a ‘spin up’ simulation. This is a long-duration spin-up simulation that includes the weather, soil and management (cropping, fertiliser, irrigation) conditions appropriate for the intended simulation. This simulation is run for an appropriate time and the partitioning between the pools at the end of the spin up are captured to initialise the new simulation.

    The duration of the spin up should be set depending on the known general history of the site being simulated. For example, if the site has been in undisturbed grassland for hundreds of years then a 100+ year simulation under generally similar conditions should be made. Usually there is not daily weather available for long spin-ups so the WeatherSampler component is used to artificially lengthen what ever data is available through random sampling with replacement of a shorter weather file. See the notes in WeatherSampler for more information on this.

    A second complication is that APSIM’s outputs are structured in the same way as the data needed to set initial values for the carbon pools. This is remedied using a model applied to the DataStore that will reformat the outputs such that they can be pasted back into the Organic UI. To use this, ensure that the “JustFinals” Report component is in the simulation (copy it from this tutorial simulation), add the “CreateProfileTable” model to the DataStore and select “JustFinals”.

    ![Add CreateProfileTable to the DataStore](CarbonPools_Fig1.png)

    Now when you click on the DataStore and select “CreateProfileTable” in the “Table” dropdown, a properly formatted set of data will be available to copy and paste into Organic.

    ![Formatted carbon pool data ready to copy and paste into Organic](CarbonPools_Fig2.png)

    For this method to work, ensure that before you run the spin-up simulation that the depth layering in Organic is the same as in the Physical model.

    ## References
    Cichota, R., I. Vogeler, J. Sharp, K. Verburg, N. Huth, D. Holzworth, N. Dalgliesh and V. Snow (2021). "A protocol to build soil descriptions for APSIM simulations." MethodsX 8: 101566.

    Probert, M. E., J. P. Dimes, B. A. Keating, R. C. Dalal and W. M. Strong (1998). "APSIM's water and nitrogen modules and simulation of the dynamics of water and nitrogen in fallow systems." Agricultural Systems 56: 1–28.
  DataStore
    CreateProfileTable: SourceTableName=Justfinals
  Simulation GuessInitialValues
    Clock: Start=2000-06-01; End=2100-05-31
    Weather (disabled): FileName=%root%/Examples/WeatherFiles/NZ_Lincoln.met
    WeatherSampler: FileName=%root%\Examples\WeatherFiles\NZ_Lincoln.met; TypeOfSampling=1; Seed=75; Years=[1960, 1971, 1987, 1993, 1204, 1985]
    SoilArbitrator
    Summary
    MicroClimate: a_interception=0; b_interception=1; c_interception=0; d_interception=0; SoilHeatFluxFraction=0.4; MinimumHeightDiffForNewLayer=0; NightInterceptionFraction=0.5; ReferenceHeight=2
    Forages
      Parameters:
        Name                          LiveDigestibility  DeadDigestibility  LiveFractionConsumable  DeadFractionConsumable  LiveMinimumBiomass  DeadMinimumBiomass
        SurfaceOrganicMatter.Residue  0.7                0.3                1                       1                       100                 0
        AGPRyegrass.Leaf              0.7                0.3                1                       1                       100                 0
        AGPRyegrass.Stem              0.7                0.3                1                       1                       100                 0
        AGPRyegrass.Stolon            0.7                0.3                1                       1                       100                 0
        AGPWhiteClover.Leaf           0.7                0.3                1                       1                       100                 0
        AGPWhiteClover.Stem           0.7                0.3                1                       1                       100                 0
        AGPWhiteClover.Stolon         0.7                0.3                1                       1                       100                 0
    Zone Field: Area=1; Slope=0; AspectAngle=0; Altitude=50
      SimpleGrazing: GrazingRotationType=0; SimpleGrazingFrequencyString=21; SimpleMinGrazable=0; SimpleGrazingResidual=1500; FlexibleGrazePostDM=0; FractionDefoliatedBiomassToSoil=[1]; FractionDefoliatedNToSoil=[0.7]; FractionExcretedNToDung=[0.45]; DepthUrineIsAdded=250; SendDungElsewhere=0; SendUrineElsewhere=0; FractionPopulationDecline=0; TramplingOn=false; MaximumPropLitterMovedToSoil=0.1; PastureConsumedAtMaximumRateOfLitterRemoval=1200
        PreGrazeDMArray=[1000, 1000, 1000, 1000, 1000, 1000, 1000, 1000, 1000, 1000, 1000, 1000]
        PostGrazeDMArray=[2000, 2000, 2000, 2000, 2000, 2000, 2000, 2000, 2000, 2000, 2000, 2000]
      Manager FertiliseFixedDates
        EachYear = True
        Dates = 5-jan, 5-feb, 5-mar, 5-apr, 5-aug, 5-sep, 5-oct, 5-nov, 5-dec
        UseCritNThreshold = False
        CritNThreshold = 50
        CritNDepth = 75
        Depth = 50
        Amount = 15
        FertiliserType = UreaN
```csharp
using Models.Interfaces;
using System.Linq;
using APSIM.Shared.Utilities;
using Models.PMF;
using Models.Soils;
using Models.Soils.Nutrients;
using Models.Core;
using System;
using Models.Soils.Nutrients;

namespace Models
{
    [Serializable]
    public class Script : Model
    {
        [Link] private Clock clock;
        [Link] private Fertiliser fertiliser;
        [Link] private ISummary summary;
        [Link] private Soil soil;
        private Nutrient nutrient;
        private Nutrient soilN;
        [Link]
        private IPhysical soilPhysical;
        [Link]
        private Nutrient Nutrient;
        [Link(Path="[SurfaceOrganicMatter].SurfaceResidue.Decomposition")]
        private OrganicFlow ResidueDecomposition;


        [Separator("Fertiliser will be applied on the date(s) below")]
        [Description("Apply fertiliser on the same day(s) each year? If no, then must include the year of appliaction below")]
        public bool EachYear { get; set; }

        [Description("Dates for one or more fertiliser applications (dd-mmm or dd-mmm-yyyy) as a list with a comma between dates")]
        public string[] Dates { get; set; }

        [Separator("Test for the mineral N in the soil and don't apply the fertiliser if greater than X kgN/ha is stored in the soil above a depth of Y mm")]
        [Description("Use a critical soil mineral N to prevent application above a threshold?")]
        public bool UseCritNThreshold { get; set; }

        [Description("Don't add fertiliser if N in the soil to the depth below exceeds (kg/ha)")]
        public double CritNThreshold { get; set; }

        [Description("Depth to which the amount of N in the soil should be calculated (mm)")]
        public double CritNDepth { get; set; }

        [Separator("Fertiliser application details")]
        [Description("Depth at which to apply the fertiliser (mm)")]
        public double Depth { get; set; }

        [Description("Amount of fertiliser to apply (kg N /ha) per application")]
        public double Amount { get; set; }

        [Description("Fertiliser type - select from the list")]
        public Fertiliser.Types FertiliserType { get; set; }


        [EventSubscribe("StartOfSimulation")]
        private void FindSoilNOrNutrient(object sender, EventArgs e)
        {
            nutrient = this.FindInScope<Nutrient>() as Nutrient;
            soilN = this.FindInScope<Nutrient>() as Nutrient;

            if (nutrient == null && soilN == null)
                throw new Exception(string.Format("Error in script {0}: Unable to find nutrient or soilN.", Name));
        }

        [EventSubscribe("DoManagement")]
        private void OnDoManagement(object sender, EventArgs e)
        {
            if (OnApplicationDate())
            {
                if (NContentBelowThreshold())
                    fertiliser.Apply(Amount, FertiliserType, Depth);
                else
                    summary.WriteMessage(this, "Skipping fertiliser application due to soil mineral N content being above critical threshold.", MessageType.Diagnostic);
            }
        }

        /// <summary>Checks if today's date is one of the specified fertiliser application dates.</summary>
        private bool OnApplicationDate()
        {
            if (EachYear)
                return Dates.Any(d => DateUtilities.DatesEqual(d, clock.Today));
            
            DateTime[] dates = Dates.Select(d => DateTime.ParseExact(d, "d-MMM-yyyy", null)).ToArray();
            return dates.Any(d => SameDate(d, clock.Today));
        }

        /// <summary>Checks if N content in soil is below critical threshold.</summary>
        private bool NContentBelowThreshold()
        {
            if (!UseCritNThreshold)
                return true;
            
            double[] weights = GetLayerWeights();
            double cumSoilN = 0;

            for (int i = 0; i < soilPhysical.Thickness.Length; i++)
            {
                if (nutrient != null)
                    cumSoilN += weights[i] * nutrient.MineralN[i];
                else if (soilN != null)
                    cumSoilN += weights[i] * soilN.MineralN[i];
            }

            return cumSoilN <= CritNThreshold;
        }

        private double[] GetLayerWeights()
        {
            double[] weights = new double[soilPhysical.Thickness.Length];
            double cumDepth = 0;

            for (int i = 0; i < soilPhysical.Thickness.Length; i++)
            {
                cumDepth += soilPhysical.Thickness[i];
                if (cumDepth < CritNDepth)
                    weights[i] = 1;
                else if (cumDepth - soilPhysical.Thickness[i] <= CritNDepth)
                    weights[i] = (CritNDepth - (cumDepth - soilPhysical.Thickness[i])) / soilPhysical.Thickness[i];
                else
                    weights[i] = 0;
            }

            return weights;
        }

        private bool SameDate(DateTime d1, DateTime d2)
        {
            return d1.Year == d2.Year && d1.DayOfYear == d2.DayOfYear;
        }
    }
}
```
      Manager AutomaticIrrigation
        allowIrrigation = True
        seasonStart = 1-sep
        seasonEnd = 30-apr
        seasonsAllocation = 10000
        triggerDeficit = 75
        targetDeficit = 95
        returndays = 3
        maximumAmount = 30
        depthPAWC = 300
```csharp
using Newtonsoft.Json;
using APSIM.Shared.Utilities;
using System.Xml.Serialization;
using Models.Soils;
using Models.PMF;
using Models.Core;
using System;
using System.Linq;
using Models.Interfaces;


        
namespace Models
{
    [Serializable] 
    [System.Xml.Serialization.XmlInclude(typeof(Model))]
    public class Script : Model
    {
        [Link] private ISummary summary;
        [Link] private Irrigation Irrigation;
        [Link] private Clock Clock;
        [Link] private Soil Soil;
        [Link(IsOptional = true)] private IPlant existingCrop;
        private DateTime StartDate;
        private DateTime EndDate;
        private double TopDUL;
        private double TopLL;
        private int nLayers;
        [Link]
        private IPhysical soilPhysical;
        [Link]
        private ISoilWater waterBalance;
        //Communication to other modules
       
        //User inputs from properties tab
        [Description("Turn irrigation on?")]
        public bool allowIrrigation { get; set; }
        [Description("Start of irrigation season (dd-MMM)")]
        public string seasonStart { get; set; }
        [Description("End of irrigation season (dd-MMM)")]
        public string seasonEnd { get; set; }
        [Description("Season allocation (mm)")]
        public double seasonsAllocation { get; set; }
        [Description("Deficit to trigger irrigation (% PAWC)")]
        public double triggerDeficit { get; set; }
        [Description("Deficit to stop irrigaton (% PAWC)")]
        public double targetDeficit { get; set; }
        [Description("Minimum days for irrigation to return")]
        public double returndays { get; set; }
        [Description("Maximum irrigation application (mm/day)")]
        public double maximumAmount { get; set; }
        [Description("Depth to calculate PAWC (mm)")]
        public double depthPAWC { get; set; }

        //Class members
        [JsonIgnore] public double TopSWdeficit { get; set; }
        [JsonIgnore] public double TopSWC { get; set; }
        [JsonIgnore] public double DaysSinceIrrigation { get; set; }
        [JsonIgnore] public double AmountToApply { get; set; }
        [JsonIgnore] public double SeasonAppliedAmount { get; set; }
        
        private bool IrrigationIsAllowed { get; set; }
        private bool SeasonIsOpen { get; set; }
        private bool CropIsActive { get; set; }
        private bool IrrigatorIsAvailable { get; set; }
        private bool SoilIsDry { get; set; }

    
        //Calculate static soil variables
        [EventSubscribe("StartOfSimulation")]
        private void OnStartOfSimulation(object sender, EventArgs e)
        {   
            //Set the season dates
            StartDate = DateTime.Parse(seasonStart + "-" + Clock.Today.Year.ToString());
            EndDate = DateTime.Parse(seasonEnd + "-" + Clock.Today.Year.ToString());
            
            //Can we irrigate at all?
            IrrigationIsAllowed = false; 
            if (allowIrrigation)
                IrrigationIsAllowed = true; 

            //Calculate soil water variables
            double depthFromSurface = 0.0;
            double fracLayer = 0.0;
            nLayers = soilPhysical.Thickness.Length;
            for (int layer = 0; layer < nLayers; layer++)
            {
                fracLayer = Math.Min(1.0, (depthPAWC - depthFromSurface) / soilPhysical.Thickness[layer]);
                TopLL += soilPhysical.LL15mm[layer] * fracLayer;
                TopDUL += soilPhysical.DULmm[layer] * fracLayer;
                depthFromSurface += soilPhysical.Thickness[layer];
                if (depthFromSurface >= depthPAWC)
                    layer = nLayers;
            }
        }
             
        //Determine daily requirement for irrigation
        [EventSubscribe("StartOfDay")]
        private void OnStartOfDay(object sender, EventArgs e)
        {
            //Can we irrigate today?          
            SeasonIsOpen = isBetween(Clock.Today, StartDate, EndDate);
            if (!SeasonIsOpen)
                SeasonAppliedAmount = 0;

            //Is there a crop in the ground that needs irrigation?
            CropIsActive = false;
            if ((existingCrop != null) && (existingCrop.IsAlive))
                CropIsActive = true;
            //if ((existingCrop.Phenology.Stage >= 3.0) && (existingCrop.Phenology.Stage < 6.0))
          
            //Is the irrigator available?
            IrrigatorIsAvailable = false;
            DaysSinceIrrigation += 1;
            if (DaysSinceIrrigation >= returndays)
                IrrigatorIsAvailable = true;
          
            //Is the soil dry enough to require irrigation?
            SoilIsDry = false;
            double depthFromSurface = 0.0;
            double fracLayer = 0.0;
            TopSWC = 0.0;
            for (int layer = 0; layer < nLayers; layer++)
            //for (int layer = 0; depthFromSurface < depthPAWC + soilPhysical.Thickness[layer]; layer++)
            {
                fracLayer = Math.Min(1.0, (depthPAWC - depthFromSurface) / soilPhysical.Thickness[layer]);
                TopSWC += waterBalance.SWmm[layer] * fracLayer;
                depthFromSurface += soilPhysical.Thickness[layer];
                if (depthFromSurface >= depthPAWC)
                    layer = nLayers;
            }
            
            TopSWdeficit = TopSWC - TopDUL;
            if (Math.Max(0.0, -TopSWdeficit) >= (TopDUL - TopLL) * (100 - triggerDeficit) / 100)
                SoilIsDry = true;
                
            //Are all the conditions ratifying irrigation
            if (IrrigationIsAllowed && SeasonIsOpen && CropIsActive && IrrigatorIsAvailable && SoilIsDry)
            {
                //Lets bloody well irrigate then!!!!
                AmountToApply = TopDUL * targetDeficit / 100 - TopSWC;
                AmountToApply = Math.Max(0.0, Math.Min(AmountToApply, seasonsAllocation - SeasonAppliedAmount));
                Irrigation.Apply(AmountToApply);
                DaysSinceIrrigation = 0;
                SeasonAppliedAmount += AmountToApply;
            }
        }
        
        ///Checks whether theDate is between iniDate and endDate (non-year specific)
        private bool isBetween(DateTime theDay, DateTime iniDate, DateTime endDate)
        {
            bool result = false;
            if (iniDate.DayOfYear < endDate.DayOfYear)
            {
                // period is within one year, ex: summer in the northern hemisphere
                if ((theDay.DayOfYear >= iniDate.DayOfYear) && (theDay.DayOfYear <= endDate.DayOfYear))
                    result = true;
            }
            else
            {
                // period goes over the end of the year, ex: summer in the southern hemisphere
                if ((theDay.DayOfYear >= iniDate.DayOfYear) || (theDay.DayOfYear <= endDate.DayOfYear))
                    result = true;
            }
            
            return result;
        }
    }
}
```
      Irrigation
      Fertiliser
      SurfaceOrganicMatter: InitialResidueName=Sward; InitialResidueType=grass; InitialResidueMass=1000; InitialStandingFraction=0; InitialCPR=0; InitialCNR=15
      Soil: SoilType=NZ_Sedimentary; LocalName=Lismore; Site=Winchmore; NearestTown=Ashburton; Region=Canterbury; Country=New Zealand; Latitude=-48.48; Longitude=0
        Chemical: Thickness=[150, 150, 200, 150, 250, 300, 300]; PH=[6, 6, 6, 6, 6, 6, 6]; PHUnits=Water
        Physical
          Thickness  ParticleSizeSand  ParticleSizeSilt  ParticleSizeClay  Rocks     BD    AirDry  LL15   DUL    SAT   KS
          150        5                 65                20                0         1.3   0.05    0.15   0.36   0.45  5000
          150        5                 65                15                0         1.35  0.12    0.14   0.34   0.43  2500
          200        5                 65                12                0.568263  1     0.055   0.055  0.19   0.25  3000
          150        5                 65                8                 0.798387  0.53  0.015   0.015  0.065  0.15  10000
          250        5                 65                6                 0.866051  0.31  0.01    0.01   0.04   0.11  17500
          300        5                 65                5                 0.866621  0.3   0.01    0.01   0.03   0.11  20000
          300        5                 65                5                 0.866621  0.3   0.01    0.01   0.03   0.11  20000
          Rocks, ParticleSizeSand, ParticleSizeSilt source: Calculated
          SoilCrop AGPRyegrassSoil: LL=[0.15, 0.14, 0.06, 0.02, 0.01, 0.01, 0.01]; KL=[0.1, 0.1, 0.08, 0.04, 0.01, 0, 0]; XF=[1, 1, 1, 1, 1, 0, 0]
          SoilCrop AGPWhiteCloverSoil: LL=[0.15, 0.14, 0.06, 0.02, 0.01, 0.01, 0.01]; KL=[0.1, 0.1, 0.08, 0.04, 0.01, 0, 0]; XF=[1, 1, 1, 1, 1, 0, 0]
        WaterBalance SoilWater: SummerDate=1-Nov; SummerU=6; SummerCona=3.5; WinterDate=1-apr; WinterU=2; WinterCona=2; DiffusConst=88; DiffusSlope=35; Salb=0.13; CN2Bare=73; CNRed=20; CNCov=0.8; DischargeWidth=0; CatchmentArea=0; PSIDul=-100
          Thickness  SWCON  KLAT
          150        0.5    0
          150        0.52   0
          200        0.55   0
          150        0.6    0
          250        0.65   0
          300        0.65   0
          300        0.65   0
        SoilTemperature
        Organic: FOMCNRatio=40; CarbonUnits=Total
          Thickness  Carbon  SoilCNRatio  FBiom  FInert  FOM
          150        3       12           0.04   0.5     0
          150        1       12           0.02   0.7     0
          200        0.6     12           0.02   0.83    0
          150        0.4     12           0.01   0.9     0
          250        0.25    12           0.01   0.95    0
          300        0.15    12           0      0.99    0
          300        0.1     12           0      0.99    0
        Water: Thickness=[150, 150, 200, 150, 250, 300, 300]; InitialValues=[0.349, 0.33, 0.183, 0.062, 0.038, 0.029, 0.029]; InitialPAWmm=109.4; RelativeTo=LL15; FilledFromTop=false
        Nutrient
        Solute NO3: Thickness=[150, 150, 200, 150, 250, 300, 300]; InitialValues=[5, 2.5, 1, 0.75, 0.5, 0.5, 0.5]; InitialValuesUnits=ppm; WaterTableConcentration=0; D0=0; DepthConstant=0; MaxDepthSoluteAccessible=0; RunoffEffectivenessAtMovingSolute=0; MaxEffectiveRunoff=0
        Solute NH4: Thickness=[150, 150, 200, 150, 250, 300, 300]; InitialValues=[0.1, 0.1, 0.1, 0.1, 0.1, 0.1, 0.1]; InitialValuesUnits=ppm; WaterTableConcentration=0; D0=0; DepthConstant=0; MaxDepthSoluteAccessible=0; RunoffEffectivenessAtMovingSolute=0; MaxEffectiveRunoff=0
        Solute Urea: Thickness=[150, 150, 200, 150, 250, 300, 300]; InitialValues=[0, 0, 0, 0, 0, 0, 0]; InitialValuesUnits=kg/ha; WaterTableConcentration=0; D0=0; DepthConstant=0; MaxDepthSoluteAccessible=0; RunoffEffectivenessAtMovingSolute=0; MaxEffectiveRunoff=0
      PastureSpecies AGPRyegrass: doyGermination=275; daysEmergenceToAnthesis=120; daysAnthesisToMaturity=85; degreesDayForAnthesis=1100; degreesDayForMaturity=900; daysAnnualsFactor=45; CanopyType=PastureSpecies; InitialShootDM=1500; InitialRootDM=450; InitialRootDepth=750; initialDMFractionsGrasses=[0.15, 0.25, 0.25, 0.05, 0.05, 0.1, 0.1, 0.05, 0, 0, 0]; initialDMFractionsForbs=[0.2, 0.2, 0.15, 0.05, 0.1, 0.15, 0.1, 0.05, 0, 0, 0]; PhotosyntheticEfficiency=0.01; PhotosynthesisCurveFactor=0.8; FractionPAR=0.5; ReferenceCO2=380; CO2EffectScaleFactor=700; CO2EffectOffsetFactor=600; CO2EffectMinimum=0.7; CO2EffectExponent=2; ReproSeasonDurationCoeff=2; ReproSeasonShouldersLengthFactor=1; ReproSeasonOnsetDurationFactor=0.6; RelativeTurnoverEmerging=2; DetachmentDroughtCoefficient=3; DetachmentDroughtEffectMin=0.1; TurnoverStockFactor=0.01; TurnoverDefoliationEffectMin=0.025; MinimumGreenLeafProp=0.8; MinimumGreenRootProp=0.5
        initialDMFractionsLegumes=[0.16, 0.23, 0.22, 0.05, 0.03, 0.05, 0.05, 0.01, 0.04, 0.08, 0.08]
        LinearInterpolationFunction FVPDFunction
      PastureSpecies AGPWhiteClover: doyGermination=275; daysEmergenceToAnthesis=120; daysAnthesisToMaturity=85; degreesDayForAnthesis=1100; degreesDayForMaturity=900; daysAnnualsFactor=45; CanopyType=PastureSpecies; InitialShootDM=500; InitialRootDM=150; InitialRootDepth=350; initialDMFractionsGrasses=[0.15, 0.25, 0.25, 0.05, 0.05, 0.1, 0.1, 0.05, 0, 0, 0]; initialDMFractionsForbs=[0.2, 0.2, 0.15, 0.05, 0.1, 0.15, 0.1, 0.05, 0, 0, 0]; PhotosyntheticEfficiency=0.01; PhotosynthesisCurveFactor=0.8; FractionPAR=0.5; ReferenceCO2=380; CO2EffectScaleFactor=700; CO2EffectOffsetFactor=600; CO2EffectMinimum=0.7; CO2EffectExponent=2; ReproSeasonDurationCoeff=2; ReproSeasonShouldersLengthFactor=1; ReproSeasonOnsetDurationFactor=0.6; RelativeTurnoverEmerging=2; DetachmentDroughtCoefficient=3; DetachmentDroughtEffectMin=0.1; TurnoverStockFactor=0.01; TurnoverDefoliationEffectMin=0.025; MinimumGreenLeafProp=0.8; MinimumGreenRootProp=0.5
        initialDMFractionsLegumes=[0.16, 0.23, 0.22, 0.05, 0.03, 0.05, 0.05, 0.01, 0.04, 0.08, 0.08]
        LinearInterpolationFunction FVPDFunction
      Report: EventNames=31-may
        VariableNames:
          [Clock].Today as Date
          Sum of ([AGPRyegrass].HarvestedWt + [AGPWhiteClover].HarvestedWt) from 1-Jul to [Clock].Today as HarvestedWt   //the amount harvested (kg DM /ha)
          sum([Soil].Nutrient.FOM.C[1:2]) as FomC
          sum([Soil].Nutrient.Microbial.C[1:2]) as MicrobC
          sum([Soil].Nutrient.Humic.C[1:2]) as HumicC
          sum([Soil].Nutrient.Inert.C[1:2]) as InertC
          sum([Soil].Nutrient.TotalC[1:2]) as TotalC
      Report FinalOC: EventNames=31-may
        VariableNames:
          [Clock].Today as Date
          [Soil].Nutrient.TotalC / ([Soil].Physical.Thickness/1000 * 10000 * [Soil].Physical.BD*1000) * 100 as TotCPerc
      Report FinalCNRatio: EventNames=31-may
        VariableNames:
          [Clock].Today as Date
          [Soil].Nutrient.TotalC / [Soil].Nutrient.TotalN as CNRatio
      Report FinalFBiom: EventNames=31-may
        VariableNames:
          [Clock].Today as Date
          [Soil].Nutrient.Microbial.C / [Soil].Nutrient.Humic.C as FBiom
      Report FinalFInert: EventNames=31-may
        VariableNames:
          [Clock].Today as Date
          [Soil].Nutrient.Inert.C / [Soil].Nutrient.TotalC as FInert
      Report Justfinals: EventNames=[Clock].EndOfSimulation
        VariableNames:
          [Clock].Today as Date
          [Soil].Nutrient.TotalC / ([Soil].Physical.Thickness/1000 * 10000 * [Soil].Physical.BD*1000) * 100 as TotCPerc
          [Soil].Nutrient.TotalC / [Soil].Nutrient.TotalN as CNRatio
          [Soil].Nutrient.Microbial.C / [Soil].Nutrient.Humic.C as FBiom
          [Soil].Nutrient.Inert.C / [Soil].Nutrient.TotalC as FInert
  Simulation AgPastureTunedInit (disabled)
    Clock: Start=2000-06-01; End=2500-05-31
    Weather: FileName=%root%/Examples/WeatherFiles/NZ_Lincoln
    WeatherSampler: FileName=%root%\Examples\WeatherFiles\Lincoln.met; TypeOfSampling=1; Years=[1960, 1971, 1987, 1993, 1204, 1985]
    SoilArbitrator
    Summary
    MicroClimate: a_interception=0; b_interception=1; c_interception=0; d_interception=0; SoilHeatFluxFraction=0.4; MinimumHeightDiffForNewLayer=0; NightInterceptionFraction=0.5; ReferenceHeight=2
    Forages
      Parameters:
        Name                          LiveDigestibility  DeadDigestibility  LiveFractionConsumable  DeadFractionConsumable  LiveMinimumBiomass  DeadMinimumBiomass
        SurfaceOrganicMatter.Residue  0.7                0.3                1                       1                       100                 0
        AGPRyegrass.Leaf              0.7                0.3                1                       1                       100                 0
        AGPRyegrass.Stem              0.7                0.3                1                       1                       100                 0
        AGPRyegrass.Stolon            0.7                0.3                1                       1                       100                 0
        AGPWhiteClover.Leaf           0.7                0.3                1                       1                       100                 0
        AGPWhiteClover.Stem           0.7                0.3                1                       1                       100                 0
        AGPWhiteClover.Stolon         0.7                0.3                1                       1                       100                 0
    Zone Field: Area=1; Slope=0; AspectAngle=0; Altitude=50
      SimpleGrazing: GrazingRotationType=0; SimpleGrazingFrequencyString=21; SimpleMinGrazable=0; SimpleGrazingResidual=1500; FlexibleGrazePostDM=0; FractionDefoliatedBiomassToSoil=[1]; FractionDefoliatedNToSoil=[0.7]; FractionExcretedNToDung=[0.45]; DepthUrineIsAdded=250; SendDungElsewhere=0; SendUrineElsewhere=0; FractionPopulationDecline=0; TramplingOn=false; MaximumPropLitterMovedToSoil=0.1; PastureConsumedAtMaximumRateOfLitterRemoval=1200
        PreGrazeDMArray=[1000, 1000, 1000, 1000, 1000, 1000, 1000, 1000, 1000, 1000, 1000, 1000]
        PostGrazeDMArray=[2000, 2000, 2000, 2000, 2000, 2000, 2000, 2000, 2000, 2000, 2000, 2000]
      Manager FertiliseFixedDates
        EachYear = True
        Dates = 5-jan, 5-feb, 5-mar, 5-apr, 5-aug, 5-sep, 5-oct, 5-nov, 5-dec
        UseCritNThreshold = False
        CritNThreshold = 50
        CritNDepth = 75
        Depth = 50
        Amount = 15
        FertiliserType = UreaN
        script: same as in GuessInitialValues.Field.FertiliseFixedDates
      Manager AutomaticIrrigation
        allowIrrigation = True
        seasonStart = 1-sep
        seasonEnd = 30-apr
        seasonsAllocation = 10000
        triggerDeficit = 75
        targetDeficit = 95
        returndays = 3
        maximumAmount = 30
        depthPAWC = 300
        script: same as in GuessInitialValues.Field.AutomaticIrrigation
      Irrigation
      Fertiliser
      SurfaceOrganicMatter: InitialResidueName=Sward; InitialResidueType=grass; InitialResidueMass=1000; InitialStandingFraction=0; InitialCPR=0; InitialCNR=15
      Soil: SoilType=NZ_Sedimentary; LocalName=Lismore; Site=Winchmore; NearestTown=Ashburton; Region=Canterbury; Country=New Zealand; Latitude=-48.48; Longitude=0
        Chemical: Thickness=[150, 150, 200, 150, 250, 300, 300]; PH=[6, 6, 6, 6, 6, 6, 6]; PHUnits=Water
        Physical
          Thickness  ParticleSizeClay  BD    AirDry  LL15   DUL    SAT   KS
          150        20                1.3   0.05    0.15   0.36   0.45  5000
          150        15                1.35  0.12    0.14   0.34   0.43  2500
          200        12                1     0.055   0.055  0.19   0.25  3000
          150        8                 0.53  0.015   0.015  0.065  0.15  10000
          250        6                 0.31  0.01    0.01   0.04   0.11  17500
          300        5                 0.3   0.01    0.01   0.03   0.11  20000
          300        5                 0.3   0.01    0.01   0.03   0.11  20000
          SoilCrop AGPRyegrassSoil: LL=[0.15, 0.14, 0.06, 0.02, 0.01, 0.01, 0.01]; KL=[0.1, 0.1, 0.08, 0.04, 0.01, 0, 0]; XF=[1, 1, 1, 1, 1, 0, 0]
          SoilCrop AGPWhiteCloverSoil: LL=[0.15, 0.14, 0.06, 0.02, 0.01, 0.01, 0.01]; KL=[0.1, 0.1, 0.08, 0.04, 0.01, 0, 0]; XF=[1, 1, 1, 1, 1, 0, 0]
        WaterBalance SoilWater: SummerDate=1-Nov; SummerU=6; SummerCona=3.5; WinterDate=1-apr; WinterU=2; WinterCona=2; DiffusConst=88; DiffusSlope=35; Salb=0.13; CN2Bare=73; CNRed=20; CNCov=0.8; DischargeWidth=0; CatchmentArea=0; PSIDul=-100
          Thickness  SWCON  KLAT
          150        0.5    0
          150        0.52   0
          200        0.55   0
          150        0.6    0
          250        0.65   0
          300        0.65   0
          300        0.65   0
        Organic: FOMCNRatio=40; CarbonUnits=Total
          Thickness  Carbon  SoilCNRatio  FBiom  FInert  FOM
          150        3.643   11.765       0.079  0.412   0
          150        1.002   11.861       0.079  0.698   0
          200        0.751   11.889       0.079  0.663   0
          150        0.609   11.886       0.079  0.591   0
          250        0.404   11.872       0.08   0.587   0
          300        0.149   11.912       0.01   1       0
          300        0.099   11.879       0.01   1       0
        Water: Thickness=[150, 150, 200, 150, 250, 300, 300]; InitialValues=[0.349, 0.33, 0.183, 0.062, 0.038, 0.029, 0.029]; InitialPAWmm=109.4; RelativeTo=LL15; FilledFromTop=false
        CERESSoilTemperature Temperature
        Nutrient
        Solute NO3: Thickness=[150, 150, 200, 150, 250, 300, 300]; InitialValues=[5, 2.5, 1, 0.75, 0.5, 0.5, 0.5]; InitialValuesUnits=ppm; WaterTableConcentration=0; D0=0; DepthConstant=0; MaxDepthSoluteAccessible=0; RunoffEffectivenessAtMovingSolute=0; MaxEffectiveRunoff=0
        Solute NH4: Thickness=[150, 150, 200, 150, 250, 300, 300]; InitialValues=[0.1, 0.1, 0.1, 0.1, 0.1, 0.1, 0.1]; InitialValuesUnits=ppm; WaterTableConcentration=0; D0=0; DepthConstant=0; MaxDepthSoluteAccessible=0; RunoffEffectivenessAtMovingSolute=0; MaxEffectiveRunoff=0
        Solute Urea: Thickness=[150, 150, 200, 150, 250, 300, 300]; InitialValues=[0, 0, 0, 0, 0, 0, 0]; InitialValuesUnits=kg/ha; WaterTableConcentration=0; D0=0; DepthConstant=0; MaxDepthSoluteAccessible=0; RunoffEffectivenessAtMovingSolute=0; MaxEffectiveRunoff=0
      PastureSpecies AGPRyegrass: doyGermination=275; daysEmergenceToAnthesis=120; daysAnthesisToMaturity=85; degreesDayForAnthesis=1100; degreesDayForMaturity=900; daysAnnualsFactor=45; CanopyType=PastureSpecies; InitialShootDM=1500; InitialRootDM=450; InitialRootDepth=750; initialDMFractionsGrasses=[0.15, 0.25, 0.25, 0.05, 0.05, 0.1, 0.1, 0.05, 0, 0, 0]; initialDMFractionsForbs=[0.2, 0.2, 0.15, 0.05, 0.1, 0.15, 0.1, 0.05, 0, 0, 0]; PhotosyntheticEfficiency=0.01; PhotosynthesisCurveFactor=0.8; FractionPAR=0.5; ReferenceCO2=380; CO2EffectScaleFactor=700; CO2EffectOffsetFactor=600; CO2EffectMinimum=0.7; CO2EffectExponent=2; ReproSeasonDurationCoeff=2; ReproSeasonShouldersLengthFactor=1; ReproSeasonOnsetDurationFactor=0.6; RelativeTurnoverEmerging=2; DetachmentDroughtCoefficient=3; DetachmentDroughtEffectMin=0.1; TurnoverStockFactor=0.01; TurnoverDefoliationEffectMin=0.025; MinimumGreenLeafProp=0.8; MinimumGreenRootProp=0.5
        initialDMFractionsLegumes=[0.16, 0.23, 0.22, 0.05, 0.03, 0.05, 0.05, 0.01, 0.04, 0.08, 0.08]
        LinearInterpolationFunction FVPDFunction
      PastureSpecies AGPWhiteClover: doyGermination=275; daysEmergenceToAnthesis=120; daysAnthesisToMaturity=85; degreesDayForAnthesis=1100; degreesDayForMaturity=900; daysAnnualsFactor=45; CanopyType=PastureSpecies; InitialShootDM=500; InitialRootDM=150; InitialRootDepth=350; initialDMFractionsGrasses=[0.15, 0.25, 0.25, 0.05, 0.05, 0.1, 0.1, 0.05, 0, 0, 0]; initialDMFractionsForbs=[0.2, 0.2, 0.15, 0.05, 0.1, 0.15, 0.1, 0.05, 0, 0, 0]; PhotosyntheticEfficiency=0.01; PhotosynthesisCurveFactor=0.8; FractionPAR=0.5; ReferenceCO2=380; CO2EffectScaleFactor=700; CO2EffectOffsetFactor=600; CO2EffectMinimum=0.7; CO2EffectExponent=2; ReproSeasonDurationCoeff=2; ReproSeasonShouldersLengthFactor=1; ReproSeasonOnsetDurationFactor=0.6; RelativeTurnoverEmerging=2; DetachmentDroughtCoefficient=3; DetachmentDroughtEffectMin=0.1; TurnoverStockFactor=0.01; TurnoverDefoliationEffectMin=0.025; MinimumGreenLeafProp=0.8; MinimumGreenRootProp=0.5
        initialDMFractionsLegumes=[0.16, 0.23, 0.22, 0.05, 0.03, 0.05, 0.05, 0.01, 0.04, 0.08, 0.08]
        LinearInterpolationFunction FVPDFunction
      Report: EventNames=31-may
        VariableNames:
          [Clock].Today as Date
          Sum of ([AGPRyegrass].HarvestedWt + [AGPWhiteClover].HarvestedWt) from 1-Jul to [Clock].Today as HarvestedWt   //the amount harvested (kg DM /ha)
          sum([Soil].Nutrient.FOM.C[1:2]) as FomC
          sum([Soil].Nutrient.Microbial.C[1:2]) as MicrobC
          sum([Soil].Nutrient.Humic.C[1:2]) as HumicC
          sum([Soil].Nutrient.Inert.C[1:2]) as InertC
          sum([Soil].Nutrient.TotalC[1:2]) as TotalC
      Report FinalOC: EventNames=31-may
        VariableNames:
          [Clock].Today as Date
          [Soil].Nutrient.TotalC / ([Soil].Physical.Thickness/1000 * 10000 * [Soil].Physical.BD*1000) * 100 as TotCPerc
      Report FinalCNRatio: EventNames=31-may
        VariableNames:
          [Clock].Today as Date
          [Soil].Nutrient.TotalC / [Soil].Nutrient.TotalN as CNRatio
      Report FinalFBiom: EventNames=31-may
        VariableNames:
          [Clock].Today as Date
          [Soil].Nutrient.Microbial.C / [Soil].Nutrient.Humic.C as FBiom
      Report FinalFInert: EventNames=31-may
        VariableNames:
          [Clock].Today as Date
          [Soil].Nutrient.Inert.C / [Soil].Nutrient.TotalC as FInert
      Report Justfinals: EventNames=[Clock].EndOfSimulation
        VariableNames:
          [Clock].Today as Date
          [Soil].Nutrient.TotalC / ([Soil].Physical.Thickness/1000 * 10000 * [Soil].Physical.BD*1000) * 100 as TotCPerc
          [Soil].Nutrient.TotalC / [Soil].Nutrient.TotalN as CNRatio
          [Soil].Nutrient.Microbial.C / [Soil].Nutrient.Humic.C as FBiom
          [Soil].Nutrient.Inert.C / [Soil].Nutrient.TotalC as FInert
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