Simulations: Version=181
  Memo
    Bur grows from flowering until cutout

    Lint from XX to startopenbolls

    Seed from xx to maturity??

    1. Thermal Time only drives phenology until flowering. Cutout, bollfilling, maturing driven by supply/demand
    2. Bur have its own HarvestIndex. Bur potenital HI is end of bur growth (40%?)
    3. Seedcotton as seperate CompositeBiomass --> keep Bur seperate

    ***Main issues:***

    1. Phenology needs to work across different cultivars and regions --> need to work in cutout, bollperiod and maturity calculations
    2. Boll demand as a whole not strong enough. N conc correct? BollFilling duration? Partioning? DM/N remobilisation? Leaf senescence?
    3. Node production in MRF21 too high --> need to slow down due to high temperatures? N stress?

    **ARBITRATOR**

    * Copied in WaterUptakeMethod from Sorghum model to calculate SDRatio

    **PHENOLOGY**

    * Phenology in simulations running on set *FixedValues* in Cultivar parameters
    * Is ThermalTime Response correct? See method Bange et al., 2022 (optimum 32oC and base 15.6oC)
    * Cutout script not working correctly --> seems to be a feedback on DM partitioning caused by this?
    * BollFilling Target based on boll period. Function reprocal of Temp
    * Maturing not working correctly --> function based on when cutout occurs

    **LEAF**

    * NodeNumber reduced with WaterFactor (SDRatio)
    * [Leaf].Photosynthesis.RUE.FixedValue = 1.5; [Leaf].SpecificArea.FixedValue = 0.021; [Leaf].AreaLargestLeaf.FixedValue = 0.12 not set in CultivarParameters. RUE can be determined with VPD, SLA with radition (previous week, Reddy) but AreaLargestLeaf?
    * Dynamic RUE --> NAR0607Ir80: average over the growing season is 1.1 (which is similar to fixed RUE of 1.0)
    * Dynamic RUE --> DDRF21RS1000: average growing season is 1.4; similar to 1.5 RUE fixed
    * Boll composed of Bur, Seed, Lint, all with different N-demands.
    * However, it is suggested that RUE is more influenced by radiation https://www.sciencedirect.com/science/article/pii/S0378429099000118#aep-section-id11 (RUE has been shown both experimentally and theoretically to be increased by decreased irradiance and by increased fractions of diffuse radiation. On the other hand, there is little evidence to show that VPD greatly influences RUE.)

    **SIMULATIONS**

    * NAR0607Ir80: Not enough biomass partitioned to Boll; however Lint yield is spot-on
    * DDRF21RS1000: Seems to be working well although NO3 content in the soil not accurate
    * MRF21: canopy too large due to too rapid mainstem node growth (need to be regulated by temp? Is higher in the begin phases compared with DDRF). Leaf growth too large, reproductive growth too little. Problem is most likely N rates and dates which I did not have and have to guess. Also starting N and OM was from adjacent field. NO3 in the soils also seems to be overestimated?
  Memo TitlePage
    # The APSIM Cotton Model

    The APSIM Cotton model has been developed using the Plant Modelling Framework (PMF) of [brown_plant_2014]. This new framework provides a library of plant organ and process submodels that can be coupled, at runtime, to construct a model in much the same way that models can be coupled to construct a simulation. This means that dynamic composition of lower level process and organ classes (e.g. photosynthesis, leaf) into larger constructions (e.g. maize, wheat, sorghum) can be achieved by the model developer without additional coding.

    The model consists of:

    * a phenology model to simulate development between growth phases
    * a structure model to simulate plant morphology
    * a collection of organs to simulate the various plant parts
    * an arbitrator to allocate resources (N, biomass) to the various plant organs
  DataStore
    ExcelInput Observed: FileNames=[Observed\Observed.xlsx, Observed\ForestHillObserved.xlsx]; SheetNames=[CottonObserved]
    PredictedObserved: PredictedTableName=DailyReport; ObservedTableName=CottonObserved; FieldNameUsedForMatch=SimulationName; FieldName2UsedForMatch=Clock.Today; AllColumns=true
    PredictedObserved PredictedObservedHarvest: PredictedTableName=HarvestReport; ObservedTableName=CottonObserved; FieldNameUsedForMatch=SimulationName; FieldName2UsedForMatch=SimulationID; AllColumns=false
  Folder Replacements
    Report DailyReport: EventNames=[Clock].DoReport
      VariableNames:
        [Clock].Today
        [Clock].Today.DayOfYear
        [Weather].Rain
        [Weather].MeanT
        [Weather].MaxT
        [Weather].MinT
        [Weather].Radn
        [Weather].VPD
        [Weather].CO2
        [Arbitrator].TotalDMFixationSupply
        [Cotton].DaysAfterSowing
        [Cotton].Arbitrator.DM.TotalPlantDemand
        [Cotton].Arbitrator.DM.TotalFixationSupply
        [Cotton].Arbitrator.TotalDMFixationSupply
        [Cotton].Arbitrator.N.TotalFixationSupply
        [Cotton].Arbitrator.N.TotalPlantDemand
        [Cotton].Arbitrator.N.TotalPlantSupply
        sum([Cotton].Arbitrator.N.Fixation) as NFixed
        //(ln([Cotton].WholePlantGrowthRate)) as RGR
        [Cotton].WholePlantGrowthRate
        [Cotton].AboveGroundGrowthRate
        [Cotton].PotentialBollGrowthRate
        [Cotton].NitrogenUptake
        [Cotton].Phenology.Stage
        [Cotton].Phenology.ThermalTime
        [Cotton].Phenology.AccumulatedTT
        [Cotton].Phenology.CurrentStageName
        [Cotton].Phenology.Photoperiod
        [Cotton].Phenology.EmergenceDAS
        [Cotton].Phenology.SquaringDAS
        [Cotton].Phenology.FloweringDAS
        [Cotton].Phenology.CutoutDAS
        [Cotton].Phenology.OpenbollsDAS
        [Cotton].Phenology.MaturityDAS
        [Cotton].Phenology.EarlyFlowering.BollRatio
        [Cotton].Phenology.EarlyFlowering.FractionComplete
        [Cotton].AboveGround.Wt
        [Cotton].AboveGround.N
        [Cotton].AboveGroundLive.Wt
        [Cotton].Boll.Nconc
        [Cotton].Leaf.NodeNumber
        [Cotton].Leaf.Fw
        [Cotton].Leaf.Fn
        [Cotton].Leaf.Photosynthesis.FT
        [Cotton].Leaf.Photosynthesis.FVPD
        [Cotton].Leaf.LAI
        [Cotton].Leaf.HeightFunction
        [Cotton].Leaf.Height
        [Cotton].Leaf.CoverGreen
        [Cotton].Leaf.CoverTotal
        [Cotton].Leaf.Live.Wt
        [Cotton].Leaf.Live.StructuralWt
        [Cotton].Leaf.Live.MetabolicWt
        [Cotton].Leaf.Allocated.MetabolicWt
        [Cotton].Leaf.Allocated.StructuralWt
        [Cotton].Leaf.DMDemand.Total
        [Cotton].Leaf.Dead.StructuralWt
        [Cotton].Leaf.Dead.MetabolicWt
        [Cotton].Leaf.Live.N
        [Cotton].Leaf.Live.NConc
        [Cotton].Leaf.Dead.Wt
        [Cotton].Leaf.Dead.N
        [Cotton].Leaf.Dead.NConc
        [Cotton].Leaf.RadiationIntercepted
        [Cotton].Leaf.Wt
        [Cotton].Leaf.Nconc
        [Cotton].Leaf.N
        [Cotton].Leaf.Senesced.Wt
        [Cotton].Leaf.BranchNumber
        [Cotton].Leaf.SpecificAreaCanopy
        [Cotton].Leaf.Sites
        [Cotton].Leaf.SpecificArea
        [Cotton].Leaf.CoverTotal
        [Cotton].Stem.Wt
        [Cotton].Stem.Total.StructuralWt
        [Cotton].Stem.Live.StructuralWt
        [Cotton].Stem.Live.StructuralN
        [Cotton].Stem.N
        [Cotton].Stem.Nconc
        [Cotton].Lint.Wt
        [Cotton].Lint.N
        [Cotton].Lint.Nconc
        [Cotton].Lint.Bales as Bales
        [Cotton].Lint.Allocated.Wt
        [Cotton].Bur.HarvestIndex
        [Cotton].Bur.PotentialHarvestIndex
        [Cotton].Lint.HarvestIndex
        [Cotton].Lint.PotentialHarvestIndex
        [Cotton].Seed.HarvestIndex
        [Cotton].Seed.PotentialHarvestIndex
        [Cotton].Lint.DMDemand.Total
        [Cotton].Leaf.DMDemand.Total
        [Cotton].Bur.DMDemand.Total
        [Cotton].Seed.DMDemand.Total
        [Cotton].Stem.DMDemand.Total
        ([Cotton].Bur.DMDemand.Total+[Cotton].Lint.DMDemand.Total+[Cotton].Seed.DMDemand.Total) as BollDemand
        ([Cotton].Stem.DMDemand.Total+[Cotton].Leaf.DMDemand.Total) as VegetativeDemand
        //([Cotton].Stem.DMDemand.Total+[Cotton].Leaf.DMDemand.Total+[Cotton].Lint.DMDemand.Total+[Cotton].Seed.DMDemand.Total+[Cotton].Bur.DMDemand.Total) as ShootDMDemand
        ([Cotton].Stem.DMDemand.Total+[Cotton].Leaf.DMDemand.Total+[Cotton].Root.DMDemand.Total) as ShootDMDemand
        [Cotton].Root.DMDemand.Total
        [Cotton].Lint.NDemand.Total
        [Cotton].Leaf.NDemand.Total
        [Cotton].Stem.NDemand.Total
        [Cotton].Root.NDemand.Total
        [Cotton].Root.NUptake
        [Cotton].Lint.LiveFWt
        [Cotton].Root.Wt
        [Cotton].Root.Depth
        [Soil].Water.Volumetric[1:3]
        [Soil].Water.Volumetric
        sum([Soil].SoilWater.ESW) as TotalESW
        [Soil].SoilWater.SW
        ([Soil].SoilWater.SWmm[1]+[Soil].SoilWater.SWmm[2]+[Soil].SoilWater.SWmm[3]+[Soil].SoilWater.SWmm[4]+[Soil].SoilWater.SWmm[5]+[Soil].SoilWater.SWmm[6]) as SWmm1800
        ([Soil].SoilWater.ESW[1]+[Soil].SoilWater.ESW[2]+[Soil].SoilWater.ESW[3]+[Soil].SoilWater.ESW[4]+[Soil].SoilWater.ESW[5]+[Soil].SoilWater.ESW[6]) as ESW1800
        sum([Soil].Water.Volumetric) as TotalSWC
        sum([Soil].Water.MM) as TotalWaterMM
        ([Soil].Water.MM[1]+[Soil].Water.MM[2]+[Soil].Water.MM[3]+[Soil].Water.MM[4]+[Soil].Water.MM[5]+[Soil].Water.MM[6]+[Soil].Water.MM[7]) as SW1500mm
        ([Soil].Water.MM[1]+[Soil].Water.MM[2]+[Soil].Water.MM[3]+[Soil].Water.MM[4]+[Soil].Water.MM[5]+[Soil].Water.MM[6]) as SW1800mm
        ([Soil].Water.MM[1]+[Soil].Water.MM[2]+[Soil].Water.MM[3]+[Soil].Water.MM[4]+[Soil].Water.MM[5]) as SW1200mm
        (sum([CottonSoil].PAWmm)/sum([CottonSoil].PAWCmm)) as AvailableSoilMoisture
        ([CottonSoil].PAWmm[1]+[CottonSoil].PAWmm[2]+[CottonSoil].PAWmm[3]+[CottonSoil].PAWmm[4]+[CottonSoil].PAWmm[5]) as PAWTop5Layers
        -(([CottonSoil].PAWCmm[1]+[CottonSoil].PAWCmm[2]+[CottonSoil].PAWCmm[3]+[CottonSoil].PAWCmm[4]+[CottonSoil].PAWCmm[5])-([CottonSoil].PAWmm[1]+[CottonSoil].PAWmm[2]+[CottonSoil].PAWmm[3]+[CottonSoil].PAWmm[4]+[CottonSoil].PAWmm[5])) as SoilWaterDeficit120
        [Irrigation].IrrigationApplied
        [Cotton].Boll.Wt
        [Cotton].Lint.Wt
        [Cotton].Seed.Wt
        ([Cotton].Seed.Wt+[Cotton].Lint.Wt) as SeedLint
        [Cotton].Bur.Wt
        sum([Soil].SoilWater.SWmm) as TotalSWmm
        ([Soil].SoilWater.SWmm[1]) as SW1
        ([Soil].SoilWater.SWmm[2]) as SW2
        ([Soil].SoilWater.SWmm[3]) as SW3
        ([Soil].SoilWater.SWmm[4]) as SW4
        ([Soil].SoilWater.SWmm[5]) as SW5
        ([Soil].SoilWater.SWmm[6]) as SW6
        ([Soil].SoilWater.SWmm[7]) as SW7
        //([Soil].SoilWater.SWmm[8]) as SW8
        //([Soil].SoilWater.SWmm[9]) as SW9
        ([Soil].SoilWater.SWmm[1]+[Soil].SoilWater.SWmm[2]+[Soil].SoilWater.SWmm[3]+[Soil].SoilWater.SWmm[4]+[Soil].SoilWater.SWmm[5]+[Soil].SoilWater.SWmm[6]) as SWmm1800
        //to disable reporting
        //([Soil].SoilWater.SWmm[1]+[Soil].SoilWater.SWmm[2]+[Soil].SoilWater.SWmm[3]+[Soil].SoilWater.SWmm[4]+[Soil].SoilWater.SWmm[5]+[Soil].SoilWater.SWmm[6]+[Soil].SoilWater.SWmm[7]+[Soil].SoilWater.SWmm[8]) as SWmm2400
        [Soil].SoilWater.ESW[1] as ESW1
        [Soil].SoilWater.ESW[2] as ESW2
        [Soil].SoilWater.ESW[3] as ESW3
        [Soil].SoilWater.ESW[4] as ESW4
        [Soil].SoilWater.ESW[5] as ESW5
        [Soil].SoilWater.ESW[6] as ESW6
        [Soil].SoilWater.ESW[7] as ESW7
        //[Soil].SoilWater.ESW[8] as ESW8
        //[Soil].SoilWater.ESW[9] as ESW9
        [Soil].SoilWater.PAWmm[1] as PAW1
        [Cotton].Arbitrator.SDRatio
        [Cotton].Arbitrator.SDRatioBound
        sum([Soil].NO3.kgha) as TotalSoilNO3
        sum([Soil]..NH4.kgha) as TotalSoilNH4
        sum([Soil].Water.MM) as TotalSW
        sum([Soil].NH4.ppm) as NH4
        [Soil].NO3.ppm[1] as NO3_1_ppm
        [Soil].NO3.ppm[2] as NO3_2_ppm
        [Soil].NO3.ppm[3] as NO3_3_ppm
        [Soil].NO3.ppm[4] as NO3_4_ppm
        [Soil].NO3.ppm[5] as NO3_5_ppm
        [Soil].NO3.ppm[6] as NO3_6_ppm
        [Soil].NO3.ppm[7] as NO3_7_ppm
        sum([Soil].NO3.ppm) as NO3_total
        [Soil].NO3.kgha[1] as NO3_1_kgha
        [Soil].NO3.kgha[2] as NO3_2_kgha
        [Soil].NO3.kgha[3] as NO3_3_kgha
        [Soil].NO3.kgha[4] as NO3_4_kgha
        [Soil].NO3.kgha[5] as NO3_5_kgha
        [Soil].NO3.kgha[6] as NO3_6_kgha
        [Fertiliser].NitrogenApplied
        [Cotton].Leaf.Photosynthesis.RUE
        [Cotton].Boll.N
        [Cotton].Leaf.N
        [Cotton].Stem.N
        //[FurrowIrrigation].Script.crit_fr_asw as CRITFRASW
        //[FurrowIrrigation].Script.asw_depth as ASWDEPTH
        //[FurrowIrrigation].Script.applied_furrow_irrigation as FURROW_APPLIED
        [Irrigation].IrrigationApplied
        [Cotton].Boll.HarvestIndex
        [Soil].Organic.Carbon
        [Phenology].CurrentPhaseName
        [Arbitrator].TotalDMFixationSupply
        [Phenology].BollPeriod
        [Phenology].BollFilling.Target
        [Cotton].WholePlantGrowthRate
        [Cotton].AboveGroundGrowthRate
        [Cotton].PotentialBollGrowthRate
        [Cotton].Root.NUptake
        [Cotton].Total.N
        ([Soil].SoilWater.SWmm[1]+[Soil].SoilWater.SWmm[2]+[Soil].SoilWater.SWmm[3]) as KRS_SW_Layer1
        [Cotton].Leaf.Photosynthesis.RadnInt
        ([Cotton].Leaf.Nconc/[Cotton].Leaf.SpecificArea) as SLN
        [Cotton].Leaf.RadiationIntercepted
        [MicroClimate].RadiationInterception
        [Cotton].Leaf.SLA_DynamicTEST.Beer-Lambert
        [Weather].DiffuseFraction
        //[Cotton].Leaf.SLA_DynamicTEST.SLA_Reddy1997
        //[Cotton].Leaf.Photosynthesis
        //[Cotton].SowingData.Population
        //[Cotton].Leaf.BranchNumber.FruitingBranches
        //[Cotton].Leaf.BranchNumber.VegetativeBranches
        //([Cotton].Leaf.DMDemands.Structural.DeltaLAIPotential.LeafGrowthStage.Delta.EmergingLeaves*[Cotton].Leaf.DMDemands.Structural.DeltaLAIPotential.LeafGrowthStage.Delta.PlantNumber) as NumberOfLeaves
        //[Cotton].Leaf.SLA_DynamicTEST.SLA_Reddy1989
        //[Cotton].Leaf.SLA_Reddy1989.RADint
        [Cotton].Leaf.Plastochron
        ([Cotton].Leaf.FinalLeafNumber*[Cotton].SowingData.Population) as LeafNumber
        [Cotton].Leaf.FirstFruitingBranch
        [Cotton].Leaf.TotalNumber
        [Soil].SoilWater.ESW
        [Soil].Water.PAWmm
        [Physical].PAWCmm
        [CottonSoil].PAWmm
        [CottonSoil].PAWCmm
        //[Cotton].Root.SMI
        [Cotton].Leaf.Photosynthesis
        //[Cotton].Leaf.Transpiration
        //[Cotton].Leaf.Gsmax350
        //[Cotton].Leaf.Gsmax
        //[Cotton].Leaf.SpecificArea
        //[Cotton].StomCond
        //[Cotton].Population
        //[Cotton].Leaf.SLA_DynamicTEST.SLA_Gsmax
        //[Cotton].Leaf.SLA_DynamicTEST.SpecificArea_TempPAR
        //[Cotton].Leaf.PlantSupplyDemand
        //[Cotton].Leaf.RadiationIntercepted
        //[Cotton].Leaf.Photosynthesis
        //[Cotton].Leaf.SLA_DynamicTEST.SLA_RGR
        sum([PAWCInRootZone].Script.PAWInRootZone)
        sum([PAWCInRootZone].Script.PAWCInRootZone)
        [Cotton].Root.SMI
        [Cotton].Root.PAW_ratio
        [Cotton].Leaf.RUE_DynamicTEST.CO2_CompensationPoint
        [Cotton].Leaf.RUE_DynamicTEST.Jmax25
        [Cotton].Leaf.RUE_DynamicTEST.Jmax
        [Cotton].Leaf.RUE_DynamicTEST.Cc
        [Cotton].Leaf.RUE_DynamicTEST.Iinc
        [Cotton].Leaf.RUE_DynamicTEST.CanopyLightUseEfficiency.Term1
        [Cotton].Leaf.RUE_DynamicTEST.CanopyLightUseEfficiency.MultiplyFunction.Term2
        [Cotton].Leaf.RUE_DynamicTEST.CanopyLightUseEfficiency.MultiplyFunction.Term3
        [Cotton].Leaf.RUE_DynamicTEST.CanopyLightUseEfficiency
        [Cotton].Leaf.RUE_DynamicTEST.RP
        [Cotton].Leaf.RUE_DynamicTEST.CBiom
        [Cotton].Leaf.RUE_DynamicTEST.RadiationUseEfficiency
        [Cotton].Leaf.RUE_DynamicTEST.MovingAverageRUE
        [Cotton].Leaf.Photosynthesis.RUE
        [Cotton].Leaf.Photosynthesis.RUE_Fixed
    Report HarvestReport: EventNames=[Cotton].Harvesting
      VariableNames:
        [Clock].Today
        [Cotton].Phenology.CurrentStageName
        [Cotton].Phenology.EmergenceDAS
        [Cotton].Phenology.SquaringDAS
        [Cotton].Phenology.FloweringDAS
        [Cotton].Phenology.CutoutDAS
        [Cotton].Phenology.OpenbollsDAS
        [Cotton].Phenology.MaturityDAS
        [Cotton].AboveGround.Wt
        [Cotton].Boll.Wt
    Plant Cotton: PlantType=Soybean
      OrganArbitrator Arbitrator
        BiomassTypeArbitrator DMArbitration
          Folder PotentialPartitioningMethods
            ReallocationMethod
            AllocateFixationMethod
            RetranslocationMethod
            SendPotentialDMAllocationsMethod
          Folder AllocationMethods
            NutrientConstrainedAllocationMethod
            DryMatterAllocationsMethod
          RelativeAllocation ArbitrationMethod
        BiomassTypeArbitrator NArbitration
          Folder PotentialPartitioningMethods
            ReallocationMethod
          Folder ActualPartitioningMethods
            AllocateFixationMethod
            RetranslocationMethod
          Folder AllocationMethods
            NitrogenAllocationsMethod
          RelativeAllocation ArbitrationMethod
          AllocateUptakesMethod
        NitrogenUptakeMethod
        C4WaterUptakeMethod WaterUptakeMethod
          Memo
            Taken from Sorghum model
        VariableReference SDRatio: VariableName=[Arbitrator].WaterUptakeMethod.SDRatio
        VariableReference WDemand: VariableName=[Arbitrator].WaterUptakeMethod.WDemand
        VariableReference WSupply: VariableName=[Arbitrator].WaterUptakeMethod.WSupply
        VariableReference WAllocated: VariableName=[Arbitrator].WaterUptakeMethod.WAllocated
        VariableReference WatSupply: VariableName=[Arbitrator].WaterUptakeMethod.WatSupply
        BoundFunction SDRatioBound
          VariableReference SDRatio: VariableName=[Arbitrator].WaterUptakeMethod.SDRatio
          Constant Lower: FixedValue=0
          Constant Upper: FixedValue=1.5
      Phenology
        Memo
          12/12/2023:

          SUCROS-Cotton can also be applied to estimate yield losses caused by pest damage and the magnitude of cotton **compensatory growth.**

          ===========================================================================================

          9/11/2023: From Dean

          "Hi Tiemen

          I’m not an expert on this but…

          Phenology will move from one phase to the next when the value of ‘Progression’ is > ‘Target’ so…

          The ‘Progression’ is the variable that gets tested to see if it is above target so I would use a simple VariableReference (instead of a LessThanFunction) and set it to [Phenology].FruitDemand. This will remove thermal time from this phase which I think is what you’re after.

          The ‘Target’ is used to move phenology from one phase to another. I would set the target to  ([Arbitrator].TotalDMFixationSupply.

          Try this and see if it works.
          Dean"

          7/11/2023:

          Reset to vegetative growth, see example: .Simulations.Simulation.Field.Chicory.Phenology.GotoPhase

          .Simulations.Simulation.Field.PlantainForage.Phenology.GotoPhase

          .Simulations.Simulation.Field.WhiteClover.Phenology.PhenologyRewind

          6/07/2023:

          The following crop phases are distinguished:

          Phase number | Phase Name | Initial Stage | Final stage
          -------------|------------|---------------|------------
          1 ||| Sowing
          2 | Germinating | Sowing | Germination
          3 | Emerging | Germination | Emergence
          4 | Vegetative | Emergence | StartSquaring
          5 | Squaring | StartSquaring | StartFlowering
          6 | EarlyFlowering | StartFlowering | Cutout
          7 | BollFilling | Cutout | StartOpenBolls
          8 | Maturing | StartOpenBolls | Maturity

          **4/07/2023: add TemperatureModifier for ThermalTime. --> OR JUST NEED TO REVISE XY RESPONSE OF THERMAL TIME, AND INTERPOLATION METHOD?**

          From Yeates et al., 2010: The frequency of temperatures >35°C and <11°C affected time to squaring, requiring modification of existing development models derived in temperate climates. It was concluded sowing during March to April
          should achieve the dual objectives of high yields and avoidance of rain at maturity.

          Include stress factors that can delay or speed up phenology phases?

          Temperature effect on phenology: supra (>35°C) and sub-optimal (<11°C) temperatures increasing the number of nodes to the first fruiting (1st square) --> see canola model. Use base DD x temp response x y pair. X = min or max temp (ADD TEMPERATURE EFFECT). Or at Canola.earlypoddevelopment add a stressfactor.

          **PHENOLOGY**

          The following crop phases are distinguished:

          Phase number | Phase Name | Initial Stage | Final stage
          -------------|------------|---------------|------------
          1 ||| Sowing
          2 | Germinating | Sowing | Germination
          3 | Emerging | Germination | Emergence
          4 | PreSquaring | Emergence | StartSquaring
          5 | Squaring | StartSquaring | StartFlowering
          6 | EarlyFlowering | StartFlowering | Cutout
          7 | LateFlowering | Cutout | StartBollFilling
          8 | BollFilling | StartBollFilling | StartOpenBolls
          9 | Maturing | StartOpenBolls | Maturity
          10 | ReadyForHarvesting | Maturity | HarvestRipe

          In the flowering phase **cutout** occurs when the growth rate of the fruit (FGR) = growth rate of shoot (CGR)

          The BollFilling phase can be apportioned in separate phases if needed (APSIM-OZCOT).
          See also:

          * *Hearn, A.B., 1994. OZCOT: A Simulation Model for Cotton Crop Management. Agric. Syst., 44: 257–299.*

          Phase number | Phase Name | Initial Stage | Final stage | Target
          -------------|------------|---------------|-------------|--------
          5 | Flowering | StartFlowering | StartEarlyBollDevelopment | FractionofBollFilling = 0.07
          6 | EarlyBollFilling | StartEarlyBollDevelopment | StartMidBollDevelopment | FractionofBollFilling = 0.21
          7 | MidBollFilling | StartMidBollDevelopment | StartLateBollDevelopment | FractionofBollFilling = 0.33
          8 | LateBollFilling | StartLateBollDevelopment | EndBollDevelopment | FractionofBollFilling = 0.55
          9 | EndBollFilling | EndBollDevelopment | StartOpenBolls | EntireBollFillPeriod = 400 DD
          10 | Maturing | StartOpenBolls | Maturity |

          **42 is the number of heat units from emergence until the appearance of the first fruiting branch (Constable, 1976):**

          * *Jackson, B.S., Arkin, G.F. and Hearn, A.B., 1988. The Cotton Simulation Model "COTTAM": Fruiting Model Calibration and Testing. American Society of Agricultural Engineers, 31(3): 846–854.*
        LinearInterpolationFunction B_PERprogression
          XYPairs: X=[0, 1, 1.01]; Y=[0, 0, 500000000000]
          VariableReference XValue: VariableName=[Phenology].BollPeriod
        AccumulateFunction BollPeriod: StartStageName=StartFlowering; EndStageName=HarvestRipe; FractionRemovedOnCut=0; FractionRemovedOnHarvest=0; FractionRemovedOnGraze=0; FractionRemovedOnPrune=0
          ExpressionFunction B_PER: Expression=1/EXP(5.385-0.0512*[Weather].MeanT)
        SubDailyInterpolation ThermalTime: agregationMethod=0
          Memo
            7/11/2023: Add stress factor to phenology based on temperature? See .Simulations.Canola Example.Zone.Canola.Phenology.EarlyPodDevelopment.Stress

            So, make the model work for NAR0607Ir80, and add stress to make it work for DDRF21RS1000

            7/11/2023: other examples:

            X|Y
            -|-
            15.6|0
            32|16.4
            45|0   (or 43, 40?)

            X|Y
            -|-
            15.6|0
            32|16.4
            35|16.4
            45|0

            7/11/2023: Luo, Bange, Clancy 2014: Tmax 35oC --> heat stress

            ===================================================================================

            See Bange et al., 2002: Approach two DD calculation where Tmax <35oC and Tmx >=35oC

            On 4/07/2023:

            X|Y
            -|-
            15.6|0
            32|16.4
            43|16.4
            45|0

            Base temperature of 15.6 oC and optimum temperature of 32 oC taken from:

            * *Bange, M. et al., 2022. Improving temperature‐based predictions of the timing of flowering in cotton. Agron. J., 114(5): 2728-2742.*

            U.S. Approach with:

            Squaring target - 343 DD (from planting)

            Flowering target - 584 DD (from planting)
          XYPairs Response: X=[15.6, 32, 39]; Y=[0, 16.4, 0]
          ThreeHourAirTemperature InterpolationMethod
        PhotoperiodFunction Photoperiod: Twilight=0; DayLength=0
        GerminatingPhase Germinating: Start=Sowing; End=Germination; IsEmerged=false
          Constant MinSoilTemperature: FixedValue=0
        EmergingPhase Emerging: Start=Germination; End=Emergence; IsEmerged=true; TTForTimeStep=0
          VariableReference ThermalTime: VariableName=[Phenology].ThermalTime
          AddFunction Target
            Constant ShootLag: FixedValue=10
            MultiplyFunction DepthxRate
              VariableReference SowingDepth: VariableName=[Plant].SowingData.Depth
              Constant ShootRate: FixedValue=1
        GenericPhase Vegetative: Start=Emergence; End=StartSquaring; IsEmerged=true
          SubtractFunction Target
            Constant SquaringTT: FixedValue=343
            VariableReference Emerging: VariableName=[Phenology].Emerging.Target
          VariableReference Progression: VariableName=[Phenology].ThermalTime
        GenericPhase Squaring: Start=StartSquaring; End=StartFlowering; IsEmerged=true
          SubtractFunction Target
            Constant FloweringTT: FixedValue=584
            VariableReference Emerging: VariableName=[Phenology].Emerging.Target
            VariableReference PreSquaring: VariableName=[Phenology].Vegetative.Target
          VariableReference Progression: VariableName=[Phenology].ThermalTime
        GenericPhase EarlyFlowering: Start=StartFlowering; End=Cutout; IsEmerged=true
          Memo
            8/11/2023 - Concept: **Bange, M. P., & Milroy, S. P. (2004). Growth and dry matter partitioning of diverse cotton genotypes. Field Crops Research, 87(1), 73-87. https://doi.org/10.1016/j.fcr.2003.09.007**

            Add (water)stress effect in cases where severe water deficit cutout reached earlier. See Hearn, 1969 paper where when 2/3 water supply depleted --> node production halts and plant shifts into cutout.

            From PhD Warren Conaty:

            Water stress also alters the time taken for a boll to reach maturity. Water deficits result in the hastening of maturity, whilst excessive soil water tends to slow maturity (Hearn, 1994; Hearn, 1979; Marani and Amirav, 1971b; Marani and Amirav, 1971a). This occurs as a result of the inherent plant water relations fixed within commercial cotton cultivars derived from its wild xerophytic ancestors. As a result, when two thirds of the soil water is used, vegetative growth ceases, boll setting and square production cease and the retained bolls mature. Boll setting and square production can resume, if conditions are favourable, when mature bolls open, leading to a second fruiting flush (Hearn, 1979).
          Constant Target: FixedValue=1
          MaximumFunction Progression
            SubtractFunction DailyValue
              VariableReference CurrentProgress: VariableName=[EarlyFlowering].BollRatio
              VariableReference YesterdaysProgress: VariableName=[EarlyFlowering].FractionComplete
            Constant Zero: FixedValue=0
          MinimumFunction BollRatio
            Constant One: FixedValue=1
            DivideFunction Calculation
              VariableReference PotentialBollGrowthRate: VariableName=[Cotton].PotentialBollGrowthRate
              VariableReference AboveGroundGrowthRate: VariableName=[Cotton].AboveGroundGrowthRate
        GenericPhase BollFilling: Start=Cutout; End=StartOpenBolls; IsEmerged=true
          Memo
            On Thermal time use:

            Target = 100

            Progression = [Phenology].ThermalTime

            ==========================================================

            When Progression >1, move to next phase
          Constant Target: FixedValue=400000
          VariableReference Progression: VariableName=[Phenology].B_PERprogression
        GenericPhase Maturing: Start=StartOpenBolls; End=Maturity; IsEmerged=true
          Memo
            From PhD Warren Conaty:

            Page 28/29: Water stress also alters the time taken for a boll to reach maturity. Water deficits result in the hastening of maturity, whilst excessive soil water tends to slow maturity (Hearn, 1994; Hearn, 1979; Marani and Amirav, 1971b; Marani and Amirav, 1971a).
          SubtractFunction Target
            ExpressionFunction MaturityDuration: Expression=0.81*([Phenology].CutoutDAS)+73
            VariableReference BollFilling: VariableName=[Phenology].OpenbollsDAS
          Constant Progression: FixedValue=1
        GenericPhase Ripening: Start=Maturity; End=HarvestRipe; IsEmerged=true
          Constant Target: FixedValue=50
          VariableReference Progression: VariableName=[Phenology].ThermalTime
        EndPhase ReadyForHarvesting: Start=HarvestRipe; End=Unused; IsEmerged=true
          VariableReference ThermalTime: VariableName=[Phenology].ThermalTime
        OnEventFunction EmergenceDAS: SetEvent=Emergence; ReSetEvent=never
          Memo
            A function is used to provide emergence date as days after sowing(DAS).
          Constant PreEventValue: FixedValue=0
          VariableReference PostEventValue: VariableName=[Plant].DaysAfterSowing
        OnEventFunction SquaringDAS: SetEvent=StartSquaring; ReSetEvent=never
          Memo
            A function is used to provide squaring date as days after sowing(DAS).
          Constant PreEventValue: FixedValue=0
          VariableReference PostEventValue: VariableName=[Plant].DaysAfterSowing
        OnEventFunction FloweringDAS: SetEvent=StartFlowering; ReSetEvent=never
          Memo
            A function is used to provide flowering date as days after sowing(DAS).
          Constant PreEventValue: FixedValue=0
          VariableReference PostEventValue: VariableName=[Plant].DaysAfterSowing
        OnEventFunction CutoutDAS: SetEvent=Cutout; ReSetEvent=never
          Memo
            A function is used to provide emergence date as days after sowing(DAS).
          Constant PreEventValue: FixedValue=0
          VariableReference PostEventValue: VariableName=[Plant].DaysAfterSowing
        OnEventFunction OpenbollsDAS: SetEvent=StartOpenBolls; ReSetEvent=never
          Memo
            A function is used to provide flowering date as days after sowing(DAS).
          Constant PreEventValue: FixedValue=0
          VariableReference PostEventValue: VariableName=[Plant].DaysAfterSowing
        OnEventFunction MaturityDAS: SetEvent=Maturity; ReSetEvent=never
          Memo
            A function is used to provide maturity date as days after sowing(DAS).
          Constant PreEventValue: FixedValue=0
          VariableReference PostEventValue: VariableName=[Plant].DaysAfterSowing
      SimpleLeaf Leaf: Albedo=0.25; Gsmax350=0.011; R50=150; LeafInitialisationStage=Emergence; Height=0; BaseHeight=0; Width=0; FRGR=0; PotentialEP=0; WaterDemand=0; KDead=0.2; LAIDead=0
        Memo
          16/05/2023:

          Leaf senescence from flowering:
          - water
          - age
          - shade

          Leaf area reduction:
          - water
          - temp?
          - nitrogen?

          =================================================

          AreaLargestLeaf should be larger

          AND

          SpecificArea (SLA) should be more flexible

          ==================================================

          Canopy growth should go steeper in begin phases. There seems to be a lag?

          ==================================================

          Crop Phases:

          Phase number | Phase
          -------------|------
          1 | Sowing
          2 | Germination
          3 | Emergence
          4 | StartSquaring
          5 | StartFlowering
          6 | Cutout
          7 | StartBollFilling
          8 | StartOpenBolls
          9 | Maturity
          10 | HarvestRipe
        Folder SLA_DynamicTEST
          PhaseLookupValue SLA_Reddy1989: Start=Emergence; End=HarvestRipe
            Memo
              Reddy, V. R., Acock, B., Baker, D. N., & Acock, M. (1989). Seasonal Leaf Area-Leaf Weight Relationships in the Cotton Canopy. Agronomy Journal, 81(1), 1-4.

              Adapted from:

              (26.01-(2.68*ln([Cotton].Leaf.SLA_Reddy1989.RADint)))/1000

              Using SLA data from DDRF21RS1000
            ExpressionFunction Function: Expression=(0.0473-(0.013*ln([Cotton].Leaf.SLA_Reddy1989.RADint)))
            MovingAverageFunction RADint: NumberOfDays=3; StageToStartMovingAverage=Sowing
              DivideFunction
                VariableReference DailyRate: VariableName=[Weather].Radn
                Constant: FixedValue=2.02
          PhaseLookupValue SLA_Reddy1997: Start=Emergence; End=HarvestRipe
            Memo
              Reddy, K. R., Hodges, H. F., & McKinion, J. M. (1997). Crop Modeling And Applications: A Cotton Example. Advances in Agronomy, 59, 225–290.
            DivideFunction
              Constant One: FixedValue=0.01
              ExpressionFunction Function
                Expression=2.05-(0.1010*([Weather].MeanT))+(0.001593*(([Weather].MeanT)*([Weather].MeanT)))
          ExpressionFunction SLA: Expression=(0.0473-(0.013*ln(([Weather].Radn)/2.02)))
            Memo
              Based on Reddy 1989 using data from DDRFRS1000, NAR0607Ir80, Rose0203_C, KRS19CvSicot_748B3F
          ExpressionFunction Beer-Lambert: Expression=1-EXP((-([Leaf].ExtinctionCoefficient)*([Leaf].LAI))
          ExpressionFunction Function: Expression=(0.0473-(0.013*ln([Cotton].Leaf.SLA_Reddy1989.RADint)))
            MovingAverageFunction RADint: same as Replacements.Cotton.Leaf.SLA_DynamicTEST.SLA_Reddy1989.RADint
          ExpressionFunction SLA_Gsmax
            Expression=-0.0194+(0.605*[Cotton].StomCond)-(0.000664*[Cotton].VPD)+(0.00159*[Cotton].MeanT)
          ExpressionFunction SpecificArea_TempPAR
            Expression=0.112-(0.00966*[Cotton].MeanT)+(0.000236*([Cotton].MeanT*[Cotton]MeanT))+(0.00382*([Cotton].Radn/2.02))-(0.000171*([Cotton].MeanT*([Cotton].Radn/2.02))
          ProtectedDivideFunction PlantSupplyDemand: NumeratorErrVal=0; DenominatorErrVal=2
            VariableReference LeafSupply: VariableName=[Cotton].Arbitrator.DM.TotalFixationSupply
            VariableReference LeafDemand: VariableName=[Cotton].Arbitrator.DM.TotalPlantDemand
          ExpressionFunction SLA_RGR: Expression=(644.65*([Cotton].WholePlantGrowthRate)+7.0596)/1000000
        Folder RUE_DynamicTEST
          ExpressionFunction CO2_CompensationPoint
            Expression=35*EXP((32000/8.314)*((1/298)-(1/(([Weather].MeanT)+273.15))
          ExpressionFunction Jmax25: Expression=100*(2)
            Memo
              Can make this dynamic, based on leaf N content
          MultiplyFunction Jmax
            MultiplyFunction
              VariableReference Jmax25: VariableName=[Cotton].Leaf.RUE_DynamicTEST.Jmax25
              ExpressionFunction Term1: Expression=EXP((32000/8.314)*((1/298)-(1/(([Weather].MeanT)+273.15))
            DivideFunction
              ExpressionFunction Term2: Expression=1+EXP((200000/8.314)*((650/200000)-(1/298)))
              ExpressionFunction Term3
                Expression=1+EXP((200000/8.314)*((650/200000)-(1/(([Weather].MeanT)+273.15)))
          MultiplyFunction Cc
            Constant: FixedValue=0.5
            VariableReference CO2ppm: VariableName=[Weather].CO2
          MultiplyFunction Iinc
            VariableReference Radiation: VariableName=[Weather].Radn
            Constant Constant1: FixedValue=11.57
            Constant Constant2: FixedValue=2.02
          DivideFunction CanopyLightUseEfficiency
            ExpressionFunction Term1
              Expression=(([Cotton].Leaf.RUE_DynamicTEST.Cc)-([Cotton].Leaf.RUE_DynamicTEST.CO2_CompensationPoint))*0.8
            MultiplyFunction
              ExpressionFunction Term2
                Expression=4*(([Cotton].Leaf.RUE_DynamicTEST.Cc)+(2*([Cotton].Leaf.RUE_DynamicTEST.CO2_CompensationPoint))
              ExpressionFunction Term3
                Expression=(1+0.8+((0.8*([Cotton].Leaf.ExtinctionCoefficient)*([Cotton].Leaf.RUE_DynamicTEST.Iinc))/([Cotton].Leaf.RUE_DynamicTEST.Jmax))
          Constant RP: FixedValue=0.35
          Constant CBiom: FixedValue=0.45
          ExpressionFunction RadiationUseEfficiency
            Expression=(([Cotton].Leaf.RUE_DynamicTEST.CanopyLightUseEfficiency*(1-[Cotton].Leaf.RUE_DynamicTEST.RP)*12*4.56*0.5)/[Cotton].Leaf.RUE_DynamicTEST.CBiom
          MovingAverageFunction MovingAverageRUE: NumberOfDays=7; StageToStartMovingAverage=Emergence
            VariableReference DailyRate: VariableName=[Cotton].Leaf.RUE_DynamicTEST.RadiationUseEfficiency
        LinearInterpolationFunction WaterStressFunction
          Memo
            06/02/2024:

            [Leaf].FW

            or

            [Root].SMI

            ???

            ===========================================================================================

            21/12/2023

            Height as a function of nodes. See H/N ratio Rose data.

            Spreadsheet "Observed_Data.xlsx" in

            C:\Users\rhe005\OneDrive - CSIRO\Work Files\00. APSIM NEXTGEN\Toowoomba 27 Feb to 3 Mar\Validation Data Sets\Rose Roche PhD data

            ===========================================================================================

            **THIS NEEDS TO BE REVISED**

            ===========================================================================================

            In APSIM-OZCOT, height is based off stem weight if have XY pairs on observed data (see also chickpea example).

            In *Zhang, L. et al., 2021. Development and validation of SUCROS-Cotton: a potential crop growth simulation model for cotton. NJAS: Wageningen Journal of Life Sciences, 56(1-2): 59-83.*

            --> Plant height is modelled as a linear function of (T) until growth is terminated by removal of the top bud ('cut-out')

            --> Final plant height is also a function of the extension of main stem nodes

            I used XY pairs from *CottonObserved 20230124.xlsx*

            ===========================================================================================

            On 08/05/2023:

            XY values taken from NAR0607Ir80 data

            Before 08/05/2023 (from DDRF-RS trial):

            X|Y
            -|-
            0|10
            50|540
            100|750
            150|950
            200|1165
            250|1380
            300|1580
          XYPairs: X=[0, 1]; Y=[0, 1]
          VariableReference XValue: VariableName=[Leaf].FW
        RUEModel Photosynthesis
          VariableReference RUE: VariableName=[Cotton].Leaf.RUE_DynamicTEST.MovingAverageRUE
          Constant RUE_Fixed: FixedValue=1.2
            Memo
              15/12/2023 - **For dynamic RUE** see:

              Yin, X., Struik, P. C., & Goudriaan, J. (2021). On the needs for combining physiological principles and mathematics to improve crop models. Field Crops Research, 271. https://doi.org/10.1016/j.fcr.2021.108254

              ================================================================================================================================================

              Variation in Crop Radiation-Use Efficiency with Increased Diffuse Radiation. Published in Crop Sci. 32:1281-1284 (1992). Sinclair et al.
              --> use of diffuse radiation to determine RUE

              ================================================================================================================================================

              FROM:

              Chapter 22. CottonJ. Snider, M. Bange and J. HeitholtIn: Crop Physiology. Case Histories for Major Crops, edited by V. O. Sadras and D. F. Calderini2021

              "To encapsulate effects of changes in canopy radiation interception and/or changes in canopy photosynthesis, physiological frameworks have been developed to scale from leaf to canopy (Sinclair and Horie, 1989; Hammer and Wright 1994). With this framework, Sadras (1996) explained ontogenetic changes in cotton RUE, and Milroy and Bange (2003) explored the effects of average canopy specific leaf nitrogen (SLN g N m− 2), vertical N gradients (SLNgrad), extinction coefficient k and LAI. Sensitivity analyses indicated that RUE is responsive to SLNgrad and to a lesser extent, k (Fig. 22.7). Although the importance of these traits has been demonstrated in other crops, it has also been shown that they are of most significance at high LAI (Hirose and Werger, 1987). When the impact of SLNgrad on RUE was tested at different LAI, no impact was evident at low LAI, but a large impact was evident at LAI of 5. Although LAI of this magnitude can occur in cotton crops, lower LAI are more common with critical LAI being approximately 3 (Section 2.1.2). Thus the central finding is that there appears to be little impact of the ontogenetic changes in k and SLNgrad on the variation in RUE of cotton. For crop simulation purposes, this simplifies the process of adjusting RUE."

              See also:

              Nitrogen and Light Responses of Cotton Photosynthesis and Implications for Crop GrowthS. P. Milroy and M. P. BangeCrop Science 2003 Vol. 43 Pages 904-913

              =================================================================================================================================================================

              Radiation Use EfficiencyT. R. Sinclair and R. C. MuchowIn: Advances in Agronomy Volume 651999 DOI 10.1016/s0065-2113(08)60914-1

              =================================================================================================================================================================

              **13/07/2023**

              RUE has been shown both experimentally and theoretically to be increased by decreased irradiance and by increased fractions of diffuse radiation. On the other hand, there is little evidence to show that VPD greatly influences RUE.

              Occam's Razor, radiation-use efficiency, and vapor pressure deficit

              T.R. Sinclair, R.C. Muchow

              **13/07/2023**

              Changed XY from:

              X|Y
              -|-
              5|1.52
              40|0.55

              to

              X|Y
              -|-
              5|2
              40|0.5

              2.5 and 1 works also, more in line with publication Gonias & Oosterhuis 2012 (Figure 4)

              **--> THIS SEEMS TO WORK WELL, ESPECIALLY FOR DDRF ROW SPACING**

              ========================================================================================================

              RUE as function of VDP:

              **Gonias, E.D., Oosterhuis, D.M., Bibi, A.C. and Roberts, B.A., 2012. Radiation Use Efficiency of Cotton in Contrasting Environments. American Journal of Plant Sciences, 3: 649-654.*

              The higher productivity observed in California can be attributed to larger amounts of incident and intercepted radiation in this location. Radiation use efficiency of cotton was estimated to decrease with increasing vapor pressure deficit by a slope of –0.47 g·MJ–1·kPa–1. (this is in PAR, so divide by 2):

              **y=-0.4628x + 2.7767**

              VPD|RUE
              -|-
              5|1.27
              40|0.46

              --> ADD 20% FOR ROOT BIOMASS --> X=5,40; Y=1.52,0.55

              =====================================================

              FROM:

              Cotton photosynthetic productivity enhancement through uniform row-spacing with optimal plant density in Xinjiang, China

              Liting Hu1,# Xuebiao Pan1 XiaochenWang1 Qi Hu1 XiangruWang2 Hengheng Zhang2 Qingwu Xue3 Meizhen Song2

              Crop Science. 2021;61:2745–2758.

              Plant density (/m2) | RUE
              --------------------|-----
              5| 1.2
              25| 2.5

              Relationship between Ground Cover and RUE? Ground cover is related to LAI, where LAI=3 = Groundcover 1.0

              The impact of plant density and spatial arrangement on light interception on cotton crop and seed cotton yield: an overview

              CHAPEPA et al. Journal of Cotton Research (2020) 3:18 Journal of Cotton Research

              https://doi.org/10.1186/s42397-020-00059-z

              Need to distinguish between normal and okra sized leaves

              The maximum reported RUE for cotton is similar to other C3 species (peanut and soybean) reported in Sinclair
              and Muchow (1999).

              Values for RUE:

              **TABLE 22.1**

              * *Snider, J., Bange, M. and Heitholt, J., 2021. Chapter 22. Cotton. In: V.O. Sadras and D.F. Calderini (Editors), Crop Physiology. Case Histories for Major Crops, pp. 715-746.*

              Cotton root system may constitute 20-25% of the crop dry matter increase for part of the season:
              * *Bland, W.L. and Dugas, W.A., 1989. Cotton Root Growth and Soil Water Extraction. Soil Sci. Soc. Am. J., 53: 1850-1855.*
          WeightedTemperatureFunction FT: MaximumTemperatureWeighting=0.5
            Memo
              X|Y
              -|-
              8|0
              25|1
              35|1
              45|0

              Change to:

              X|Y
              -|-
              10|0
              23.5|1
              32|1
              45|0

              ============================

              SEE PHD CONATY

              ============================

              Base temp of 10 oC from:

              Snider, J.L. et al., 2022. Net photosynthesis acclimates to low growth temperature in cotton seedlings by shifting temperature thresholds for photosynthetic component processes and respiration. Environ. Exp. Bot., 196.

              Combing data from:

              **FIG. 2**

              * *Conaty, W.C., Burke, J.J., Mahan, J.R., Neilsen, J.E. and Sutton, B.G., 2012. Determining the Optimum Plant Temperature of Cotton Physiology and Yield to Improve Plant-Based* Irrigation Scheduling. Crop Sci., 52(4): 1828-1836.

              **FIG. 22.4**

              * *Snider, J., Bange, M. and Heitholt, J., 2021. Chapter 22. Cotton. In: V.O. Sadras and D.F. Calderini (Editors), Crop Physiology. Case Histories for Major Crops, pp. 715-746.*

              Using a base temp of 10 oC

              OZCOT uses base temperature of 8 oC for assimilate production

              From:

              * *Constable, G.A. and Bange, M.P., 2015. The yield potential of cotton (Gossypium hirsutum L.). Field Crops Res., 182: 98-106.*

              --> With a base temperature for development of 11.4–15 ◦C (Moraghan et al., 1968; Constable, 1976; Kerby et al., 1987), thermal kinetic window of 23.5–32.0 ◦C (Burke et al., 1988), and physiological optimum of 28 ◦C (Conaty et al., 2012).
            XYPairs: X=[8, 23.5, 32, 45]; Y=[0, 1, 1, 0]
          LinearInterpolationFunction FVPD
            Memo
              Photosynthesis was relatively insensitive to VPD as it decreased on average only 13% (SD = 5.0, n = 42) from the maximum photosynthetic rate over a wide range of VPD (1 kPa~4 kPa)

              **FIG. 2C**

              * *Duursma, R.A. et al., 2013. Near-optimal response of instantaneous transpiration efficiency to vapour pressure deficit, temperature and [CO2] in cotton (Gossypium hirsutum L.). Agric. For. Meteorol., 168: 168-176.*
            XYPairs: X=[0, 10, 40]; Y=[1, 1, 0.87]
            VariableReference XValue: VariableName=[Leaf].Photosynthesis.VPD
          LinearInterpolationFunction FN
            XYPairs: X=[0, 1, 1.5]; Y=[0, 1, 1]
            VariableReference XValue: VariableName=[Leaf].Fn
          LinearInterpolationFunction FW
            XYPairs: X=[0, 1]; Y=[0, 1]
            VariableReference XValue: VariableName=[Leaf].Fw
          RUECO2Function FCO2: PhotosyntheticPathway=C3
          VariableReference RadnInt: VariableName=[Leaf].RadiationIntercepted
        StomatalConductanceCO2Modifier
          VariableReference PhotosynthesisCO2Modifier: VariableName=[Leaf].Photosynthesis.FCO2
        MultiplyFunction Area
          VariableReference SLA: VariableName=[Leaf].SpecificArea
          VariableReference LeafLiveWt: VariableName=[Leaf].Live.Wt
        MinimumFunction FRGR
          VariableReference RUE_FT: VariableName=[Leaf].Photosynthesis.FT
          VariableReference RUE_FN: VariableName=[Leaf].Photosynthesis.FN
          VariableReference RUE_FVPD: VariableName=[Leaf].Photosynthesis.FVPD
        Constant ExtinctionCoefficient: FixedValue=0.69
          Memo
            4/12/2023:

            Extinction coefficient and row spacing / plant density?
        LinearInterpolationFunction HeightFunctionOLD
          Memo
            21/12/2023

            Height as a function of nodes. See H/N ratio Rose data.

            Spreadsheet "Observed_Data.xlsx" in

            C:\Users\rhe005\OneDrive - CSIRO\Work Files\00. APSIM NEXTGEN\Toowoomba 27 Feb to 3 Mar\Validation Data Sets\Rose Roche PhD data

            ====================================

            **THIS NEEDS TO BE REVISED**

            ===============================

            In APSIM-OZCOT, height is based off stem weight if have XY pairs on observed data (see also chickpea example).

            In *Zhang, L. et al., 2021. Development and validation of SUCROS-Cotton: a potential crop growth simulation model for cotton. NJAS: Wageningen Journal of Life Sciences, 56(1-2): 59-83.*

            --> Plant height is modelled as a linear function of (T) until growth is terminated by removal of the top bud ('cut-out')

            --> Final plant height is also a function of the extension of main stem nodes

            I used XY pairs from *CottonObserved 20230124.xlsx*

            ===================================================================================

            On 08/05/2023:

            XY values taken from NAR0607Ir80 data

            Before 08/05/2023 (from DDRF-RS trial):

            X|Y
            -|-
            0|10
            50|540
            100|750
            150|950
            200|1165
            250|1380
            300|1580
          XYPairs: X=[0, 40, 100, 200, 250]; Y=[5, 300, 550, 720, 800]
          VariableReference XValue: VariableName=[Stem].Wt
        AddFunction HeightFunction
          Constant Initial: FixedValue=5; Units=mm
          AccumulateFunction Change: StartStageName=Emergence; EndStageName=Cutout; FractionRemovedOnCut=1; FractionRemovedOnHarvest=1; FractionRemovedOnGraze=1; FractionRemovedOnPrune=0
            MultiplyFunction DailyIncrease
              VariableReference DeltaNode: VariableName=[Leaf].NodeNumber.Change.DeltaNode
              PhaseLookup PotentialRate
                PhaseLookupValue PreSquaring: Start=Emergence; End=StartSquaring
                  Constant Rate: FixedValue=50; Units=mm
                PhaseLookupValue PostSquaring: Start=Emergence; End=Cutout
                  Constant Rate: FixedValue=90; Units=mm
                PhaseLookupValue PostCutOut: Start=Emergence; End=StartSquaring
                  Constant Rate: FixedValue=0; Units=mm
              WeightedTemperatureFunction TemperatureEffect: MaximumTemperatureWeighting=0.5
                Memo: same as Replacements.Cotton.Leaf.Photosynthesis.FT.Memo
                XYPairs: X=[7, 27, 32, 40]; Y=[1, 1, 1, 0.5]
              LinearInterpolationFunction VPDEffect
                XYPairs: X=[0, 20, 25, 30]; Y=[1, 1, 0.5, 0]
                VariableReference XValue: VariableName=[Weather].VPD
        MultiplyFunction Phyllochron
          Constant: FixedValue=1
          LinearInterpolationFunction Potential
            Memo
              1. Need to develop ThermalTime for Phyllochron in [Cotton].Phenology
              2. Use 42 DD

              ====================================================================

              From PhD Warren Conaty:

              The morphogenic relationship with temperature is described by the accumulation of degree days over a **base temperature of 12 °C**, where a new node is produced every **40 degree days** provided other factors are not limiting (Hearn and Constable, 1984)

              **NOTE**

              Changed phyllochron to 35 (for better fit) and removed 100 at cutout because nitrogen is mobilized at this point. N stress very high and ceases node production

              42 DD from:

              * *Northern Australia Broadacre Cropping Manual. 2022. NT Farmers*

              41 DD from:

              * *Constable, G.A., 1986. Growth and light receipt by mainstem cotton leaves in relation to plant density in the field. Agric. For. Meteorol., 37: 279-292.*

              43 DD60 from:

              * *Stewart, J.M., Oosterhuis, D., Heitholt, J.J. and Mauney, J. (Editors), 2010. Physiology of Cotton, 563 pp.* (page 306).

              "Early-season node development is highly linearly related (R2 = 0.95) to DD60 accumulation (Kerby et al., 1997). From emergence until about the 15th node, a new node is produced on average every 43 DD60."
            XYPairs: X=[3, 4, 5, 6]; Y=[32, 32, 32, 32]
            VariableReference XValue: VariableName=[Phenology].Stage
        AddFunction NodeNumber
          Memo Memo1
            The mainstem was therefore a simple parameter for the effect of age, temperature and water on the development of plant structure.

            The relationship was explained by a model in which fruiting branches compete with one another. The structure of the crop plants, as measured by the types and number of nodes, developed along a course in time determined by variety and spacing at a rate dependent on temperature.

            The rate decreased with age, but was **independent of the quantity of water available**, **until a critical amount had been used, when development stopped abruptly.**

            **--> USE ASPF FACTOR to stop node production?!?!?**

            From PhD Warren Conaty:

            The relationship between morphogenesis and water supply in cotton is that once the cropgerminates, **morphogenesis is unaffected by water supply until approximately two-thirds of available water has been depleted**. At this point, the production of squares ceases, and if water supply is not replenished crop growth terminates and the set fruit is matured (Hearn and Constable, 1984).

            ========================

            * Use separate thermal time in phenology for phyllochron?
            * fruitload slows down node-development and halts at cutout

            ========================

            FROM: *Hearn, A.B., 1994. The principles of cotton water relations and their application in management. In: G.A. Constable and N.W. Forrester (Editors), Challenging the Future: Proceedings of the World Cotton Research Conference. CSIRO, Brisbane, Australia, pp. 66–92.*

            The plants with different amounts of stored water
            develop at the same rate unaffected by the amount of water,
            until approximately three quarters is exhausted, whereupon
            morphological development and vegetative growth stop
            abruptly. Consequently, the final size and shape of the plants
            grown with different amounts of stored water look like
            successive stages of one crop, which in effect is what they are.
            This pattern of development is well adapted for survival in
            arid' and semi-arid environments where the water supply
            from rainfall or floods is erratic and variable. It allows the
            plant to make full use of supplies which can va1y greatly from
            one event or season to the next. When the supply is large,
            development continues for longer to give a larger plant and
            heavier yield, when the supply is !imaU the reverse occurs.
            The key is that the plant somehow recognises that the water
            supply is running out (the dry 'signal' in Fig. 2), and in
            response stops further morphological development and
            concentrates on maturing the fruit already set.
          Memo
            **06/11/2023: add temp effect to node development

            **12/07/2023 --> add temperature effect? Above 35oC no node development?? or at least slows down (see site MRF21) --> add to phenology thermal time calculations?**

            **Nodes develop slower with water stress!!!!!**

            ======================================================================

            ADD WATER STRESS HERE!

            WATER STRESS HALTS NODE PRODUCTION --> SEE KRS19RF DATA!

            TEMP EFFECT?

            ALSO ADD COVER EFFECT:

            SEE DDRF-RS DATA --> 0.5 M TREATMENT LESS NODES, AT COVER CLOSURE HALT NODE PRODUCTION

            Node production as function of day degree accumulation.

            **Need to add a term that provides negative feedback from metabolic stress (as fruit load increases and cutout is reached), eventually halting node (in Hearn, 1994: node = site) production.**

            Stage name to stop accumulation set on **cutout**
          Constant Initial: FixedValue=0
          AccumulateFunction Change: StartStageName=Emergence; EndStageName=Cutout; FractionRemovedOnCut=1; FractionRemovedOnHarvest=1; FractionRemovedOnGraze=1; FractionRemovedOnPrune=0
            MultiplyFunction DeltaNode
              Memo WaterFactor
                23/01/2024

                WATERFACTOR:

                XYPairs:

                X | Y
                --|--
                1.0 | 0
                1.2 | 1 --> removed and set to zero to test ndoe production

                XValue:

                [Arbitrator].SDRatioBound

                =====================================================

                11/12/2023

                Leaf.FW waterfactor?

                **30/11/2023**

                WATERFACTOR:

                XYPairs:

                X | Y
                --|--
                1.0 | 0
                1.5 | 1

                XValue:

                [Arbitrator].SDRatioBound

                =====================================================

                3/11/2023

                Changed:

                X | Y
                --|--
                0.5 | 0
                1.5 | 1

                To:

                X | Y
                --|--
                1 | 0
                1.5 | 1

                =====================================================

                This should be calculated for the rooting depth only!!!!!
              LinearInterpolationFunction FruitLoad
                XYPairs: X=[0, 1]; Y=[1, 0.5]
                VariableReference XValue: VariableName=[Phenology].EarlyFlowering.BollRatio
                Memo
                  3/11/2023

                  Changed:

                  X | Y
                  --|--
                  0.5 | 0
                  1.5 | 1

                  To:

                  X | Y
                  --|--
                  1 | 0
                  1.5 | 1

                  =====================================================

                  This should be calculated for the rooting depth only!!!!!
              LinearInterpolationFunction NitrogenStress
                XYPairs: X=[0, 1]; Y=[0.5, 1]
                VariableReference XValue: VariableName=[Leaf].Fn
              LinearInterpolationFunction WaterStress
                XYPairs: X=[1, 1.2]; Y=[1, 1]
                VariableReference XValue: VariableName=[Arbitrator].SDRatioBound
              LessThanFunction PotentialRate
                VariableReference TTsinceEmergence: VariableName=[Phenology].Vegetative.ProgressThroughPhase
                ExpressionFunction Target: Expression=[Leaf].Phyllochron
                Constant Zero: FixedValue=0
                DivideFunction Delta
                  Memo
                    Use different thermal time for phyllochron? --> mainstem node accumulation

                    "Vegetative thermal time" see Mungbeanand Peanut model
                  VariableReference ThermalTime: VariableName=[Phenology].ThermalTime
                  VariableReference Phyllochron: VariableName=[Leaf].Phyllochron
        OnEventFunction FirstFruitingBranch: SetEvent=StartSquaring; ReSetEvent=0
          Constant PreEventValue: FixedValue=0
          SubtractFunction PostEventValue
            ExpressionFunction NodeNumberROUND: Expression=floor([Leaf].NodeNumber+0.5)
            Constant Two: FixedValue=2
        AddFunction BranchNumber
          PhaseLookupValue FruitingBranches: Start=StartSquaring; End=Cutout
            Memo
              **23/01/2024**

              **Need this to start accumulating from when FirstFruitingBranch is initiated**

              ===================================================================================================================

              8/1/12/2023

              Differentiate in fruiting and vegetative branch appearance.

              Node of first fruiting branch / the appearance of the first fruiting branch is sensitive to a number of environmental factors (Hesketh and Low, 1966; Moraghan et al., 1968)

              FROM: The Cotton Simulation Model "COTTAM": Fruiting Model Calibration and TestingB. S. Jackson, G. F. Arkin and A. B. HearnAmerican Society of Agricultural Engineers 1988 Vol. 31 Issue 3 Pages 846–854

              Each branch originates at a node on the main stem. The ﬁrst branches to form are vegetative, and after the ﬁrst fruiting branch arises generally no new vegetative branches are produced, FROM:

              A qualitative simulation model for cotton growth and developmentR. E. Plant, T. A. Kerby, L. J. Zelinski and D. S. MunkComputers and Electronics in Agriculture 1998 Vol. 20 Pages 165-183

              PLANT DENSITY effect on VB initiation

              ===================================================================================================================

              SEE BRANCHING IN CANOLA MODEL

              ===================================================================================================================

              For TEMP effects on branching see:

              Hodges, H.F., Reddy, K.R., McKinion, J.M. and Reddy, V.R., 1993. Temperature Effects on Cotton, Mississippi State University, Mississippi, USA.

              Distinguish between Vegetative and Fruiting branching? Seems to be a different relationship with temperature: FIG. 6A page 5
            AddFunction
              Constant: FixedValue=2
              AccumulateFunction FB: StartStageName=StartSquaring; EndStageName=Cutout; FractionRemovedOnCut=0; FractionRemovedOnHarvest=0; FractionRemovedOnGraze=0; FractionRemovedOnPrune=0
                MultiplyFunction FB
                  Memo
                    8/1/12/2023

                    Differentiate in fruiting and vegetative branch appearance.

                    Node of first fruiting branch / the appearance of the first fruiting branch is sensitive to a number of environmental factors (Hesketh and Low, 1966; Moraghan et al., 1968)

                    FROM: The Cotton Simulation Model "COTTAM": Fruiting Model Calibration and TestingB. S. Jackson, G. F. Arkin and A. B. HearnAmerican Society of Agricultural Engineers 1988 Vol. 31 Issue 3 Pages 846–854

                    Each branch originates at a node on the main stem. The ﬁrst branches to form are vegetative, and after the ﬁrst fruiting branch arises generally no new vegetative branches are produced, FROM:

                    A qualitative simulation model for cotton growth and developmentR. E. Plant, T. A. Kerby, L. J. Zelinski and D. S. MunkComputers and Electronics in Agriculture 1998 Vol. 20 Pages 165-183

                    PLANT DENSITY effect on VB initiation

                    =================================================

                    SEE BRANCHING IN CANOLA MODEL

                    =================================================

                    For TEMP effects on branching see:

                    Hodges, H.F., Reddy, K.R., McKinion, J.M. and Reddy, V.R., 1993. Temperature Effects on Cotton, Mississippi State University, Mississippi, USA.

                    Distinguish between Vegetative and Fruiting branching? Seems to be a different relationship with temperature: FIG. 6A page 5
                  VariableReference DeltaNode: VariableName=[Leaf].NodeNumber.Change.DeltaNode
          PhaseLookupValue VegetativeBranches: Start=StartSquaring; End=Cutout
            AccumulateFunction VB: StartStageName=StartSquaring; EndStageName=Cutout; FractionRemovedOnCut=0; FractionRemovedOnHarvest=0; FractionRemovedOnGraze=0; FractionRemovedOnPrune=0
              Memo
                Do we need to separate out the max leaf area on the VB compared with the fruiting branches?

                DM Supply/demand ratio on VB appearance?

                Or change to shading effect?

                ==================================================

                FROM:

                High plant density inhibits vegetative branching in cotton by altering hormone contents and photosynthetic productionT. Li, Y. Zhang, J. Dai, H. Dong and X. KongField Crops Research 2019 Vol. 230 Pages 121-131DOI: 10.1016/j.fcr.2018.10.016

                5. Conclusion
                High plant density significantly inhibited VB growth and develop-
                ment through a set of physiological changes and associated gene ex-
                pression. **The decreased photosynthesis** resulting from reduced RuBP
                carboxylase activity and chlorophyll content in VB leaves was one of
                the main reasons for the poor VB growth. High plant density promoted
                the apical dominance which increased the expression of GhYUC5 gene
                and IAA content in the main-stem tips and induced the expression of
                GhPIN1 to promote IAA transport from the apical part to the root. The
                increased IAA content and expression of GhPIN1 increased the SLs
                content by increasing the expression of GhD14 and reducing the content
                of CKs by decreasing the expression of GhIPT3 in the VB tips. Moreover,
                high plant density led to shade avoidance syndrome, which decreased
                the IAA content and auxin polar transport by down-regulating GhYUC5,
                GhPIN1 and GhPIN5 genes. It also decreased the CKs content by down-
                regulating the GhIPT3 gene, and the GA and BR contents in the VB tips,
                but increased the content of SLs in the VB tips by up-regulating GhD14.
                The decreased IAA, CKs, GA and BR contents along with the increased
                SLs content in the VB tips was another important reason for the in-
                hibited growth and development of VB
              MultiplyFunction VB
                VariableReference DeltaNode: VariableName=[Leaf].NodeNumber.Change.DeltaNode
                LinearInterpolationFunction BranchingRate
                  XYPairs: X=[1, 3.9, 4, 6.9, 7, 30]; Y=[0, 0, 0, 0, 0, 0]
                  VariableReference XValue: VariableName=[Leaf].NodeNumber
                LinearInterpolationFunction DensityFactor
                  XYPairs: X=[7, 8.6, 10.4, 11]; Y=[1, 0.44, 0.27, 0.15]
                  VariableReference XValue: VariableName=[Cotton].SowingData.Population
          Memo
            29/01/2029:

            Add coverfactor --> see peanut

            I have cover data from the RS trial from ceptometer
        AccumulateFunction Sites: StartStageName=Emergence; EndStageName=Cutout; FractionRemovedOnCut=1; FractionRemovedOnHarvest=1; FractionRemovedOnGraze=1; FractionRemovedOnPrune=0
          Memo
            11/12/2023:

            Add site reduction factors here:

            * Density
            * Water stress
            * (Variety)

            In OZCOT, site number is reduced by **PLANT POPULATION** and **NITROGEN STRESS**

            ==============================================================================================

            11/12/2023: add node number here as well

            Different phyllochron for leaf appearance of Fruiting Branches compared with mainstem:

            * *Reddy, K.R., Hodges, H.F. and McKinion, J.M., 1997. Modeling temperature effects on cotton internode and leaf growth. Crop Sci., 37(2): 503-509.*
          PhaseLookupValue SiteProduction: Start=Emergence; End=Maturity
            MultiplyFunction Delta
              VariableReference Branches: VariableName=[Leaf].BranchNumber
              DivideFunction LAR
                VariableReference TT: VariableName=[Phenology].ThermalTime
                VariableReference Phyllochron: VariableName=[Leaf].Phyllochron
              VariableReference R
                VariableName=[Leaf].DMDemands.Structural.DeltaLAIPotential.ReproductiveStage.Delta.SympodialLeaves.EmergingLeaves.MultiplyFunction.R
              VariableReference PlantNumber: VariableName=[Cotton].SowingData.Population
        AddFunction TotalNumber
          VariableReference MainStemNodes: VariableName=[Leaf].NodeNumber
          AccumulateFunction LeavesOnBranches: StartStageName=Emergence; EndStageName=Cutout; FractionRemovedOnCut=1; FractionRemovedOnHarvest=1; FractionRemovedOnGraze=1; FractionRemovedOnPrune=0
            Memo: same as Replacements.Cotton.Leaf.Sites.Memo
            PhaseLookupValue LeafProduction: Start=Emergence; End=Maturity
              MultiplyFunction Delta
                VariableReference Branches: VariableName=[Leaf].BranchNumber
                DivideFunction LAR
                  VariableReference TT: VariableName=[Phenology].ThermalTime
                  VariableReference Phyllochron: VariableName=[Leaf].Phyllochron
                VariableReference R
                  VariableName=[Leaf].DMDemands.Structural.DeltaLAIPotential.ReproductiveStage.Delta.SympodialLeaves.EmergingLeaves.MultiplyFunction.R
        Constant NReallocationFactor: FixedValue=1
          Memo
            This model assumes that all metabolic and storage N is available for reallocation from senescing leaves.
        MaximumFunction SenescenceRate
          Memo
            Move all LAI reducing factors here? DeltaLAI**Potential** --> so do not include reducing factors? But instead move to senescence.

            Include **ReferenceRate** 0.05/day

            ***See WhiteClover example***

            2. Mechanisms and factors inﬂuencing cotton senescence

            2.1. Environmental factors and senescence

            2.1.1. External environmental factors
            Major external environment factors that affect cotton leaf senescence include light, temperature, moisture, and mineral nutrition.

            * Shading (CoverResponse)
            * Water (SoilMostureFactor)
            * Nitrogen (NitrogenFactor)
            * Temperature (TemperatureFactor)
          Memo WaterDrivenSenescenceRate_notes
            See WaterDrivenSenescenceRate from Mungbean model

            Vegetative: Emergence to StartFlowering

            Reproductive: StartFlowering to Maturity
          PhaseLookup AgeDrivenSenescenceRate
            PhaseLookupValue Phase: Start=Emergence; End=Maturity
              Memo
                Leaf senescence rate is calculated to ensure that all leaves are senesced by crop maturity.
              MultiplyFunction AgeSenescence
                Constant: FixedValue=0.01
                DivideFunction Rate
                  VariableReference TT: VariableName=[Phenology].ThermalTime
                  Constant 1100: FixedValue=1100
          PhaseLookup WaterDrivenSenescenceRate
            PhaseLookupValue Phase: Start=Emergence; End=Maturity
              BoundFunction
                LinearInterpolationFunction WaterStressFunction
                  Memo: same as Replacements.Cotton.Leaf.HeightFunctionOLD.Memo
                  XYPairs: X=[0.5, 1]; Y=[0.03, 0]
                  VariableReference XValue: VariableName=[Leaf].FW
                Constant Lower: FixedValue=0
                Constant Upper: FixedValue=1
          PhaseLookup ShadeDrivenSenescenceRate
            PhaseLookupValue Phase: Start=Emergence; End=Maturity
              LinearInterpolationFunction ShadeStressFunction
                XYPairs: X=[0, 0.75, 1]; Y=[0, 0, 0]
                VariableReference XValue: VariableName=[Leaf].CoverTotal
        Constant DetachmentRate: FixedValue=0.05; Units=/d
        DivideFunction InitialWt
          MultiplyFunction Initial
            Memo
              7/2/2024: Crosscheck with leaf area data on cotyledons from DDRF2021 and Forest Hill 2024

              =====================================================================================================

              Changed initial leaf area from 0.00035 cm2 to 0.0006 cm2

              Based on:

              * *Reddy, K.R., Hodges, H.F. and McKinion, J.M., 1997. Modeling temperature effects on cotton internode and leaf growth. Crop Sci., 37(2): 503-509.* **(Fig. 5)**
              * *Lane, H.C. and Hesketh, J.D., 1977. Cotyledon Photosynthesis During Seedling Growth of Cotton, Gossypium hirsutum L. Am. J. Bot., 64(6): 786-790.* **(Fig. 1)**
            Constant AreaPerPlant: FixedValue=0.0006
            VariableReference Population: VariableName=[Plant].SowingData.Population
          VariableReference SLA: VariableName=[Leaf].SpecificArea
        MultiplyFunction LAIDead
          VariableReference SLA: VariableName=[Leaf].SpecificArea
          VariableReference LeafDeadWt: VariableName=[Leaf].Dead.Wt
        LinearInterpolationFunction MaximumNConc
          Memo
            These values have been fitted to the data from Tim Weavers Nitrogen trial. Value for Phenology.Stage 3 estimated.

            Y values were all from the N300 treatment

            Cotton.Phenology.Stage | Cotton.Phenology.CurrentStageName
            -----------------------|----------------------------------
            1 | Sowing
            2 | Germination
            3 | Emergence
            4 | StartSquaring
            5 | StartFlowering
            6 | Cutout
            7 | StartBollFilling
            8 | StartOpenBolls
            9 | Maturity
          XYPairs: X=[3, 5, 8]; Y=[0.06, 0.05, 0.03]
          VariableReference XValue: VariableName=[Phenology].Stage
        VariableReference CriticalNConc: VariableName=[Leaf].MaximumNConc
        Constant MinimumNConc: FixedValue=0.02
          Memo
            Tim Weavers Nitrogen trial

            N concentration at maturity for N0 treatment = 0.025
        Constant MaintenanceRespiration: FixedValue=0; Units=0-1
        Constant DMConversionEfficiency: FixedValue=1; Units=0-1
        BiomassRemoval BiomassRemovalDefaults: HarvestFractionLiveToRemove=0; HarvestFractionDeadToRemove=0; HarvestFractionLiveToResidue=1; HarvestFractionDeadToResidue=1
        Constant NRetranslocationFactor: FixedValue=0.5
        Constant DMReallocationFactor: FixedValue=0
        Constant DMRetranslocationFactor: FixedValue=0.5
        Constant RemobilisationCost: FixedValue=0
        Constant CarbonConcentration: FixedValue=0.4
        NutrientDemandFunctions DMDemands
          DivideFunction Structural
            PhaseLookup DeltaLAIPotential
              Memo
                29/01/2024:

                **Instead of having a dynamic "AreaLargestLeaf" --> add expansion stress and add Temp and VPD?**

                **See LeafSizeTemperatureFactor in Peanut model:**

                **--> .Simulations.ContinuousPeanut.paddock.Peanut.Leaf.DeltaLAI.Vegetative.Delta.LeafSizeTemperatureFactor**

                ================================================================================================================

                16/05/2023:

                Phase runs from emergence to maturity -- veg and repr concurrent!

                ================================================================================================================

                ***Add "Vegetative phase"? Since leaf area not affected much by water stress the first couple of weeks?***

                WaterStress not working correctly?

                =======================================

                DeltaLAI describes the LAI variation over the cycle and is calculated using the Area of Largest Leaf, relative leaf area, plant number, branch number and leaf appearance rate (thermal time/phyllochron).

                Include **TemperatureFactor**?

                =======================================

                Higher density --> more rapid early leaf growth (see row spacing trial DDRF)

                =======================================

                Excess water can be detrimental between cut-out and maturity. Vegetative growth can be
                restarted if water deficit is reduced by rain

                *Yeates, S.J., 2014. Tech Bulletin Water stress: effect on cotton physiology.*
              PhaseLookupValue VegetativeStage: Start=Emergence; End=StartSquaring
                MultiplyFunction Delta
                  VariableReference PlantNumber: VariableName=[Cotton].SowingData.Population
                  DivideFunction LAR
                    VariableReference TT: VariableName=[Phenology].ThermalTime
                    VariableReference Phyllochron: VariableName=[Leaf].Phyllochron.Potential
                  MultiplyFunction Area
                    VariableReference AreaLargestMainstemLeaf: VariableName=[Leaf].AreaLargestMainstemLeaf
                    LinearInterpolationFunction RelativeArea
                      Memo
                        Crop Phases:

                        Phase number | Phase
                        -------------|------
                        1 | Sowing
                        2 | Germination
                        3 | Emergence
                        4 | StartSquaring
                        5 | StartFlowering
                        6 | Cutout
                        7 | StartBollFilling
                        8 | StartOpenBolls
                        9 | Maturity
                        10 | HarvestRipe

                        Phase number | Rel.LAI
                        -----------|---------
                        3 | 0.05
                        4 | 1.0
                      XYPairs: X=[1, 4]; Y=[0, 1]
                      VariableReference XValue: VariableName=[Phenology].Stage
                  VariableReference WaterStressFunction: VariableName=[Cotton].Leaf.WaterStressFunction
              PhaseLookupValue ReproductiveStage: Start=StartSquaring; End=Maturity
                AddFunction Delta
                  MultiplyFunction MainstemLeaves
                    VariableReference PlantNumber: VariableName=[Cotton].SowingData.Population
                    DivideFunction LAR
                      VariableReference TT: VariableName=[Phenology].ThermalTime
                      VariableReference Phyllochron: VariableName=[Leaf].Phyllochron.Potential
                    MultiplyFunction Area
                      VariableReference AreaLargestMainstemLeaf: VariableName=[Leaf].AreaLargestMainstemLeaf
                      LinearInterpolationFunction RelativeArea
                        Memo
                          Crop Phases:

                          Phase number | Phase
                          -------------|------
                          1 | Sowing
                          2 | Germination
                          3 | Emergence
                          4 | StartSquaring
                          5 | StartFlowering
                          6 | Cutout
                          7 | StartBollFilling
                          8 | StartOpenBolls
                          9 | Maturity
                          10 | HarvestRipe

                          Phase number | Rel.LAI
                          -----------|---------
                          3 | 0.05
                          4 | 1.0
                        XYPairs: X=[4, 6]; Y=[1, 0.4]
                        VariableReference XValue: VariableName=[Phenology].Stage
                    VariableReference WaterStressFunction: VariableName=[Cotton].Leaf.WaterStressFunction
                  MultiplyFunction SympodialLeaves
                    VariableReference PlantNumber: VariableName=[Cotton].SowingData.Population
                    DivideFunction LAR
                      VariableReference TT: VariableName=[Phenology].ThermalTime
                      VariableReference Phyllochron: VariableName=[Leaf].Phyllochron
                    MultiplyFunction Area
                      VariableReference AreaLargestSympodialLeaf: VariableName=[Leaf].AreaLargestSympodialLeaf
                      LinearInterpolationFunction RelativeArea
                        Memo
                          Crop Phases:

                          Phase number | Phase
                          -------------|------
                          1 | Sowing
                          2 | Germination
                          3 | Emergence
                          4 | StartSquaring
                          5 | StartFlowering
                          6 | Cutout
                          7 | StartBollFilling
                          8 | StartOpenBolls
                          9 | Maturity
                          10 | HarvestRipe

                          Phase number | Rel.LAI
                          -----------|---------
                          4 | 0.2
                          5 | 0.7
                          6 | 1
                        XYPairs: X=[4, 6]; Y=[0, 0.6]
                        VariableReference XValue: VariableName=[Phenology].Stage
                    AddFunction EmergingLeaves
                      Constant: FixedValue=1
                      MultiplyFunction
                        VariableReference Branches: VariableName=[Leaf].BranchNumber
                        LinearInterpolationFunction R
                          Memo
                            29/01/2024:

                            DDRF: 0.35

                            ====================================================================================

                            22/12/2023:

                            R is temperature dependent:

                            Reddy, K. R., Hodges, H. F., & McKinion, J. M. (1997). Modeling temperature effects on cotton internode and leaf growth. Crop Science, 37(2), 503-509. https://doi.org/DOI 10.2135/cropsci1997.0011183X003700020032x

                            See notes "Plastochron"

                            ====================================================================================

                            12/12/2023:

                            XYPairs, XValue node number instead? --> then can include Veg branches R = e.g. 5, and for fruiting branches R = 2?

                            ====================================================================================

                            11/12/2023:

                            R = is potential, and depends on density. Higher density, higher R. R is then reduced by stresses, such as water.

                            So don't use DDRF site to determine potential R with different density, since this is rainfed, so water stresses may occur.

                            **Does R depend on population/m2, water stress, or both??**

                            ====================================================================================

                            **REDUCE TO 0.2? SEE CALCULATIONS FOR DDRFRS1000 IN COTTONOBSERVED DATASHEET**

                            **0.3 for RS trial?!**

                            FROM:

                            * *Hearn, A.B. and Da Roza, G.D., 1985. A simple model for crop management applications for cotton (Gossypium hirsutum L.). Field Crops Res., 12: 49–69.*

                            *R* is the ratio of the rate of mainstem node production to the rate of fruiting branch node production.

                            "For any variety, there is a constant ratio between the rate at which nodes (and thus new fruiting branches) appear on the main stem and the rate at which new fruiting sites appear along a fruiting branch (Hearn, 1969; Mutsaers, 1983)."

                            Check also the following references:

                            1. *Jackson, B.S., Arkin, G.F. and Hearn, A.B., 1988. The Cotton Simulation Model "COTTAM": Fruiting Model Calibration and Testing. American Society of Agricultural Engineers, 31(3): 846–854.*
                            2. *Hearn, A.B., 1969. Growth and performance of cotton in a desert environment: I. Morphological development of the crop. The Journal of Agricultural Science, 73(1): 65-74.*
                            3. *Mutsaers, H.J.W., 1983. Leaf Growth in Cotton (Gossyp/um hirsutum L.) 1. Growth in Area of Main-stem and Sympodial Leaves. Ann. Bot., 51: 503-520.*
                            4. *Hearn, A. B., & Da Roza, G. D. (1985). A simple model for crop management applications for cotton (Gossypium hirsutum L.). Field Crops Research, 12, 49–69.*
                          XYPairs: X=[4, 5, 6]; Y=[0.5, 0.5, 0.5]
                          VariableReference XValue: VariableName=[Phenology].Stage
                    VariableReference WaterStressFunction: VariableName=[Cotton].Leaf.WaterStressFunction
            VariableReference SLA: VariableName=[Leaf].SpecificArea
            Memo
              Growth in leaf area is used to calculate the leaf dry matter demand. The same was assumed in the original crop models in APSIM. Further model development can be taken once new experimental data for metabolic, structural and storage forms are provided.
            Memo Memo1
              DeltaLAI describes the LAI variation over the cycle and is calculated using the Area of Largest Leaf, relative leaf area, plant number, branch number and leaf appearance rate (thermal time/phyllochron).
          Constant Storage: FixedValue=0
          Constant Metabolic: FixedValue=0
          Constant QStructuralPriority: FixedValue=1
          Constant QMetabolicPriority: FixedValue=1
          Constant QStoragePriority: FixedValue=1
        NutrientDemandFunctions NDemands
          MultiplyFunction Structural
            VariableReference MinNconc: VariableName=[Leaf].minimumNconc
            VariableReference PotentialDMAllocation: VariableName=[Leaf].potentialDMAllocation.Structural
          MultiplyFunction Metabolic
            SubtractFunction MetabolicNconc
              VariableReference CritNconc: VariableName=[Leaf].criticalNConc
              VariableReference MinNconc: VariableName=[Leaf].minimumNconc
            VariableReference PotentialDMAllocation: VariableName=[Leaf].potentialDMAllocation.Structural
          StorageNDemandFunction Storage
            Constant NitrogenDemandSwitch: FixedValue=1
            VariableReference MaxNconc: VariableName=[Leaf].maximumNconc
          Constant QStructuralPriority: FixedValue=1
          Constant QMetabolicPriority: FixedValue=1
          Constant QStoragePriority: FixedValue=1
        LinearInterpolationFunction FrostFraction
          Memo
            X|Y
            -|-
            0|0
            30|1
            38|1
            40|0.8
          XYPairs: X=[-4, 4]; Y=[1, 0]
          VariableReference XValue: VariableName=[Weather].MinT
        Constant SpecificArea: FixedValue=0.014
          Memo
            Radiation and SLA?

            X|Y
            -|-
            15|0.025
            30|0.008

            XValue = [Weather].Radn

            Is there a relationship with RUE so can make this more dynamic? Or with CO2?

            "The relationship between RUE (Radiation Use Efficiency) and specific leaf area is that RUE is positively correlated with specific leaf area (SLA)"

            https://www.bing.com/search?q=relationship+between+RUE+and+specific+leaf+area%3F&qs=n&form=QBRE&sp=-1&ghc=1&lq=0&pq=relationship+between+rue+and+specific+leaf+area&sc=10-47&sk=&cvid=251D1C07D98845E5AF84991C12EEA22C&ghsh=0&ghacc=0&ghpl=
          Memo Memo1
            Temp effect on SLW --> Reddy 1997
          Memo Memo2
            25/01/2024:

            From:

            https://csiroau-my.sharepoint.com/personal/rhe005_csiro_au/Documents/Work Files/00. COTTON/APSIM-OZCOT Modelling/Leaf area review
            --> Leaf area modelling with SLA.xlsx

            Simulation of Leaf Area Development Based on Dry Matter Partitioning and Speci®c Leaf Area for Cut Chrysanthemum J. H. LEE and E. HEUVELINK*

            Simulation of leaf area based on simulated leaf dry mass and speci®c leaf area (SLA) is a more ¯exible approach and one that has been applied to several crops, e.g. lettuce (Van Henten, 1994), tomato (Heuvelink 1999) and rose (Lieth and Pasian, 1991).
            A module for partitioning to the leaves and a module predicting SLA are needed to predict LAI dynamics in this way. In this approach, SLA is assumed to be constant or else is simulated as a function of plant age, physiological age, season, developmental stage and plant density or environmental conditions (Marcelis et al., 1998).

            For chrysanthemum, the SLA of new leaf biomass (SLAn, increase in LAI divided by increase in leaf mass) has been described by Acock et al. (1979) as a function of the average daily radiation integral and temperature.

            				Average daily radiation integral and temperature

            CHECK ACOCK 1979 AND REFERENCES IN LEE & HEUVELINK 2003 FOR TEMP&SRD IN PREDICTING SLA

            Simulation of leaf area based on simulated leaf dry mass and specific leaf area (SLA) is a more flexible approach and one that has been applied to several crops, e.g. lettuce (Van Henten, 1994), tomato (Heuvelink 1999) and rose (Lieth and Pasian, 1991). A module for partitioning to the leaves and a module predicting SLA are needed to predict LAI dynamics in this way.

            Two approaches are predominantly used to simulate plant leaf area development: (1) leaf area is described as a function of plant developmental stage; or (2) leaf area is predicted from simulated leaf dry mass (Marcelis et al., 1998). The former approach is often inaccurate for glasshouse crops owing to a large ¯uctuation in radiation (almost year-round cultivation), whereas leaf area development is often strongly
            in¯uenced by radiation (Marcelis et al., 1998). Simulation of leaf area based on simulated leaf dry mass and speci®c leaf area (SLA) is a more ¯exible approach and one that has been applied to several crops, e.g. lettuce (Van Henten, 1994), tomato (Heuvelink 1999) and rose (Lieth and Pasian, 1991).
            A module for partitioning to the leaves and a module predicting SLA are needed to predict LAI dynamics in this way.

            Lee & Heuvelink assume a constant SLA_N during each cultivation of chrysanthemum

            Hoogenboom et al., 1992
            							Munz et al., 2014
            The SLA of new leaf tissue is determined for each day
            and total new leaf area growth is calculated. The SLA of							The relationship between SLA and the average daytime PAR for all
            new leaf tissue is a function of the daily average							measurements (three times per sowing date) was explained well
            temperature, daily radiation, and drought stress. The LAI is							by a polynomial regression (R2 = 0.71; p < 0.001).
            calculated based upon new leaf area growth and leaves
            abscised due to senescence.
        Constant AreaLargestMainstemLeaf: FixedValue=0.025; Units=m^2
          Memo
            8/12/2023: orginially set at 0.018

            Temp effect on final leaf size? Reddy 1997

            Can change to 0.025 --> max leaf size also at DDRF

            From report "OZCOT enhancement meeting Aug 2019":

            **--> Comparison of leaf area parameters derived in temperate climates with tropics.**

            Parameter|Tropics|Temperate|% difference
            -|-|-|-
            Maximum LA/site (cm2)		|164	|80	|	105
            		(m2)		|0.0164	|0.008	|
            Area largest main stem leaf	|297	|140	|	112
            		(m2)		|0.0297	|0.014	|
            RLAI – highest			|0.063	|0.01	|	530
            RLAI – median			|0.032	|0.01	|	220
            Dldsmax				|0.439	|0.12	|	266
            Change in LA/site		|0.17	|0.12	|	42
            Specific leaf weight g/m2	|41	|58	|	-29
            SLA				|0.024	|0.017  |
        Constant AreaLargestSympodialLeaf: FixedValue=0.016; Units=m^2
          Memo: same as Replacements.Cotton.Leaf.AreaLargestMainstemLeaf.Memo
        DivideFunction SpecificAreaCanopy
          VariableReference LAI: VariableName=[Leaf].Area
          VariableReference LeafWt: VariableName=[Leaf].Live.Wt
        ExpressionFunction Plastochron: Expression=[Leaf].Phyllochron * [Leaf].Plastochron.Multiplier
          Memo Notes
            3/01/2024:

            Hanan and Hearn, 2003:

            "R, the ratio between the plastochron on a fruiting branch and on the mainstem, is 2"

            =====================================================================================

            22/12/2023:

            Add Plastochron for fruiting branch leaf emergence? See canola example

            Multiplier (R) is the "ratio of mainstem and fruiting branch leaf unfolding interval", which is temperature dependent (higher temperature, lower ratio):

            Reddy, K. R., Hodges, H. F., & McKinion, J. M. (1997). Modeling temperature effects on cotton internode and leaf growth. Crop Science, 37(2), 503-509. https://doi.org/DOI 10.2135/cropsci1997.0011183X003700020032x
          LinearInterpolationFunction Multiplier
            XYPairs: X=[15, 20, 25, 30, 35, 40, 45, 50]; Y=[0.81, 0.53, 0.47, 0.43, 0.37, 0.3, 0.21, 0.06]
            VariableReference XValue: VariableName=[Weather].MeanT
        HoldFunction FinalLeafNumber: WhenToHold=Cutout
          AddFunction FLN
            Constant PrimordiaAtEmergence: FixedValue=2
            AccumulateFunction InitiatedPrimordia: StartStageName=Germination; EndStageName=Cutout; FractionRemovedOnCut=0; FractionRemovedOnHarvest=0; FractionRemovedOnGraze=0; FractionRemovedOnPrune=0
              DivideFunction DailyPrimordiaAppearance
                VariableReference TT: VariableName=[Phenology].ThermalTime
                VariableReference Plastochron: VariableName=[Leaf].Plastochron
      GenericOrgan Stem: IsAboveGround=true
        Memo
          Check N dynamics over time in cotton and partitioning and storage
        Constant NReallocationFactor: FixedValue=1
        Constant NRetranslocationFactor: FixedValue=0.5
        PhaseLookup DMRetranslocationFactor
          PhaseLookupValue Vegetative: Start=Emergence; End=Cutout
            Constant RetranslocationFactor: FixedValue=0
          PhaseLookupValue BollFilling: Start=Cutout; End=Maturity
            Constant RetranslocationFactor: FixedValue=0.2
        LinearInterpolationFunction MaximumNConc
          Memo
            From Tim Weavers N trial data
          XYPairs: X=[3, 6, 7, 8]; Y=[0.03, 0.017, 0.011, 0.01]
          VariableReference XValue: VariableName=[Phenology].Stage
        Constant MinimumNConc: FixedValue=0.007
        VariableReference CriticalNConc: VariableName=[Stem].MinimumNConc
        PhaseLookupValue NitrogenDemandSwitch: Start=Emergence; End=Cutout
          Memo
            There is no evidence of stem N storage during grain filling. Also, there is no stem structural growth during this time.
          Constant: FixedValue=1
        BiomassRemoval BiomassRemovalDefaults: HarvestFractionLiveToRemove=0; HarvestFractionDeadToRemove=0; HarvestFractionLiveToResidue=1; HarvestFractionDeadToResidue=1
        PhaseLookup SenescenceRate
          Memo
            7/2/2024: Need to revise senescence rate sine phases after flowering don't use thermal time --> check leaf senescence
          PhaseLookupValue Vegetative: Start=Emergence; End=Cutout
            Constant Rate: FixedValue=0
          PhaseLookupValue PostCutout: Start=Cutout; End=Maturity
            MinimumFunction Rate
              DivideFunction Fraction
                VariableReference TT: VariableName=[Phenology].ThermalTime
                SubtractFunction TTRemaining
                  ExpressionFunction PostCanopyTT: Expression=[Phenology].BollFilling.Target+[Phenology].Maturing.Target
                  ExpressionFunction PostCanopyTTComplete
                    Expression=[Phenology].BollFilling.ProgressThroughPhase+[Phenology].Maturing.ProgressThroughPhase
              Constant One: FixedValue=1
        Constant DetachmentRateFunction: FixedValue=0; Units=/d
        Constant MaintenanceRespirationFunction: FixedValue=0; Units=0-1
        Constant DMConversionEfficiency: FixedValue=1; Units=0-1
        Constant DMReallocationFactor: FixedValue=1
        Constant RemobilisationCost: FixedValue=0
        Constant CarbonConcentration: FixedValue=0.4
        NutrientDemandFunctions DMDemands
          MultiplyFunction Structural
            PhaseLookup Fraction
              PhaseLookupValue StemGrowthPhase: Start=Emergence; End=Maturity
                Constant Fraction: FixedValue=0.9
            VariableReference DMDemand: VariableName=[Stem].PotentialGrowth
          Constant Metabolic: FixedValue=0
          MultiplyFunction Storage
            VariableReference DMDemand: VariableName=[Stem].PotentialGrowth
            SubtractFunction StorageFraction
              Constant One: FixedValue=1
              VariableReference StructuralFraction: VariableName=[Stem].DMDemands.Structural.Fraction
          Constant QStructuralPriority: FixedValue=1
          Constant QMetabolicPriority: FixedValue=1
          Constant QStoragePriority: FixedValue=1
        NutrientDemandFunctions NDemands
          MultiplyFunction Structural
            VariableReference MinNconc: VariableName=[Stem].minimumNconc
            VariableReference PotentialDMAllocation: VariableName=[Stem].potentialDMAllocation.Structural
          MultiplyFunction Metabolic
            SubtractFunction MetabolicNconc
              VariableReference CritNconc: VariableName=[Stem].criticalNConc
              VariableReference MinNconc: VariableName=[Stem].minimumNconc
            VariableReference PotentialDMAllocation: VariableName=[Stem].potentialDMAllocation.Structural
          StorageNDemandFunction Storage
            VariableReference NitrogenDemandSwitch: VariableName=[Stem].nitrogenDemandSwitch
            VariableReference MaxNconc: VariableName=[Stem].maximumNconc
          Constant QStructuralPriority: FixedValue=1
          Constant QMetabolicPriority: FixedValue=1
          Constant QStoragePriority: FixedValue=1
        PartitionFractionDemandFunction PotentialGrowth
          PhaseLookup PartitionFraction
            PhaseLookupValue StemGrowthPhase: Start=Emergence; End=Maturity
              Constant StemFraction: FixedValue=0.4
        RetranslocateNonStructural RetranslocateNitrogen
        NutrientPoolFunctions InitialWt
          Constant Structural: FixedValue=0; Units=g/m^2
          Constant Metabolic: FixedValue=0
          Constant Storage: FixedValue=0
        Constant Photosynthesis: FixedValue=0
        VariableReference initialNConcFunction: VariableName=[Stem].MinimumNConc
      GenericOrgan Bur: IsAboveGround=true
        Memo
          **REVISE BUR N CONC!!!!!**
        NutrientDemandFunctions DMDemands
          MultiplyFunction Structural
            PhaseLookup DMDemandFunction
              PhaseLookupValue BurDevelopment: Start=StartFlowering; End=Maturity
                MultiplyFunction HIDemand
                  VariableReference AboveGroundWt: VariableName=[AboveGround].Wt
                  MinimumFunction HIIncrease
                    MultiplyFunction DailyRate
                      VariableReference HIIncrease: VariableName=[Boll].DailyHIIncrease
                      VariableReference BollBurFraction: VariableName=[Boll].BurFraction
                    MaximumFunction HIRemaining
                      SubtractFunction Calculation
                        VariableReference PotentialHI: VariableName=[Bur].PotentialHarvestIndex
                        VariableReference CurrentHI: VariableName=[Bur].HarvestIndex
                      Constant Zero: FixedValue=0
            Constant StructuralFraction: FixedValue=1
          Constant Metabolic: FixedValue=0
          StorageDMDemandFunction Storage
            SubtractFunction StorageFraction
              Constant One: FixedValue=1
              VariableReference StructuralFraction: VariableName=[Bur].DMDemands.Structural.StructuralFraction
          Constant QStructuralPriority: FixedValue=1
          Constant QMetabolicPriority: FixedValue=1
          Constant QStoragePriority: FixedValue=1
        NutrientDemandFunctions NDemands
          MultiplyFunction Structural
            VariableReference MinNconc: VariableName=[Bur].minimumNconc
            VariableReference PotentialDMAllocation: VariableName=[Bur].potentialDMAllocation.Structural
          StorageNDemandFunction Storage
            VariableReference NitrogenDemandSwitch: VariableName=[Bur].nitrogenDemandSwitch
            VariableReference MaxNconc: VariableName=[Bur].maximumNconc
          Constant Metabolic: FixedValue=0
          Constant QStructuralPriority: FixedValue=1
          Constant QMetabolicPriority: FixedValue=1
          Constant QStoragePriority: FixedValue=1
        RetranslocateNonStructural RetranslocateNitrogen
        PhaseLookupValue NitrogenDemandSwitch: Start=StartFlowering; End=Cutout
          Constant: FixedValue=1
        Constant MaximumNConc: FixedValue=0.0358
          Memo
            **12/07/2023: MinNConc 0.01; MaxNConc 0.045**

            Values from:

            Boquet, D.J. and Breitenbeck, G.A., 2000. Nitrogen Rate Effect on Partitioning of Nitrogen and Dry Matter by Cotton. Crop Sci., 40: 1685-1693.

            Min: 0.011

            Max: 0.020

            **17/07/2023:** Boquet & Breitenbeck 2000, EEB values (N values at cutout): MinNConc: 0.0194, MaxNConc: 0.0358
        Constant MinimumNConc: FixedValue=0.0194
        VariableReference CriticalNConc: VariableName=[Bur].MinimumNConc
        Constant NReallocationFactor: FixedValue=1
        Constant NRetranslocationFactor: FixedValue=0.5
        Constant DMRetranslocationFactor: FixedValue=0.1
        BiomassRemoval BiomassRemovalDefaults: HarvestFractionLiveToRemove=0; HarvestFractionDeadToRemove=0; HarvestFractionLiveToResidue=1; HarvestFractionDeadToResidue=1
        PhaseLookup SenescenceRate
          PhaseLookupValue ReproductivePhase: Start=Cutout; End=Maturity
            MinimumFunction Rate
              DivideFunction Fraction
                VariableReference TT: VariableName=[Phenology].ThermalTime
                SubtractFunction TTRemaining
                  ExpressionFunction ReproductiveTT: Expression=[Phenology].BollFilling.Target+[Phenology].Maturing.Target
                  ExpressionFunction ReproductiveTTComplete
                    Expression=[Phenology].BollFilling.ProgressThroughPhase+[Phenology].Maturing.ProgressThroughPhase
              Constant One: FixedValue=1
        Constant DetachmentRateFunction: FixedValue=0; Units=/d
        Constant MaintenanceRespirationFunction: FixedValue=0; Units=0-1
        Constant DMConversionEfficiency: FixedValue=1; Units=0-1
        Constant DMReallocationFactor: FixedValue=0
        Constant RemobilisationCost: FixedValue=0
        Constant CarbonConcentration: FixedValue=0.4
        MultiplyFunction PotentialHarvestIndex
          Memo
            11/07/2023: SeedFraction 0.45 at Maturity (0.04 and 0.055 N Conc) and 0.58 at HarvestRipe (0.033 and 0.043 N conc)

            If run model to Maturity, remove RipeningDuration from FillingDuration and DMDemandFunction
          VariableReference BollHarvestIndex: VariableName=[Boll].PotentialHarvestIndex
          VariableReference BurFraction: VariableName=[Boll].BurFraction
        NutrientPoolFunctions InitialWt: same as Replacements.Cotton.Stem.InitialWt
        VariableReference initialNConcFunction: VariableName=[Bur].MinimumNConc
        Constant Photosynthesis: FixedValue=0
        DivideFunction HarvestIndex
          VariableReference BurWt: VariableName=[Bur].Wt
          VariableReference AboveGroundWt: VariableName=[AboveGround].Wt
      ReproductiveOrgan Seed: GrowthRespiration=0; MaintenanceRespiration=0
        Biomass Live
        Biomass Dead
        PhaseLookup DMDemandFunction
          PhaseLookupValue BollFilling: Start=StartFlowering; End=Maturity
            MultiplyFunction HIDemand
              VariableReference AboveGroundWt: VariableName=[AboveGround].Wt
              MinimumFunction HIIncrease
                MultiplyFunction DailyRate
                  VariableReference HIIncrease: VariableName=[Boll].DailyHIIncrease
                  VariableReference BollSeedFraction: VariableName=[Boll].SeedFraction
                MaximumFunction HIRemaining
                  SubtractFunction Calculation
                    VariableReference PotentialHI: VariableName=[Seed].PotentialHarvestIndex
                    VariableReference CurrentHI: VariableName=[Seed].HarvestIndex
                  Constant Zero: FixedValue=0
        Constant MaximumNConc: FixedValue=0.04
          Memo
            10/07/2023: Values from: Using seed nitrogen concentration to estimate crop N use-efficiency in
            high-yielding irrigated cotton - Ian J. Rochester

            Values from:

            Sadras, V.O. and Wilson, L.J., 1997. Nitrogen accumulation and partitioning in shoots of cotton plants infested with two-spotted spider mites. Aust. J. Agric. Res., 48: 525-533.

            Min: 0.040

            Max: 0.055

            --> **Boquet, D.J. and Breitenbeck, G.A., 2000. Nitrogen Rate Effect on Partitioning of Nitrogen and Dry Matter by Cotton. Crop Sci., 40: 1685-1693.**

            Min: 0.033

            Max: 0.043

            Snider, J., et al. (2021). Chapter 22. Cotton. Crop Physiology. Case Histories for Major Crops. V. O. Sadras and D. F. Calderini: 715-746.

            39-55%
        Constant MinimumNConc: FixedValue=0.03
        Constant WaterContent: FixedValue=0.12
        MultiplyFunction NFillingRate
          VariableReference NConc: VariableName=[Seed].MaximumNConc
          VariableReference DMDemand: VariableName=[Seed].DMDemandFunction
          VariableReference DMConversionEfficiency: VariableName=[Seed].DMConversionEfficiency
        BiomassRemoval BiomassRemovalDefaults: HarvestFractionLiveToRemove=1; HarvestFractionDeadToRemove=1; HarvestFractionLiveToResidue=0; HarvestFractionDeadToResidue=0
        Constant DMConversionEfficiency: FixedValue=0.89
        Constant RemobilisationCost: FixedValue=0
        Constant CarbonConcentration: FixedValue=0.4
        DivideFunction HarvestIndex
          VariableReference SeedWt: VariableName=[Seed].Wt
          VariableReference AboveGroundWt: VariableName=[AboveGround].Wt
        MultiplyFunction PotentialHarvestIndex
          Memo
            11/07/2023: SeedFraction 0.45 at Maturity (0.04 and 0.055 N Conc) and 0.58 at HarvestRipe (0.033 and 0.043 N conc)

            If run model to Maturity, remove RipeningDuration from FillingDuration and DMDemandFunction
          VariableReference BollHarvestIndex: VariableName=[Boll].PotentialHarvestIndex
          VariableReference SeedFraction: VariableName=[Boll].SeedFraction
        Constant MaximumPotentialBollSize: FixedValue=0
          Memo
            This parameter is not used.  Grain growth is calculated from harvest index increase.
        Constant NumberFunction: FixedValue=0
          Memo
            Grain number is not estimated by this model.
        NutrientPoolFunctions DMDemandPriorityFactors
          Constant Structural: FixedValue=1
          Constant Metabolic: FixedValue=1
          Constant Storage: FixedValue=1
        NutrientPoolFunctions NDemandPriorityFactors: same as Replacements.Cotton.Seed.DMDemandPriorityFactors
      ReproductiveOrgan Lint: GrowthRespiration=0; MaintenanceRespiration=0
        Biomass Live
        Biomass Dead
        PhaseLookup DMDemandFunction
          PhaseLookupValue BollFilling: Start=StartFlowering; End=Maturity
            MultiplyFunction HIDemand
              VariableReference AboveGroundWt: VariableName=[AboveGround].Wt
              MinimumFunction HIIncrease
                MultiplyFunction DailyRate
                  VariableReference HIIncrease: VariableName=[Boll].DailyHIIncrease
                  VariableReference BollBurFraction: VariableName=[Boll].LintFraction
                MaximumFunction HIRemaining
                  SubtractFunction Calculation
                    VariableReference PotentialHI: VariableName=[Lint].PotentialHarvestIndex
                    VariableReference CurrentHI: VariableName=[Lint].HarvestIndex
                  Constant Zero: FixedValue=0
        Constant MaximumNConc: FixedValue=0.0031
          Memo
            Values from:

            Sadras, V.O. and Wilson, L.J., 1997. Nitrogen accumulation and partitioning in shoots of cotton plants infested with two-spotted spider mites. Aust. J. Agric. Res., 48: 525-533.

            Min: 0.0020

            Max: 0.0037

            --> **Boquet, D.J. and Breitenbeck, G.A., 2000. Nitrogen Rate Effect on Partitioning of Nitrogen and Dry Matter by Cotton. Crop Sci., 40: 1685-1693.**

            Min: 0.0022

            Max: 0.0031

            Snider, J., et al. (2021). Chapter 22. Cotton. Crop Physiology. Case Histories for Major Crops. V. O. Sadras and D. F. Calderini: 715-746.

            2-3.7%
        Constant MinimumNConc: FixedValue=0.0022
        Constant WaterContent: FixedValue=0.07
        MultiplyFunction NFillingRate
          VariableReference NConc: VariableName=[Lint].MaximumNConc
          VariableReference DMDemand: VariableName=[Lint].DMDemandFunction
          VariableReference DMConversionEfficiency: VariableName=[Lint].DMConversionEfficiency
        BiomassRemoval BiomassRemovalDefaults: HarvestFractionLiveToRemove=1; HarvestFractionDeadToRemove=1; HarvestFractionLiveToResidue=0; HarvestFractionDeadToResidue=0
        Constant DMConversionEfficiency: FixedValue=1
        Constant RemobilisationCost: FixedValue=0
        Constant CarbonConcentration: FixedValue=0.4
        DivideFunction HarvestIndex
          VariableReference LintWt: VariableName=[Lint].Wt
          VariableReference AboveGroundWt: VariableName=[AboveGround].Wt
        MultiplyFunction PotentialHarvestIndex
          Memo
            11/07/2023: LintFraction 0.30 at Maturity and 0.42 at HarvestRipe

            If run model to Maturity, remove RipeningDuration from FillingDuration and DMDemandFunction

            13/06/2023: Changed LintFraction from 0.30 to 0.25
          VariableReference BollHarvestIndex: VariableName=[Boll].PotentialHarvestIndex
          VariableReference LintFraction: VariableName=[Boll].LintFraction
        Constant MaximumPotentialBollSize: FixedValue=0
          Memo
            This parameter is not used.  Grain growth is calculated from harvest index increase.
        Constant NumberFunction: FixedValue=0
          Memo
            Grain number is not estimated by this model.
        NutrientPoolFunctions DMDemandPriorityFactors: same as Replacements.Cotton.Seed.DMDemandPriorityFactors
        NutrientPoolFunctions NDemandPriorityFactors: same as Replacements.Cotton.Seed.DMDemandPriorityFactors
        DivideFunction Bales
          VariableReference LintWt: VariableName=[Lint].Wt
          Constant BaleWT: FixedValue=22.7; Units=kg
      Root: GrowthRespiration=0; MaintenanceRespiration=0
        Memo
          Include taproot? See crop model ***PlantainForage***

          *Snider, J., Bange, M. and Heitholt, J., 2021. Chapter 22. Cotton. In: V.O. Sadras and D.F. Calderini (Editors), Crop Physiology. Case Histories for Major Crops, pp. 715-746.*

          from EMERGENCE:

          During this time, the cotton plant exhibits rapid root growth. The primary root may be as much as 25-cm deep by the time the cotyledons unfold, and early season taproot growth proceeds at rates up to 6 cm per day under optimal
          conditions (Oosterhuis, 1990; Ritchie et al., 2007; Snider and Oosterhuis, 2015).

          CANOPY DEVELOPMENT:

          Root growth also continues during early canopy and square development. In fact, the onset of flowering represents a shift in source-sink relations towards greater reproductive growth and a significant reduction in root growth.

          Thus, crop growth before flowering is critical for developing a well-established root system and sufficient canopy to support growth and yield.

          Cotton root growth is rapid during the early part of the season and acts as the major sink for photosynthate until flowering and early boll development.

          ============================================================================================================================================

          Temperature effect on root growth?

          From:

          * Reddy et al. 1991a. Temperature effects on growth and development of cotton during the fruiting period. Agron. J. 83:211-217.
          * Hodges, H.F., Reddy, K.R., McKinion, J.M. and Reddy, V.R., 1993. Temperature Effects on Cotton, Mississippi State University, Mississippi, USA.

          Early in the season nearly 50% of the plants dry matter is found in the roots, but as the season progreses, the percentage dry matter in the root decreases. At maturity there is only about 10% in roots (Reddy 1991a)

          From:

          Hodges, H.F., Reddy, K.R., McKinion, J.M. and Reddy, V.R., 1993. Temperature Effects on Cotton, Mississippi State University, Mississippi, USA.

          Roots DM Partitioning:

          **CHECK THIS!!!!** Assuming, StartSquaring = ~20DAE = 40%, StartFlowering = ~50DAE = 30% and Cutout = ~80DAE = 20%
        RootShapeCylinder RootShape
        MultiplyFunction RootFrontVelocity
          Memo
            **06/02/2024:**

            **Roots as a function of soil drying. The dryer the soil, the quicker the roots grow down. See trial data DDRF and NAR0607Ir45!!**

            =======================================================================================

            Add temp factor?

            See Conaty's PhD page 39
          PhaseLookup PotentialRootFrontVelocity
            PhaseLookupValue PreEmergence: Start=Germination; End=Emergence
              Constant Function: FixedValue=5
            PhaseLookupValue early: Start=Emergence; End=Cutout
              Constant Function: FixedValue=23
            PhaseLookupValue late: Start=Cutout; End=Maturity
              Constant Function: FixedValue=5
          LinearInterpolationFunction WaterFactor (disabled)
            SoilWaterScale: LLModel=1
            XYPairs: X=[0, 0.25, 1]; Y=[1, 1, 1]
            VariableReference XValue: VariableName=[SoilWaterScale]
          LinearInterpolationFunction AFPSFactor (disabled)
            XYPairs: X=[0, 0.03, 1]; Y=[0, 1, 1]
            VariableReference XValue: VariableName=[Root].AirFilledPoreSpace
        Constant MaximumRootDepth: FixedValue=1000000
        Constant KLModifier: FixedValue=1; Units=0-1
          Memo
            No modification to water extraction rate is assumed in this model.
        LinearInterpolationFunction MaxDailyNUptake
          XYPairs: X=[0, 5]; Y=[6, 6]
          VariableReference XValue: VariableName=[Leaf].LAI
          Memo
            For all the previous reports, maximum rates of N uptake ranged from 1.3 to 4.3 kg ha− 1 d− 1 and the timing of the maximum rate varied from 49 to 98 days after sowing.

            FROM:

            Chapter 22. CottonJ. Snider, M. Bange and J. HeitholtIn: Crop Physiology. Case Histories for Major Crops, edited by V. O. Sadras and D. F. Calderini2021
        Constant SenescenceRate: FixedValue=0.005; Units=/d
        Constant MaximumNConc: FixedValue=0.01
        Constant MinimumNConc: FixedValue=0.005
        PhaseLookupValue NitrogenDemandSwitch: Start=Emergence; End=Cutout
          Constant: FixedValue=1
        Constant KNO3: FixedValue=0.02
        Constant KNH4: FixedValue=0
          Memo
            The current model version considers only NO3 uptake but NH4 option can be activated by the user . We do not expect activation of NH4 to change total plant N uptake because the nitrification rate (conversion of NH4 to NO3) is very fast in the model. In the future we will re-valuate this.
        BiomassRemoval BiomassRemovalDefaults: HarvestFractionLiveToRemove=0; HarvestFractionDeadToRemove=0; HarvestFractionLiveToResidue=0.2; HarvestFractionDeadToResidue=0
        LinearInterpolationFunction NUptakeSWFactor
          XYPairs: X=[0, 1]; Y=[0, 1]
          VariableReference XValue: VariableName=[Root].RWC
        Constant SpecificRootLength: FixedValue=60; Units=m/g
          Memo
            Specific root length default from OZCOT = 60000 mm/g
        Constant DMConversionEfficiency: FixedValue=1
        Constant MaintenanceRespirationFunction: FixedValue=1
        Constant RemobilisationCost: FixedValue=0
        Constant CarbonConcentration: FixedValue=0.4
        NutrientDemandFunctions DMDemands
          MultiplyFunction Structural
            PartitionFractionDemandFunction DMDemandFunction
              Memo
                Default:

                Preflowering: 0.2

                Flowering to cutout: 0.1
              LinearInterpolationFunction PartitionFraction
                Memo
                  From:

                  Hodges, H.F., Reddy, K.R., McKinion, J.M. and Reddy, V.R., 1993. Temperature Effects on Cotton, Mississippi State University, Mississippi, USA:

                  *"Emerging seedlings partitioned nearly 50% of their dry weight into roots, whereas mature cotton plants had only 5 to 10% of their dry weight in roots."*

                  Assuming:

                  StartSquaring = 20DAE = 40%
                  StartFlowering = 50DAE = 30%
                  Cutout = 80DAE = 20%

                  **PHENOLOGY**

                  The following crop phases are distinguished:

                  Phase number | Stage
                  -------------|------------
                  1 |Sowing
                  2 |Germination
                  3 |Emergence
                  4 |StartSquaring
                  5 |StartFlowering
                  6 |Cutout
                  7 |StartBollFilling
                  8 |StartOpenBolls
                  9 |Maturity
                  10|HarvestRipe
                XYPairs: X=[3, 8]; Y=[0.5, 0.05]
                VariableReference XValue: VariableName=[Phenology].Stage
            Constant StructuralFraction: FixedValue=1
          Constant Metabolic: FixedValue=0
          StorageDMDemandFunction Storage
            SubtractFunction StorageFraction
              Constant One: FixedValue=1
              VariableReference StructuralFraction: VariableName=[Root].DMDemands.Structural.StructuralFraction
          Constant QStructuralPriority: FixedValue=1
          Constant QMetabolicPriority: FixedValue=1
          Constant QStoragePriority: FixedValue=1
        NutrientDemandFunctions NDemands
          MultiplyFunction Structural
            VariableReference MinNconc: VariableName=[Root].minimumNconc
            VariableReference PotentialDMAllocation: VariableName=[Root].potentialDMAllocation.Structural
          MultiplyFunction Metabolic
            SubtractFunction MetabolicNconc
              VariableReference CritNconc: VariableName=[Root].criticalNConc
              VariableReference MinNconc: VariableName=[Root].minimumNconc
            VariableReference PotentialDMAllocation: VariableName=[Root].potentialDMAllocation.Structural
          StorageNDemandFunction Storage
            VariableReference NitrogenDemandSwitch: VariableName=[Root].nitrogenDemandSwitch
            VariableReference MaxNconc: VariableName=[Root].maximumNconc
          Constant QStructuralPriority: FixedValue=1
          Constant QMetabolicPriority: FixedValue=1
          Constant QStoragePriority: FixedValue=1
        VariableReference CriticalNConc: VariableName=[Root].MinimumNConc
        NutrientPoolFunctions InitialWt
          Constant Structural: FixedValue=0.2; Units=g/plant
          Constant Metabolic: FixedValue=0
          Constant Storage: FixedValue=0
        Manager PAWCInRootZone
```csharp
using Models.Soils;
using System;
using System.Linq;
using Models.Core;
using Models.PMF;
using Models.PMF.Organs;
using APSIM.Shared.Utilities;
namespace Models
{
    [Serializable]
    public class Script : Model
    {
        [Link] Clock Clock;
        [Link] Physical physical;
        [Link] Water water;
        [Link] Root root;
        
        private double[] zeroArray;
        
        public double[] PAWInRootZone { get; private set; }
        public double[] PAWCInRootzone { get; private set; }
        
        [EventSubscribe("StartOfSimulation")]
        private void OnStartOfSimulation(object sender, EventArgs e)
        {
        	zeroArray = new double[physical.Thickness.Length];
        	System.Diagnostics.Debugger.Break();
        }
        
        
        [EventSubscribe("DoManagementCalculations")]
        private void OnDoManagementCalculations(object sender, EventArgs e)
        {
        	if (root.Depth == 0)
        	{
				PAWInRootZone = zeroArray;
				PAWCInRootzone = zeroArray;
        	}
        	else
        	{
        		// Create a thickness array with zeros below root depth.
        		double[] rootDepthThickness = (double[]) physical.Thickness.Clone();
        		int layerIndexBottomRootZone = SoilUtilities.LayerIndexOfDepth(physical.Thickness, root.Depth);
        		
        		double depthOfLayerAboveBottomOfRootZone = 0;
        		if (layerIndexBottomRootZone > 0)
				{        		
		    		double[] cumThickness = SoilUtilities.ToCumThickness(physical.Thickness);
		    		depthOfLayerAboveBottomOfRootZone = cumThickness[layerIndexBottomRootZone-1];
		    	}
		    		
	    		rootDepthThickness[layerIndexBottomRootZone] = root.Depth - depthOfLayerAboveBottomOfRootZone;
				for (int i = layerIndexBottomRootZone+1; i < physical.Thickness.Length; i++)
		    		rootDepthThickness[i] = 0;
		    	
		        PAWInRootZone = MathUtilities.Multiply(water.PAW, rootDepthThickness);
            	PAWCInRootzone = MathUtilities.Multiply(physical.PAWC, rootDepthThickness);
        	}
        }
    }
}
```
        DivideFunction PAW_ratio
          VariableReference PAW: VariableName=sum([PAWCInRootZone].Script.PAWInRootZone)
          VariableReference PAWC: VariableName=sum([PAWCInRootZone].Script.PAWCInRootZone)
        BoundFunction SMI
          Constant Lower: FixedValue=0
          Constant Upper: FixedValue=1
          VariableReference: VariableName=[Cotton].Root.PAW_ratio
      CompositeBiomass Boll: OrganNames=[Bur, Seed, Lint]; IncludeLive=true; IncludeDead=true
        Memo
          Boll components develop following an S-curve.

          For DM boll component fractions:

          * Kohel, R. J. and C. R. Benedict (1984). "Year Effects on Partitioning of Dry Matter into Cotton Boll Components." Crop Science 24(2).
          * Pace, P. F., et al. (1999). "Photosynthate and Dry Matter Partitioning in Short‐ and Long‐Season Cotton Cultivars." Crop Science 39(4): 1065-1069.
          * Boquet, D. J. and G. A. Breitenbeck (2000). "Nitrogen Rate Effect on Partitioning of Nitrogen and Dry Matter by Cotton." Crop Science 40: 1685-1693.
          * Makhdum, M. I., et al. (2006). "Dry matter accumulation and partitioning in cotton (Gossypium hirsutum L.) as influenced by potassium fertilization." Biology and Fertility of Soils 43(3): 295-301.
          * Tang, F. and W. Xiao (2013). "Dry Matter Accumulation and Partitioning in Various Fractions of Cotton Bolls." Experimental Agriculture 49(4): 543-555.
          * Pabuayon, I. L. B., et al. (2020). "Dry matter and nutrient partitioning changes for the past 30 years of cotton production." Agronomy Journal 112(5): 4373-4385.
        DivideFunction HarvestIndex
          VariableReference BollWt: VariableName=[Boll].Wt
          VariableReference AboveGroundWt: VariableName=[AboveGround].Wt
        Constant PotentialHarvestIndex: FixedValue=0.7
        Constant BurFraction: FixedValue=0.23
          Memo
            Bur fraction at cutout; approx 0.4

            Kohel, R. J. and C. R. Benedict (1984). "Year Effects on Partitioning of Dry Matter into Cotton Boll Components." Crop Science 24(2).
        Constant SeedFraction: FixedValue=0.47
        Constant LintFraction: FixedValue=0.3
        Constant DailyHIIncrease: FixedValue=0.03
      CompositeBiomass AboveGround: OrganNames=[Leaf, Stem, Bur, Seed, Lint]; IncludeLive=true; IncludeDead=true
      CompositeBiomass AboveGroundLive: OrganNames=[Leaf, Stem, Bur, Seed, Lint]; IncludeLive=true; IncludeDead=false
      CompositeBiomass BelowGround: OrganNames=[Root]; IncludeLive=true; IncludeDead=true
      CompositeBiomass Total: OrganNames=[Leaf, Stem, Bur, Seed, Lint, Root]; IncludeLive=true; IncludeDead=true
      CompositeBiomass TotalLive: OrganNames=[Leaf, Stem, Bur, Seed, Lint, Root]; IncludeLive=true; IncludeDead=false
      CompositeBiomass TotalDead: OrganNames=[Leaf, Stem, Bur, Seed, Lint, Root]; IncludeLive=false; IncludeDead=true
      Constant MortalityRate: FixedValue=0
      Constant SeedMortalityRate: FixedValue=0
      Folder Cultivars
        Cultivar Sicot_71B
          Command:
            //[Phenology].Vegetative.Target.SquaringTT.FixedValue = 343 // Bange et al. 2002
            //[Phenology].Squaring.Target.FloweringTT.FixedValue = 584 // Bange et al. 2002
            //[Phenology].Vegetative.Target.SquaringTT.FixedValue = 320
            //[Phenology].Squaring.Target.FloweringTT.FixedValue = 520
            //[Phenology].EarlyFlowering.Target.elseDefaultValue.FixedValue = 380
            //[Phenology].BollFilling.Target.FixedValue = 260
            //[Phenology].Maturing.Target.FixedValue = 200
            [Leaf].Photosynthesis.RUE_Fixed.FixedValue = 1.2
            [Leaf].SpecificArea.FixedValue = 0.012
            [Leaf].AreaLargestMainstemLeaf.FixedValue = 0.006
            [Leaf].AreaLargestSympodialLeaf.FixedValue = 0.006
        Cultivar Sicot_748B3F
          Command:
            [Phenology].Vegetative.Target.SquaringTT.FixedValue = 390
            [Phenology].Squaring.Target.FloweringTT.FixedValue = 630
            //[Phenology].BollFilling.Target.FixedValue = 290
            //[Phenology].Maturing.Target.FixedValue = 205
            //BLUE_Sicot_71B [Leaf].Photosynthesis.RUE.FixedValue = 1.2
            //BLUE_Sicot_71B [Leaf].SpecificArea.FixedValue = 0.014
            //BLUE_Sicot_71B [Leaf].AreaLargestLeaf.FixedValue = 0.016
            [Leaf].Photosynthesis.RUE_Fixed.FixedValue = 1.5
            [Leaf].SpecificArea.FixedValue = 0.0201
            [Leaf].AreaLargestMainstemLeaf.FixedValue = 0.03
            [Leaf].AreaLargestSympodialLeaf.FixedValue = 0.017
        Cultivar Sicot_74BRF
          Command:
            //[Phenology].Vegetative.Target.SquaringTT.FixedValue = 230
            //[Phenology].Squaring.Target.FloweringTT.FixedValue = 400
            //[Phenology].BollFilling.Target.FixedValue = 290
            //[Phenology].Maturing.Target.FixedValue = 205
            //BLUE_Sicot_71B [Leaf].Photosynthesis.RUE.FixedValue = 1.2
            //BLUE_Sicot_71B [Leaf].SpecificArea.FixedValue = 0.014
            //BLUE_Sicot_71B [Leaf].AreaLargestLeaf.FixedValue = 0.016
            [Leaf].Photosynthesis.RUE_Fixed.FixedValue = 1.5
            [Leaf].SpecificArea.FixedValue = 0.015
            [Leaf].AreaLargestMainstemLeaf.FixedValue = 0.03
            [Leaf].AreaLargestSympodialLeaf.FixedValue = 0.020
        Cultivar 748V2C
          Command:
            //[Phenology].Vegetative.Target.SquaringTT.FixedValue = 343 // Bange et al. 2002
            //[Phenology].Squaring.Target.FloweringTT.FixedValue = 584 // Bange et al. 2002
            //[Phenology].Vegetative.Target.SquaringTT.FixedValue = 320
            //[Phenology].Squaring.Target.FloweringTT.FixedValue = 520
            //[Phenology].EarlyFlowering.Target.elseDefaultValue.FixedValue = 380
            //[Phenology].BollFilling.Target.FixedValue = 260
            //[Phenology].Maturing.Target.FixedValue = 200
            [Leaf].Photosynthesis.RUE_Fixed.FixedValue = 1.5
            //[Leaf].Gsmax = 0.011
            //[Root].KNH4 - 0.02
            [Root].MaxDailyNUptake.XYPairs.Y = 10, 10
        Cultivar Sicot_70BRF
          Command:
            //[Phenology].Vegetative.Target.SquaringTT.FixedValue = 343
            //[Phenology].Squaring.Target.FloweringTT.FixedValue = 584
            //[Phenology].Vegetative.Target.SquaringTT.FixedValue = 320
            //[Phenology].Squaring.Target.FloweringTT.FixedValue = 480
            //[Phenology].EarlyFlowering.Target.elseDefaultValue.FixedValue = 330
            //[Phenology].BollFilling.Target.FixedValue = 210
            //[Phenology].Maturing.Target.FixedValue = 165
        Cultivar Sicot_746B3F
          Command:
            //[Phenology].Vegetative.Target.SquaringTT.FixedValue = 343
            //[Phenology].Squaring.Target.FloweringTT.FixedValue = 584
            //[Phenology].EarlyFlowering.Target.elseDefaultValue.FixedValue = 330
            //[Phenology].BollFilling.Target.FixedValue = 210
            //[Phenology].Maturing.Target.FixedValue = 165
      MovingAverageFunction WholePlantGrowthRate: NumberOfDays=7; StageToStartMovingAverage=Emergence
        VariableReference DailyRate: VariableName=[Arbitrator].TotalDMFixationSupply
      MovingAverageFunction AboveGroundGrowthRate: NumberOfDays=7; StageToStartMovingAverage=Emergence
        VariableReference DailyRate
          VariableName=[Leaf].Allocated.Wt + [Stem].Allocated.Wt + [Bur].Allocated.Wt + [Seed].Allocated.Wt + [Lint].Allocated.Wt
      MovingAverageFunction PotentialBollGrowthRate: NumberOfDays=7; StageToStartMovingAverage=Emergence
        VariableReference DailyRate
          VariableName=[Bur].DMDemand.Total + [Seed].DMDemand.Total + [Lint].DMDemand.Total
      MovingAverageFunction StomCond: NumberOfDays=7; StageToStartMovingAverage=Emergence
        VariableReference DailyRate: VariableName=[Cotton].Leaf.Gsmax
      MovingAverageFunction VPD: NumberOfDays=7; StageToStartMovingAverage=Emergence
        VariableReference DailyRate: VariableName=[Weather].VPD
      MovingAverageFunction MeanT: NumberOfDays=7; StageToStartMovingAverage=Emergence
        VariableReference DailyRate: VariableName=[Weather].MeanT
      MovingAverageFunction Radn: NumberOfDays=7; StageToStartMovingAverage=Emergence
        VariableReference DailyRate: VariableName=[Weather].Radn
  Folder Validation
    Soil Grey Vertosol NMM_20240207: ASCOrder=Vertosol; ASCSubOrder=Grey; SoilType=Clay; Site=Myall Vale; NearestTown=Narrabri, NSW 2390; Region=North West Slopes and Plains; State=New South Wales; Country=Australia; NaturalVegetation=Grasslands; ApsoilNumber=97; Latitude=-30.2056; Longitude=149.593; LocationAccuracy=+/- 20m; YearOfSampling=0; DataSource=CSIRO Plant Industry, Myall Vale (D Richards); Comments=Clay -
      Physical
        Thickness  BD    AirDry  LL15   DUL    SAT
        150        1.31  0.109   0.109  0.41   0.506
        100        1.26  0.216   0.27   0.44   0.488
        100        1.35  0.27    0.27   0.437  0.487
        100        1.35  0.264   0.264  0.437  0.487
        100        1.35  0.264   0.264  0.437  0.487
        100        1.35  0.264   0.264  0.437  0.487
        250        1.39  0.264   0.264  0.435  0.475
        200        1.44  0.264   0.264  0.424  0.457
        200        1.45  0.264   0.264  0.424  0.453
        BD, DUL source: Field measured and checked for sensibility
        AirDry, LL15 source: Estimated based on local knowledge
        SAT source: Calculated from measured, estimated or calculated BD
        SoilCrop CottonSoil
          LL=[0.109, 0.27, 0.27, 0.264, 0.264, 0.264, 0.277, 0.302, 0.302]
          KL=[0.1, 0.06, 0.06, 0.04, 0.04, 0.04, 0.04, 0.02, 0.02]
          XF=[1, 1, 1, 1, 1, 1, 1, 1, 1]
          LL source: Field measured and checked for sensibility
      WaterBalance SoilWater: SummerDate=1-Nov; SummerU=6; SummerCona=3.5; WinterDate=1-Apr; WinterU=4; WinterCona=2.5; DiffusConst=40; DiffusSlope=16; Salb=0.12; CN2Bare=73; CNRed=20; CNCov=0.8; PSIDul=-100; Thickness=[150, 150, 300, 300, 300, 300, 300]; SWCON=[0.3, 0.3, 0.3, 0.3, 0.3, 0.3, 0.3]
      Organic: FOMCNRatio=40; CarbonUnits=Total
        Thickness  Carbon  SoilCNRatio  FBiom  FInert  FOM
        150        0.88    12           0.04   0.4     347.129
        150        0.76    12           0.02   0.6     270.344
        300        0.62    12           0.02   0.8     163.972
        300        0.32    12           0.02   1       99.454
        300        0.12    12           0.01   1       60.322
        300        0.1     12           0.01   1       36.587
        300        0.05    12           0.01   1       22.191
      Chemical: Thickness=[150, 150, 300, 300, 300, 300, 300]; PH=[8.9, 9.2, 9.3, 9, 8.8, 7.5, 8.4]; PHUnits=Water
        PH source: Estimated based on local knowledge
      Nutrient
      Water: Thickness=[150, 100, 100, 100, 100, 100, 250, 200, 200]; InitialPAWmm=177.4; RelativeTo=LL15; FilledFromTop=false
        InitialValues=[0.163, 0.488, 0.487, 0.487, 0.487, 0.487, 0.37, 0.34, 0.35]
      CERESSoilTemperature
      Solute NO3: Thickness=[150, 150, 300, 300, 300, 300, 300]; InitialValues=[29.7, 18.3, 6.4, 4, 3, 2.8, 0]; InitialValuesUnits=ppm; WaterTableConcentration=0; D0=0; DepthConstant=0; MaxDepthSoluteAccessible=0; RunoffEffectivenessAtMovingSolute=0; MaxEffectiveRunoff=0
      Solute NH4: Thickness=[150, 150, 300, 300, 300, 300, 300]; InitialValues=[0, 0, 0, 0, 0, 0, 0]; InitialValuesUnits=ppm; WaterTableConcentration=0; D0=0; DepthConstant=0; MaxDepthSoluteAccessible=0; RunoffEffectivenessAtMovingSolute=0; MaxEffectiveRunoff=0
      Solute Urea: same as Validation.Grey Vertosol NMM_20240207.NH4
      Memo
        If you look at the weather files all experiments were pre irrigated in late September – early October so soil profile would have been at DUL below surface layer(s) at planting.

        A combination of post establishment rain, clay soil and very slow crop growth (cold soil and temperatures) meant probes to 1.3 m could not be installed until about a month after establishment.

        Only the surface layers would have dried slightly by 1st probe readings.

        The plants are tiny at this stage at Narrabri so you could assume Dul below about 15 cm.

        APSIM could calculate the soil Et between planting and  probe measurement. Then if needed re set soil water = observed at first measurement and let simulation continue from that point – the error should be small.
    Soil Grey Vertosol NMM: ASCOrder=Vertosol; ASCSubOrder=Grey; SoilType=Clay; Site=Myall Vale; NearestTown=Narrabri, NSW 2390; Region=North West Slopes and Plains; State=New South Wales; Country=Australia; NaturalVegetation=Grasslands; ApsoilNumber=97; Latitude=-30.2056; Longitude=149.593; LocationAccuracy=+/- 20m; YearOfSampling=0; DataSource=CSIRO Plant Industry, Myall Vale (D Richards); Comments=Clay -
      Physical
        Thickness  BD    AirDry  LL15   DUL    SAT
        150        1.31  0.109   0.109  0.475  0.476
        100        1.26  0.168   0.27   0.438  0.494
        100        1.35  0.168   0.27   0.437  0.491
        100        1.35  0.195   0.264  0.437  0.462
        100        1.35  0.195   0.264  0.437  0.462
        100        1.35  0.244   0.264  0.437  0.462
        250        1.39  0.264   0.264  0.435  0.446
        200        1.44  0.264   0.264  0.424  0.428
        200        1.45  0.264   0.264  0.424  0.424
        BD, DUL source: Field measured and checked for sensibility
        AirDry, LL15 source: Estimated based on local knowledge
        SAT source: Calculated from measured, estimated or calculated BD
        SoilCrop CottonSoil
          LL=[0.109, 0.21, 0.21, 0.244, 0.244, 0.244, 0.277, 0.302, 0.302]
          KL=[0.06, 0.06, 0.06, 0.04, 0.04, 0.04, 0.04, 0.02, 0.02]
          XF=[1, 1, 1, 1, 1, 1, 1, 1, 1]
          LL source: Field measured and checked for sensibility
      WaterBalance SoilWater: same as Validation.Grey Vertosol NMM_20240207.SoilWater
      Organic: same as Validation.Grey Vertosol NMM_20240207.Organic
      Chemical: same as Validation.Grey Vertosol NMM_20240207.Chemical
      Nutrient
      Water: Thickness=[150, 100, 100, 100, 100, 100, 250, 200, 200]; InitialPAWmm=123.5; RelativeTo=LL15; FilledFromTop=true
        InitialValues=[0.475, 0.438, 0.437, 0.437, 0.437, 0.269, 0.264, 0.264, 0.264]
      CERESSoilTemperature
      Solute NO3: same as Validation.Grey Vertosol NMM_20240207.NO3
      Solute NH4: same as Validation.Grey Vertosol NMM_20240207.NH4
      Solute Urea: same as Validation.Grey Vertosol NMM_20240207.NH4
      Memo: same as Validation.Grey Vertosol NMM_20240207.Memo
    Folder Narrabri Deficit Trial 2006
      Memo
        CRDC and Cottoninfo, 2018. NUTRIpak. A practical guide to cotton nutrition, Cotton Research and Development Corporation.

        To achieve high cotton yields, an uptake of about 250 kg N/
        ha is needed. In irrigated crops, most N taken up by the crop
        comes from the surface (0 to 50 cm) soil from where organic
        matter, mineralised N and fertiliser N are commonly located.

        With only one fert application on 2006-08-22 [Fertiliser].Apply(200, Fertiliser.Types.UreaN,10); not even half of this was taken up and this was a high yielding crop!!!!!
      Memo Phenology stages Observed
        Stage|Ir80|DAS|Ir45|DAS
        -|-|-|-|-
        Sowing|10 Oct 2006|0|10 Oct 2006|0
        Emergence|19 Oct 2006|9|19 Oct 2006|9
        Squaring|1 Dec 2006|52|1 Dec 2006|52
        Flowering|20 Dec 2006|71|20 Dec 2006|71
        Cutout|3 Feb 2007|116|23 Jan 2007|105
        OpenBolls|2 Mar 2007|143|13 Feb 2007|126
        Maturity|22 Mar 2007|163|10 Mar 2007|151
        HarvestRipe|3 Apr 2007|175|21 Mar 2007|162
      Experiment NAR0607
        Factors Series
          CompositeFactor Ir80: Specifications=[FurrowIrrigation]
            Manager FurrowIrrigation
              IrrigateDates = 28-sep, 1-dec, 15-dec, 29-dec, 8-jan, 17-jan, 23-jan, 30-jan, 5-feb, 14-feb, 24-feb, 14-mar
              asw_depth = 9
              crit_fr_asw = 1
```csharp
using Models.Interfaces;
using System;
using System.Linq;
using Models.Core;
using System.Collections.Generic;
using System.Text;
using Models.Soils;
using Models.PMF;
using System.Xml.Serialization;
using APSIM.Shared.Utilities;

namespace Models
{
    [Serializable]
    public class Script : Model
    {
        // Links
        [Link] Clock clock;
        [Link] Irrigation Irrigation;
        [Link] Soil Soil;
        [Link] IPhysical soilPhysical;
        [Link] ISoilWater waterBalance;

        // Fields
        public double SW_now;
        public double CLL_now;
        public double SW_full;

        // Properties
        [Description("Enter the irrigation dates as dd-mmm with comma separation (any year information entered will be ignored)")]
        public string[] IrrigateDates { get; set; } // Chosen date for irrigation
        [Description("Number of soil layers used in calculating SW deficit")]
        public int asw_depth { get; set; } // Change to int for layer count
        [Description("Fraction of ASW below which irrigation is applied (0-1.0)")]
        public double crit_fr_asw { get; set; } // Critical fraction of available soil water before applying irrigation

        // Output variables
        public double[] inflow_lat { get; set; }
        public double applied_furrow_irrigation { get; set; }

        // Methods

        // Calculate static soil variables
        [EventSubscribe("StartOfSimulation")]
        private void OnStartOfSimulation(object sender, EventArgs e)
        {
            // Initialize inflow_lat array
            inflow_lat = new double[soilPhysical.DULmm.Length];
        }

        // Determine daily requirement for irrigation
        [EventSubscribe("StartOfDay")]
        private void OnStartOfDay(object sender, EventArgs e)
        {
          foreach (string ddMMM in IrrigateDates)
          {
            // Check if today is the chosen irrigation date
            if (DateUtilities.DatesEqual(ddMMM, clock.Today))
            {
                // Calculate soil water variables
                double[] SW_add = new double[soilPhysical.DULmm.Length];
                for (int layer = 0; layer < asw_depth; layer++)
                {
                    SW_now += waterBalance.SWmm[layer];
                    CLL_now += soilPhysical.LL15mm[layer];
                    SW_full += (soilPhysical.DULmm[layer] - soilPhysical.LL15mm[layer]);
                    SW_add[layer] = soilPhysical.DULmm[layer] - waterBalance.SWmm[layer];
                }

                // Is the soil water deficit greater than the critical SW fraction?
                if ((SW_now - CLL_now) <= (SW_full * crit_fr_asw))
                {
                    // Calculate irrigation and apply it
                    for (int layer = 1; layer < asw_depth; layer++)
                    {
                        inflow_lat[layer] = SW_add[layer] + (SW_add[0] / (asw_depth - 1));
                        applied_furrow_irrigation += inflow_lat[layer];
                        Irrigation.Apply(inflow_lat[layer], depth: soilPhysical.Thickness[layer]);
                    }
                }
                else
                {
                    for (int layer = 0; layer < soilPhysical.DULmm.Length; layer++)
                    {
                        inflow_lat[layer] = 0;
                        applied_furrow_irrigation = 0;
                    }
                }
            }
        }
    }
}}
```
          CompositeFactor Ir45: Specifications=[FurrowIrrigation]
            Manager FurrowIrrigation
              IrrigateDates = 28-sep, 21-dec, 17-jan, 5-feb
              asw_depth = 9
              crit_fr_asw = 1
              script: same as in Validation.Narrabri Deficit Trial 2006.NAR0607.Series.Ir80.FurrowIrrigation
        Simulation NAR0607Base
          Clock: Start=2006-08-01; End=2007-04-19
          Summary summaryfile
          Weather: FileName=Weatherfiles/Narrabri_2006-07.met
          SoilArbitrator Soil Arbitrator
          MicroClimate: a_interception=0; b_interception=1; c_interception=0; d_interception=0; SoilHeatFluxFraction=0.4; MinimumHeightDiffForNewLayer=0; NightInterceptionFraction=0.5; ReferenceHeight=2
          Zone paddock: Area=1; Slope=0; AspectAngle=0; Altitude=50
            Manager Sowing
              Crop = [Cotton]
              SowDate = 10-oct
              CultivarName = Sicot_71B
              SowingDepth = 50
              RowSpacing = 1000
              Population = 11
```csharp
using APSIM.Shared.Utilities;
using Models.Utilities;
using Models.Soils;
using Models.PMF;
using Models.Core;
using System;

namespace Models
{
    [Serializable]
    public class Script : Model
    {
        [Link] Clock Clock;
        [Link] Fertiliser Fertiliser;
        [Link] Summary Summary;
        [Link] Soil Soil;
        
        [Description("Crop")]
        public IPlant Crop { get; set; }

        [Description("Sowing date (d-mmm)")]
        public string SowDate { get; set; }

        [Display(Type = DisplayType.CultivarName)]
        [Description("Cultivar to be sown")]
        public string CultivarName { get; set; }

        [Description("Sowing depth (mm)")]
        public double SowingDepth { get; set; }

        [Description("Row spacing (mm)")]
        public double RowSpacing { get; set; }

        [Description("Plant population (/m2)")]
        public double Population { get; set; }

        [EventSubscribe("DoManagement")]
        private void OnDoManagement(object sender, EventArgs e)
        {
            if (DateUtilities.WithinDates(SowDate, Clock.Today, SowDate))
            {
                Crop.Sow(population: Population, cultivar: CultivarName, depth: SowingDepth, rowSpacing: RowSpacing);    
            }
        }
    }
}
```
            Fertiliser
            Operations FertiliserEvents
              2006-08-22  [Fertiliser].Apply(200, Fertiliser.Types.UreaN,10);
            Irrigation
            Manager FurrowIrrigation
              IrrigateDates = 28-sep
              asw_depth = 9
              crit_fr_asw = 1
              script: same as in Validation.Narrabri Deficit Trial 2006.NAR0607.Series.Ir80.FurrowIrrigation
            Manager Harvesting
```csharp
using Models.PMF.Phen;
using APSIM.Shared.Utilities;
using System.Xml.Serialization;
using Models;
using Models.PMF;
using Models.Soils;
using System.Text;
using System.Collections.Generic;
using Models.Core;
using System;
using Models.Soils.Nutrients;

namespace Models
{
    [Serializable] 
    public class Script : Model
    {
        [Link] private Plant Cotton;
        [Link] private Zone zone;
        [Link(Type = LinkType.Path, Path = "[Cotton].Phenology")]
        private Phenology phenology;
                    
        
        [EventSubscribe("StartOfSimulation")]
        private void OnSimulationCommencing(object sender, EventArgs e)
        {
        }
        
        [EventSubscribe("DoManagement")]
        private void OnDoManagement(object sender, EventArgs e)
        {
            if (phenology.CurrentPhase.Name == "ReadyForHarvesting")
            {
                Cotton.Harvest();
                Cotton.EndCrop();
            }
        }
        
        [EventSubscribe("DoManagementCalculations")]
        private void OnDoManagementCalculations(object sender, EventArgs e)
        {
            
        }
    }
}
```
            Manager ResetWater
              ResetDate = 22-nov
              OffsetDays = 0
              ResetWater = No
              ResetNutrients = No
              ResetSOM = No
```csharp
using Models.Soils.Nutrients;
using APSIM.Shared.Utilities;
using Models.Surface;
using Models.Utilities;
using Models.Soils.Nutrients;
using Models.Soils;
using Models.PMF;
using Models.Core;
using System;
using System.Linq;
using Models.Interfaces;

namespace Models
{
    [Serializable]
    public class Script : Model
    {
        [Link] private Clock Clock;
        [Link] private Plant Wheat;
        [Link] private ISoilWater SoilWater;
        [Link] private Nutrient nutrient;
        [Link] private SurfaceOrganicMatter SOM;
        [Link] private Summary Summary;

        [Description("Date to reset on:")]
        public string ResetDate {get;set;}
        
        [Description("Offset by Days (Negative is Days Before, Positive is Days After):")]
        public int OffsetDays {get;set;}

        [Description("Reset Water? (Yes or No)")]
        public string ResetWater {get;set;}

        [Description("Reset Soil Nutrients ? (Yes or No)")]
        public string ResetNutrients {get;set;}

        [Description("Reset Surface Organic Matter? (Yes or No)")]
        public string ResetSOM {get;set;}

        [EventSubscribe("DoManagement")]
        private void OnDoManagement(object sender, EventArgs e)
        {
            DateTime offsetDate = DateUtilities.GetDate(ResetDate, Clock.Today).AddDays(OffsetDays);
            if (offsetDate.Equals(Clock.Today))
            {
                if (ResetWater == "Yes")
                {
                    Summary.WriteMessage(this, "Reset Water", MessageType.Diagnostic);
                    SoilWater.Reset();
                }
                if (ResetNutrients == "Yes")
                {
                    Summary.WriteMessage(this, "Reset Nitrogen", MessageType.Diagnostic);
                    nutrient.Reset();
                }
                if (ResetSOM == "Yes")
                {
                    Summary.WriteMessage(this, "Reset Surface OM", MessageType.Diagnostic);
                    SOM.Reset();
                }
            }
        }
    }
}
```
            Soil Grey Vertosol NMM: same as Validation.Grey Vertosol NMM
            SurfaceOrganicMatter: InitialResidueName=nativepasture; InitialResidueType=nativepasture; InitialResidueMass=0; InitialStandingFraction=0; InitialCPR=0; InitialCNR=0
            Plant Cotton: PlantType=Cotton
            Report NARDailyReport: EventNames=[Clock].DoReport
              VariableNames:
                [Clock].Today
                [Clock].Today.DayOfYear
                [Weather].Rain
                [Weather].MeanT
                [Weather].MaxT
                [Weather].MinT
                [Weather].Radn
                [Weather].VPD
                [Weather].CO2
                [Arbitrator].TotalDMFixationSupply
                [Cotton].DaysAfterSowing
                [Cotton].Arbitrator.DM.TotalPlantDemand
                [Cotton].Arbitrator.DM.TotalFixationSupply
                [Cotton].Arbitrator.TotalDMFixationSupply
                [Cotton].Arbitrator.N.TotalFixationSupply
                [Cotton].Arbitrator.N.TotalPlantDemand
                [Cotton].Arbitrator.N.TotalPlantSupply
                sum([Cotton].Arbitrator.N.Fixation) as NFixed
                //(ln([Cotton].WholePlantGrowthRate)) as RGR
                [Cotton].WholePlantGrowthRate
                [Cotton].AboveGroundGrowthRate
                [Cotton].PotentialBollGrowthRate
                [Cotton].NitrogenUptake
                [Cotton].Phenology.Stage
                [Cotton].Phenology.ThermalTime
                [Cotton].Phenology.AccumulatedTT
                [Cotton].Phenology.CurrentStageName
                [Cotton].Phenology.Photoperiod
                [Cotton].Phenology.EmergenceDAS
                [Cotton].Phenology.SquaringDAS
                [Cotton].Phenology.FloweringDAS
                [Cotton].Phenology.CutoutDAS
                [Cotton].Phenology.OpenbollsDAS
                [Cotton].Phenology.MaturityDAS
                [Cotton].Phenology.EarlyFlowering.BollRatio
                [Cotton].Phenology.EarlyFlowering.FractionComplete
                [Cotton].AboveGround.Wt
                [Cotton].AboveGround.N
                [Cotton].AboveGroundLive.Wt
                [Cotton].Boll.Nconc
                [Cotton].Leaf.NodeNumber
                [Cotton].Leaf.Fw
                [Cotton].Leaf.Fn
                [Cotton].Leaf.Photosynthesis.FT
                [Cotton].Leaf.Photosynthesis.FVPD
                [Cotton].Leaf.LAI
                [Cotton].Leaf.HeightFunction
                [Cotton].Leaf.Height
                [Cotton].Leaf.CoverGreen
                [Cotton].Leaf.CoverTotal
                [Cotton].Leaf.Live.Wt
                [Cotton].Leaf.Live.StructuralWt
                [Cotton].Leaf.Live.MetabolicWt
                [Cotton].Leaf.Allocated.MetabolicWt
                [Cotton].Leaf.Allocated.StructuralWt
                [Cotton].Leaf.DMDemand.Total
                [Cotton].Leaf.Dead.StructuralWt
                [Cotton].Leaf.Dead.MetabolicWt
                [Cotton].Leaf.Live.N
                [Cotton].Leaf.Live.NConc
                [Cotton].Leaf.Dead.Wt
                [Cotton].Leaf.Dead.N
                [Cotton].Leaf.Dead.NConc
                [Cotton].Leaf.RadiationIntercepted
                [Cotton].Leaf.Wt
                [Cotton].Leaf.Nconc
                [Cotton].Leaf.N
                [Cotton].Leaf.Senesced.Wt
                [Cotton].Leaf.BranchNumber
                [Cotton].Leaf.SpecificAreaCanopy
                [Cotton].Leaf.Sites
                [Cotton].Leaf.SpecificArea
                [Cotton].Leaf.CoverTotal
                [Cotton].Stem.Wt
                [Cotton].Stem.Total.StructuralWt
                [Cotton].Stem.Live.StructuralWt
                [Cotton].Stem.Live.StructuralN
                [Cotton].Stem.N
                [Cotton].Stem.Nconc
                [Cotton].Lint.Wt
                [Cotton].Lint.N
                [Cotton].Lint.Nconc
                [Cotton].Lint.Bales as Bales
                [Cotton].Lint.Allocated.Wt
                [Cotton].Bur.HarvestIndex
                [Cotton].Bur.PotentialHarvestIndex
                [Cotton].Lint.HarvestIndex
                [Cotton].Lint.PotentialHarvestIndex
                [Cotton].Seed.HarvestIndex
                [Cotton].Seed.PotentialHarvestIndex
                [Cotton].Lint.DMDemand.Total
                [Cotton].Leaf.DMDemand.Total
                [Cotton].Bur.DMDemand.Total
                [Cotton].Seed.DMDemand.Total
                [Cotton].Stem.DMDemand.Total
                ([Cotton].Bur.DMDemand.Total+[Cotton].Lint.DMDemand.Total+[Cotton].Seed.DMDemand.Total) as BollDemand
                ([Cotton].Stem.DMDemand.Total+[Cotton].Leaf.DMDemand.Total) as VegetativeDemand
                //([Cotton].Stem.DMDemand.Total+[Cotton].Leaf.DMDemand.Total+[Cotton].Lint.DMDemand.Total+[Cotton].Seed.DMDemand.Total+[Cotton].Bur.DMDemand.Total) as ShootDMDemand
                ([Cotton].Stem.DMDemand.Total+[Cotton].Leaf.DMDemand.Total+[Cotton].Root.DMDemand.Total) as ShootDMDemand
                [Cotton].Root.DMDemand.Total
                [Cotton].Lint.NDemand.Total
                [Cotton].Leaf.NDemand.Total
                [Cotton].Stem.NDemand.Total
                [Cotton].Root.NDemand.Total
                [Cotton].Root.NUptake
                [Cotton].Lint.LiveFWt
                [Cotton].Root.Wt
                [Cotton].Root.Depth
                [Soil].Water.Volumetric[1:3]
                [Soil].Water.Volumetric
                sum([Soil].SoilWater.ESW) as TotalESW
                [Soil].SoilWater.SW
                ([Soil].SoilWater.SWmm[1]+[Soil].SoilWater.SWmm[2]+[Soil].SoilWater.SWmm[3]+[Soil].SoilWater.SWmm[4]+[Soil].SoilWater.SWmm[5]+[Soil].SoilWater.SWmm[6]) as SWmm1800
                ([Soil].SoilWater.ESW[1]+[Soil].SoilWater.ESW[2]+[Soil].SoilWater.ESW[3]+[Soil].SoilWater.ESW[4]+[Soil].SoilWater.ESW[5]+[Soil].SoilWater.ESW[6]) as ESW1800
                sum([Soil].Water.Volumetric) as TotalSWC
                sum([Soil].Water.MM) as TotalWaterMM
                ([Soil].Water.MM[1]+[Soil].Water.MM[2]+[Soil].Water.MM[3]+[Soil].Water.MM[4]+[Soil].Water.MM[5]+[Soil].Water.MM[6]+[Soil].Water.MM[7]) as SW1500mm
                ([Soil].Water.MM[1]+[Soil].Water.MM[2]+[Soil].Water.MM[3]+[Soil].Water.MM[4]+[Soil].Water.MM[5]+[Soil].Water.MM[6]) as SW1800mm
                ([Soil].Water.MM[1]+[Soil].Water.MM[2]+[Soil].Water.MM[3]+[Soil].Water.MM[4]+[Soil].Water.MM[5]) as SW1200mm
                (sum([CottonSoil].PAWmm)/sum([CottonSoil].PAWCmm)) as AvailableSoilMoisture
                ([CottonSoil].PAWmm[1]+[CottonSoil].PAWmm[2]+[CottonSoil].PAWmm[3]+[CottonSoil].PAWmm[4]+[CottonSoil].PAWmm[5]) as PAWTop5Layers
                -(([CottonSoil].PAWCmm[1]+[CottonSoil].PAWCmm[2]+[CottonSoil].PAWCmm[3]+[CottonSoil].PAWCmm[4]+[CottonSoil].PAWCmm[5])-([CottonSoil].PAWmm[1]+[CottonSoil].PAWmm[2]+[CottonSoil].PAWmm[3]+[CottonSoil].PAWmm[4]+[CottonSoil].PAWmm[5])) as SoilWaterDeficit120
                [Irrigation].IrrigationApplied
                [Cotton].Boll.Wt
                [Cotton].Lint.Wt
                [Cotton].Seed.Wt
                ([Cotton].Seed.Wt+[Cotton].Lint.Wt) as SeedLint
                [Cotton].Bur.Wt
                sum([Soil].SoilWater.SWmm) as TotalSWmm
                ([Soil].SoilWater.SWmm[1]) as SW1
                ([Soil].SoilWater.SWmm[2]) as SW2
                ([Soil].SoilWater.SWmm[3]) as SW3
                ([Soil].SoilWater.SWmm[4]) as SW4
                ([Soil].SoilWater.SWmm[5]) as SW5
                ([Soil].SoilWater.SWmm[6]) as SW6
                ([Soil].SoilWater.SWmm[7]) as SW7
                //([Soil].SoilWater.SWmm[8]) as SW8
                //([Soil].SoilWater.SWmm[9]) as SW9
                ([Soil].SoilWater.SWmm[1]+[Soil].SoilWater.SWmm[2]+[Soil].SoilWater.SWmm[3]+[Soil].SoilWater.SWmm[4]+[Soil].SoilWater.SWmm[5]+[Soil].SoilWater.SWmm[6]) as SWmm1800
                //to disable reporting
                //([Soil].SoilWater.SWmm[1]+[Soil].SoilWater.SWmm[2]+[Soil].SoilWater.SWmm[3]+[Soil].SoilWater.SWmm[4]+[Soil].SoilWater.SWmm[5]+[Soil].SoilWater.SWmm[6]+[Soil].SoilWater.SWmm[7]+[Soil].SoilWater.SWmm[8]) as SWmm2400
                [Soil].SoilWater.ESW[1] as ESW1
                [Soil].SoilWater.ESW[2] as ESW2
                [Soil].SoilWater.ESW[3] as ESW3
                [Soil].SoilWater.ESW[4] as ESW4
                [Soil].SoilWater.ESW[5] as ESW5
                [Soil].SoilWater.ESW[6] as ESW6
                [Soil].SoilWater.ESW[7] as ESW7
                [Soil].SoilWater.ESW[8] as ESW8
                [Soil].SoilWater.ESW[9] as ESW9
                [Soil].SoilWater.PAWmm[1] as PAW1
                [Cotton].Arbitrator.SDRatio
                [Cotton].Arbitrator.SDRatioBound
                sum([Soil].NO3.kgha) as TotalSoilNO3
                sum([Soil]..NH4.kgha) as TotalSoilNH4
                sum([Soil].Water.MM) as TotalSW
                sum([Soil].NH4.ppm) as NH4
                [Soil].NO3.ppm[1] as NO3_1_ppm
                [Soil].NO3.ppm[2] as NO3_2_ppm
                [Soil].NO3.ppm[3] as NO3_3_ppm
                [Soil].NO3.ppm[4] as NO3_4_ppm
                [Soil].NO3.ppm[5] as NO3_5_ppm
                [Soil].NO3.ppm[6] as NO3_6_ppm
                [Soil].NO3.ppm[7] as NO3_7_ppm
                sum([Soil].NO3.ppm) as NO3_total
                [Soil].NO3.kgha[1] as NO3_1_kgha
                [Soil].NO3.kgha[2] as NO3_2_kgha
                [Soil].NO3.kgha[3] as NO3_3_kgha
                [Soil].NO3.kgha[4] as NO3_4_kgha
                [Soil].NO3.kgha[5] as NO3_5_kgha
                [Soil].NO3.kgha[6] as NO3_6_kgha
                [Fertiliser].NitrogenApplied
                [Cotton].Leaf.Photosynthesis.RUE
                [Cotton].Boll.N
                [Cotton].Leaf.N
                [Cotton].Stem.N
                //[FurrowIrrigation].Script.crit_fr_asw as CRITFRASW
                //[FurrowIrrigation].Script.asw_depth as ASWDEPTH
                //[FurrowIrrigation].Script.applied_furrow_irrigation as FURROW_APPLIED
                [Irrigation].IrrigationApplied
                [Cotton].Boll.HarvestIndex
                [Soil].Organic.Carbon
                [Phenology].CurrentPhaseName
                [Arbitrator].TotalDMFixationSupply
                [Phenology].BollPeriod
                [Phenology].BollFilling.Target
                [Cotton].WholePlantGrowthRate
                [Cotton].AboveGroundGrowthRate
                [Cotton].PotentialBollGrowthRate
                [Cotton].Root.NUptake
                [Cotton].Total.N
                ([Soil].SoilWater.SWmm[1]+[Soil].SoilWater.SWmm[2]+[Soil].SoilWater.SWmm[3]) as KRS_SW_Layer1
                [Cotton].Leaf.Photosynthesis.RadnInt
                ([Cotton].Leaf.Nconc/[Cotton].Leaf.SpecificArea) as SLN
                [Cotton].Leaf.RadiationIntercepted
                [MicroClimate].RadiationInterception
                [Cotton].Leaf.SLA_DynamicTEST.Beer-Lambert
                [Weather].DiffuseFraction
                //[Cotton].Leaf.SLA_DynamicTEST.SLA_Reddy1997
                //[Cotton].Leaf.Photosynthesis
                //[Cotton].SowingData.Population
                //[Cotton].Leaf.BranchNumber.FruitingBranches
                //[Cotton].Leaf.BranchNumber.VegetativeBranches
                //([Cotton].Leaf.DMDemands.Structural.DeltaLAIPotential.LeafGrowthStage.Delta.EmergingLeaves*[Cotton].Leaf.DMDemands.Structural.DeltaLAIPotential.LeafGrowthStage.Delta.PlantNumber) as NumberOfLeaves
                //[Cotton].Leaf.SLA_DynamicTEST.SLA_Reddy1989
                //[Cotton].Leaf.SLA_Reddy1989.RADint
                [Cotton].Leaf.Plastochron
                ([Cotton].Leaf.FinalLeafNumber*[Cotton].SowingData.Population) as LeafNumber
                [Cotton].Leaf.FirstFruitingBranch
                [Cotton].Leaf.TotalNumber
                [Soil].SoilWater.ESW
                [Soil].Water.PAWmm
                [Physical].PAWCmm
                [CottonSoil].PAWmm
                [CottonSoil].PAWCmm
                //[Cotton].Root.SMI
                [Cotton].Leaf.Photosynthesis
                //[Cotton].Leaf.Transpiration
                //[Cotton].Leaf.Gsmax350
                //[Cotton].Leaf.Gsmax
                //[Cotton].Leaf.SpecificArea
                //[Cotton].StomCond
                //[Cotton].Population
                //[Cotton].Leaf.SLA_DynamicTEST.SLA_Gsmax
                //[Cotton].Leaf.SLA_DynamicTEST.SpecificArea_TempPAR
                //[Cotton].Leaf.PlantSupplyDemand
                //[Cotton].Leaf.RadiationIntercepted
                //[Cotton].Leaf.Photosynthesis
                //[Cotton].Leaf.SLA_DynamicTEST.SLA_RGR
                sum([PAWCInRootZone].Script.PAWInRootZone)
                sum([PAWCInRootZone].Script.PAWCInRootZone)
                [Cotton].Root.SMI
                [Cotton].Root.PAW_ratio
                [Cotton].Leaf.RUE_DynamicTEST.CO2_CompensationPoint
                [Cotton].Leaf.RUE_DynamicTEST.Jmax25
                [Cotton].Leaf.RUE_DynamicTEST.Jmax
                [Cotton].Leaf.RUE_DynamicTEST.Cc
                [Cotton].Leaf.RUE_DynamicTEST.Iinc
                [Cotton].Leaf.RUE_DynamicTEST.CanopyLightUseEfficiency.Term1
                [Cotton].Leaf.RUE_DynamicTEST.CanopyLightUseEfficiency.MultiplyFunction.Term2
                [Cotton].Leaf.RUE_DynamicTEST.CanopyLightUseEfficiency.MultiplyFunction.Term3
                [Cotton].Leaf.RUE_DynamicTEST.CanopyLightUseEfficiency
                [Cotton].Leaf.RUE_DynamicTEST.RP
                [Cotton].Leaf.RUE_DynamicTEST.CBiom
                [Cotton].Leaf.RUE_DynamicTEST.RadiationUseEfficiency
                [Cotton].Leaf.RUE_DynamicTEST.MovingAverageRUE
                [Cotton].Leaf.Photosynthesis.RUE
                [Cotton].Leaf.Photosynthesis.RUE_Fixed
            Report HarvestReport: same as Replacements.HarvestReport
      Folder Graphs
        Folder Canopy
          Memo
            Low temp (temp stress early on) so small leaves --> low LAI
        Memo
          Should resemble an S-curve
    Folder Douglas Daly Row Spacing 2021
      Memo
        08/12/2023:

        This site has vegetative branches, starting sometimes at node 1, with large leaf area on nodes 4 and 5. In the current model, branches are simulated from node 7.

        Also LAI relative area is based on phenological stage --> with 10% at flowering / this is at a much higher node number, so for DDRF the early large canopy will never be achieved

        Requires:

        1. RelativeArea to be based on node number, with about node 3 about 0.4 and 4 0.7 ' flowering 0.6 already compared with 0.2 for narrabri --> because of veg branches!!!
        2. Branching_Rate to start at Node 1
        3. [Leaf].AreaLargestLeaf.FixedValue should be 0.025 or even 0.06 (Burdekin data)!!!!!

        Until squaring, leaf area mostly from mainstem leaves

        Leaf area follows a sigmoidal growth pattern, characterised by a lag phase, an exponential growth phase, and a plateau
        phase. The lag phase was already discussed, and in this stage of growth, leaf area is entirely accounted for by mainstem
        leaves. Sometime between squaring and flowering, leaf area enters an exponential growth phase.

        * Site production simulation? Obs vs pred not correct!
        * Parameter R reduce from 0.5 to 0.3?

        =========================================================

        Harvest Index:

        Lint: 0.45

        Seed: 0.65

        Bur: 0.10
      Memo Phenology stages Observed
        Stage|RS1000|DAS|RS500|DAS
        -|-|-|-|-
        Sowing|7 Jan 2021|0|7 Jan 2021|0
        Squaring|10 Feb 2021|34|10 Feb 2021|34
        Flowering|3 Mar 2021|55|3 Mar 2021|55
        Cutout|22 Mar 2021|74|22 Mar 2021|74
        OpenBolls|21 Apr 2021|104|21 Apr 2021|104
        Maturity|19 May 2021|132|5 May 2021|132
        HarvestRipe|2 Jun 2021|146|2 Jun 2021|146
      Experiment DDRF21
        Factors
          CompositeFactor RS1000: Specifications=[Operations]
            Operations
              2021-01-07  [Cotton].Sow(population: 7, cultivar: Sicot_748B3F , depth: 20, rowSpacing: 1000);
              2021-01-28  [Fertiliser].Apply(64.4, Fertiliser.Types.UreaN,10);
              2021-02-16  [Fertiliser].Apply(64.4, Fertiliser.Types.UreaN,10);
          CompositeFactor RS500: Specifications=[Operations]
            Operations
              2021-01-07  [Cotton].Sow(population: 14, cultivar: Sicot_748B3F , depth: 20, rowSpacing: 500);
              2021-01-28  [Fertiliser].Apply(64.4, Fertiliser.Types.UreaN,10);
              2021-02-16  [Fertiliser].Apply(64.4, Fertiliser.Types.UreaN,10);
        Simulation DDRF21Base
          Clock: Start=2021-01-01; End=2021-06-30
          Summary summaryfile
          Weather: FileName=Weatherfiles/NT_RS-DDRF2021.met
          SoilArbitrator Soil Arbitrator
          MicroClimate: a_interception=0; b_interception=1; c_interception=0; d_interception=0; SoilHeatFluxFraction=0.4; MinimumHeightDiffForNewLayer=0; NightInterceptionFraction=0.5; ReferenceHeight=2
          Zone paddock: Area=1; Slope=0; AspectAngle=0; Altitude=50
            Fertiliser
            Operations
            Irrigation
            Manager Harvesting: same as Validation.Narrabri Deficit Trial 2006.NAR0607.NAR0607Base.paddock.Harvesting
            Soil Tindall DDRF 2021 adjusted 20230629: SoilType=Haplic Mesotrophic Red Dermosol; LocalName=Tindall; Site=RS-DDRF; NearestTown=Pine Creek; Region=Daly Basin; State=Northern Territory; Country=Australia; Latitude=-13.83; Longitude=131.21; YearOfSampling=2021; DataSource=CSIRO/NTDPI
              Physical
                Thickness  BD    AirDry  LL15  DUL    SAT
                300        1.55  0.035   0.07  0.19   0.345
                300        1.66  0.11    0.15  0.265  0.324
                300        1.55  0.15    0.16  0.23   0.345
                300        1.61  0.18    0.18  0.265  0.322
                300        1.55  0.15    0.15  0.23   0.345
                300        1.55  0.15    0.15  0.23   0.345
                300        1.62  0.15    0.15  0.23   0.319
                DUL source: Field measured and checked for sensibility
                SoilCrop CottonSoil: LL=[0.07, 0.15, 0.15, 0.18, 0.15, 0.15, 0.15]; KL=[0.06, 0.04, 0.04, 0.02, 0.02, 0.02, 0.01]; XF=[1, 1, 1, 1, 1, 1, 1]
              WaterBalance SoilWater: SummerDate=1-Sep; SummerU=6; SummerCona=3.5; WinterDate=1-Jun; WinterU=4; WinterCona=2.5; DiffusConst=88; DiffusSlope=35.4; Salb=0.13; CN2Bare=80; CNRed=20; CNCov=0.8; PSIDul=-100; Thickness=[300, 300, 300, 300, 300, 300, 300]; SWCON=[0.9, 0.7, 0.5, 0.4, 0.4, 0.4, 0.4]
              Organic: FOMCNRatio=40; CarbonUnits=Total
                Thickness  Carbon  SoilCNRatio  FBiom  FInert  FOM
                300        0.33    12           0.035  0.3     237.302
                300        0.21    12           0.02   0.3     183.495
                300        0.16    12           0.02   0.4     141.889
                300        0.11    12           0.02   0.6     109.717
                300        0.1     12           0.01   0.9     84.839
                300        0.1     12           0.01   0.95    65.603
                300        0.1     12           0.01   0.95    50.728
                300        0.1     12           0.01   0.95    39.226
                300        0.1     12           0.01   0.95    30.332
                300        0.1     12           0.01   0.95    23.454
                300        0.1     12           0.01   0.95    18.136
                200        0.05    12           0.01   1       15.279
              CERESSoilTemperature Temperature
              Chemical: Thickness=[300, 300, 300, 300]; PH=[6.2, 6.3, 6.4, 6.4]; PHUnits=Water
                PH source: Measured (layer 1, 2, 3, 4)
              Nutrient
              Water: Thickness=[300, 300, 300, 300, 300, 300, 300]; InitialValues=[0.19, 0.265, 0.23, 0.18, 0.15, 0.15, 0.15]; InitialPAWmm=91.5; RelativeTo=LL15; FilledFromTop=true
              Solute NO3: Thickness=[300, 300, 300, 300]; InitialValues=[0.5, 0.6, 0.4, 0.4]; InitialValuesUnits=ppm; WaterTableConcentration=0; D0=0; DepthConstant=0; MaxDepthSoluteAccessible=0; RunoffEffectivenessAtMovingSolute=0; MaxEffectiveRunoff=0
              Solute NH4: Thickness=[300, 300, 300, 300]; InitialValues=[0.4, 0.4, 0.2, 0.2]; InitialValuesUnits=ppm; WaterTableConcentration=0; D0=0; DepthConstant=0; MaxDepthSoluteAccessible=0; RunoffEffectivenessAtMovingSolute=0; MaxEffectiveRunoff=0
              Solute Urea: Thickness=[1800]; InitialValuesUnits=ppm; WaterTableConcentration=0; D0=0; DepthConstant=0; MaxDepthSoluteAccessible=0; RunoffEffectivenessAtMovingSolute=0; MaxEffectiveRunoff=0
            SurfaceOrganicMatter: InitialResidueName=Improved pasture; InitialResidueType=nativepasture; InitialResidueMass=3833; InitialStandingFraction=1; InitialCPR=0; InitialCNR=34
            Plant Cotton: PlantType=Cotton
            Report DailyReport: EventNames=[Clock].DoReport
              VariableNames:
                [Clock].Today
                [Clock].Today.DayOfYear
                [Weather].Rain
                [Weather].MeanT
                [Weather].MaxT
                [Weather].MinT
                [Weather].Radn
                [Weather].VPD
                [Cotton].DaysAfterSowing
                [Cotton].Arbitrator.DM.TotalFixationSupply
                [Cotton].Arbitrator.TotalDMFixationSupply
                [Cotton].Arbitrator.N.TotalFixationSupply
                [Cotton].Arbitrator.N.TotalPlantDemand
                [Cotton].Arbitrator.N.TotalPlantSupply
                sum([Cotton].Arbitrator.N.Fixation) as NFixed
                [Cotton].NitrogenUptake
                [Cotton].Phenology.Stage
                [Cotton].Phenology.ThermalTime
                [Cotton].Phenology.CurrentStageName
                [Cotton].Phenology.Photoperiod
                [Cotton].Phenology.EmergenceDAS
                [Cotton].Phenology.SquaringDAS
                [Cotton].Phenology.FloweringDAS
                [Cotton].Phenology.CutoutDAS
                [Cotton].Phenology.OpenbollsDAS
                [Cotton].Phenology.MaturityDAS
                [Cotton].AboveGround.Wt
                [Cotton].AboveGround.N
                [Cotton].AboveGroundLive.Wt
                [Cotton].Leaf.NodeNumber
                [Cotton].Leaf.Fw
                [Cotton].Leaf.Fn
                [Cotton].Leaf.Photosynthesis.FT
                [Cotton].Leaf.Photosynthesis.FVPD
                [Cotton].Leaf.LAI
                [Cotton].Leaf.HeightFunction
                [Cotton].Leaf.Height
                [Cotton].Leaf.CoverGreen
                [Cotton].Leaf.CoverTotal
                [Cotton].Leaf.Live.Wt
                [Cotton].Leaf.Live.StructuralWt
                [Cotton].Leaf.Live.MetabolicWt
                [Cotton].Leaf.Allocated.MetabolicWt
                [Cotton].Leaf.Allocated.StructuralWt
                [Cotton].Leaf.Dead.StructuralWt
                [Cotton].Leaf.Dead.MetabolicWt
                [Cotton].Leaf.Live.N
                [Cotton].Leaf.Live.NConc
                [Cotton].Leaf.Dead.Wt
                [Cotton].Leaf.Dead.N
                [Cotton].Leaf.Dead.NConc
                [Cotton].Leaf.RadiationIntercepted
                [Cotton].Leaf.Wt
                [Cotton].Leaf.Nconc
                [Cotton].Leaf.N
                [Cotton].Leaf.Senesced.Wt
                [Cotton].Leaf.BranchNumber
                [Cotton].Leaf.SpecificAreaCanopy
                [Cotton].Leaf.Sites
                [Cotton].Leaf.SpecificArea
                [Cotton].Leaf.CoverTotal
                [Cotton].Stem.Wt
                [Cotton].Stem.Total.StructuralWt
                [Cotton].Stem.Live.StructuralWt
                [Cotton].Stem.Live.StructuralN
                [Cotton].Stem.N
                [Cotton].Stem.Nconc
                [Cotton].Lint.Wt
                [Cotton].Lint.N
                [Cotton].Lint.Nconc
                [Cotton].Lint.Bales as Bales
                [Cotton].Boll.HarvestIndex
                [Cotton].Lint.Allocated.Wt
                [Cotton].Lint.DMDemand.Total
                [Cotton].Leaf.DMDemand.Total
                [Cotton].Bur.DMDemand.Total
                [Cotton].Stem.DMDemand.Total
                ([Cotton].Bur.DMDemand.Total+[Cotton].Lint.DMDemand.Total+[Cotton].Seed.DMDemand.Total) as BollDMDemand
                ([Cotton].Stem.DMDemand.Total+[Cotton].Leaf.DMDemand.Total) as VegetativeDMDemand
                ([Cotton].Stem.DMDemand.Total+[Cotton].Leaf.DMDemand.Total+[Cotton].Lint.DMDemand.Total+[Cotton].Seed.DMDemand.Total+[Cotton].Bur.DMDemand.Total) as ShootDMDemand
                [Cotton].Root.DMDemand.Total
                [Cotton].Lint.NDemand.Total
                [Cotton].Leaf.NDemand.Total
                [Cotton].Stem.NDemand.Total
                [Cotton].Root.NDemand.Total
                [Cotton].Root.NUptake
                [Cotton].Lint.LiveFWt
                [Cotton].Root.Wt
                [Cotton].Root.Depth
                [Soil].Water.Volumetric[1:3]
                [Soil].Water.Volumetric
                sum([Soil].SoilWater.ESW) as TotalESW
                [Soil].SoilWater.SW
                ([Soil].SoilWater.SWmm[1]+[Soil].SoilWater.SWmm[2]+[Soil].SoilWater.SWmm[3]+[Soil].SoilWater.SWmm[4]+[Soil].SoilWater.SWmm[5]+[Soil].SoilWater.SWmm[6]) as SWmm1800
                ([Soil].SoilWater.ESW[1]+[Soil].SoilWater.ESW[2]+[Soil].SoilWater.ESW[3]+[Soil].SoilWater.ESW[4]+[Soil].SoilWater.ESW[5]+[Soil].SoilWater.ESW[6]) as ESW1800
                sum([Soil].NO3.kgha) as TotalSoilNO3
                sum([Soil]..NH4.kgha) as TotalSoilNH4
                sum([Soil].Water.MM) as TotalSW
                sum([Soil].NO3.ppm) as NO3
                sum([Soil].NH4.ppm) as NH4
                sum([Soil].Water.Volumetric) as TotalSWC
                sum([Soil].Water.MM) as TotalWaterMM
                ([Soil].Water.MM[1]+[Soil].Water.MM[2]+[Soil].Water.MM[3]+[Soil].Water.MM[4]+[Soil].Water.MM[5]+[Soil].Water.MM[6]+[Soil].Water.MM[7]) as SW1500mm
                ([Soil].Water.MM[1]+[Soil].Water.MM[2]+[Soil].Water.MM[3]+[Soil].Water.MM[4]+[Soil].Water.MM[5]+[Soil].Water.MM[6]) as SW1800mm
                ([Soil].Water.MM[1]+[Soil].Water.MM[2]+[Soil].Water.MM[3]+[Soil].Water.MM[4]+[Soil].Water.MM[5]) as SW1200mm
                (sum([CottonSoil].PAWmm)/sum([CottonSoil].PAWCmm)) as AvailableSoilMoisture
                ([CottonSoil].PAWmm[1]+[CottonSoil].PAWmm[2]+[CottonSoil].PAWmm[3]+[CottonSoil].PAWmm[4]+[CottonSoil].PAWmm[5]) as PAWTop5Layers
                -(([CottonSoil].PAWCmm[1]+[CottonSoil].PAWCmm[2]+[CottonSoil].PAWCmm[3]+[CottonSoil].PAWCmm[4]+[CottonSoil].PAWCmm[5])-([CottonSoil].PAWmm[1]+[CottonSoil].PAWmm[2]+[CottonSoil].PAWmm[3]+[CottonSoil].PAWmm[4]+[CottonSoil].PAWmm[5])) as SoilWaterDeficit120
                [Irrigation].IrrigationApplied
                [Cotton].Boll.Wt
                [Cotton].Lint.Wt
                [Cotton].Seed.Wt
                [Cotton].Bur.Wt
                [Cotton].NitrogenUptake
                sum([Soil].SoilWater.SWmm) as TotalSWmm
                ([Soil].SoilWater.SWmm[1]) as SW1
                ([Soil].SoilWater.SWmm[2]) as SW2
                ([Soil].SoilWater.SWmm[3]) as SW3
                ([Soil].SoilWater.SWmm[4]) as SW4
                ([Soil].SoilWater.SWmm[5]) as SW5
                ([Soil].SoilWater.SWmm[6]) as SW6
                ([Soil].SoilWater.SWmm[1]+[Soil].SoilWater.SWmm[2]+[Soil].SoilWater.SWmm[3]+[Soil].SoilWater.SWmm[4]+[Soil].SoilWater.SWmm[5]+[Soil].SoilWater.SWmm[6]) as SWmm1800
                [Soil].SoilWater.ESW[1] as ESW1
                [Soil].SoilWater.ESW[2] as ESW2
                [Soil].SoilWater.ESW[3] as ESW3
                [Soil].SoilWater.ESW[4] as ESW4
                [Soil].SoilWater.ESW[5] as ESW5
                [Soil].SoilWater.ESW[6] as ESW6
                [Soil].SoilWater.PAWmm[1] as PAW1
                [Cotton].Arbitrator.SDRatio
                [Cotton].Arbitrator.SDRatioBound
                [Cotton].Phenology.AccB_PER
                [Cotton].Phenology.BollPeriod
                [Cotton].Phenology.GrowthRate.CGR
                [Cotton].Phenology.GrowthRate.FGR
                [Cotton].Phenology.GrowthRate.CGR.SubtractFunction.AboveGroundToday
                [Cotton].Phenology.GrowthRate.CGR.SubtractFunction.AboveGroundYesterday
                [Cotton].Phenology.GrowthRateScript.Script.AboveGroundYesterday
                [Cotton].Phenology.GrowthRate.CGR.SubtractFunction.AboveGroundToday
                [Cotton].Phenology.GrowthRate.CGR.SubtractFunction.AboveGroundYesterday
                [Cotton].Phenology.GrowthRate.FGR.SubtractFunction.FruitToday
                [Cotton].Phenology.GrowthRate.FGR.SubtractFunction.FruitYesterday
                [Cotton].Phenology.GrowthRate.CGR
                [Cotton].Phenology.GrowthRate.FGR
            Report HarvestReport: same as Replacements.HarvestReport
      Memo
        Add branches to observed data --> I have this data!
      Memo
        Should resemble an S-curve
    Folder KRS19_irrigated (disabled)
      Memo
        **24/01/2024: Irrigation added to rainfall in weather file --> changed MET file**

        ======================================

        Planting density (plants/m2):

        707 - 10.6;

        714 - 10.4;

        746 - 10.2;

        748 - 10.4

        Average: 10.4
      Memo Phenology stages Observed
        23/01/2024: Updated phenology:

        Stage|Date|DAS|Comments
        -|-|-|-
        Sowing|15 Feb 2019|0
        Emergence|19 Feb 2019|4
        Squaring|14 Mar 2019|27
        Flowering|7 Apr 2019|51
        Cutout||
        OpenBolls||
        Maturity|25 Jun 2019|130|60% open boll
        Defoliation 1|15 Jul 2019||Ethepone - defoliant
        Defoliation 2|26 Jul 2019||Ethepone - defoliant
        HarvestRipe|14 Aug 2019|180|Hand harvest (100% open?)
      Simulation KRS19IRCvSicot_748B3F
        Clock: Start=2018-10-15; End=2019-08-31
        Summary summaryfile
        Weather: FileName=Weatherfiles/KRS19IR3.met
        SoilArbitrator Soil Arbitrator
        MicroClimate: a_interception=0; b_interception=1; c_interception=0; d_interception=0; SoilHeatFluxFraction=0.4; MinimumHeightDiffForNewLayer=0; NightInterceptionFraction=0.5; ReferenceHeight=2
        Zone paddock: Area=1; Slope=0; AspectAngle=0; Altitude=50
          Manager Sowing
            Crop = [Cotton]
            SowDate = 15-feb
            CultivarName = Sicot_748B3F
            SowingDepth = 20
            RowSpacing = 1000
            Population = 10.4
            script: same as in Validation.Narrabri Deficit Trial 2006.NAR0607.NAR0607Base.paddock.Sowing
          Fertiliser
          Operations FertiliserEvents
            2019-02-15  [Fertiliser].Apply(32, Fertiliser.Types.UreaN,10);
            2019-02-15  [Fertiliser].Apply(12, Fertiliser.Types.UreaN,10);
            2019-03-08  [Fertiliser].Apply(10, Fertiliser.Types.UreaN,10);
            2019-03-08  [Fertiliser].Apply(75.9, Fertiliser.Types.UreaN,10);
            2019-03-14  [Fertiliser].Apply(43.7, Fertiliser.Types.UreaN,10);
          Irrigation
          Manager Harvesting
            script: same as in Validation.Narrabri Deficit Trial 2006.NAR0607.NAR0607Base.paddock.Harvesting
          Soil Tippera clay loam: SoilType=Clay Loam, Red Earth, Alfisol - Katherine (PAWC = 83mm); LocalName=Tippera; NearestTown=Katherine; State=NT; YearOfSampling=0; DataSource=Perry Poulton from FS48 W2 and FS48.N2 files
            Physical
              Thickness  BD    AirDry  LL15   DUL   SAT
              50         1.56  0.064   0.186  0.26  0.38
              100        1.56  0.099   0.196  0.28  0.38
              150        1.52  0.146   0.215  0.3   0.371
              300        1.46  0.196   0.231  0.3   0.381
              300        1.42  0.22    0.237  0.31  0.392
              300        1.46  0.218   0.282  0.31  0.388
              300        1.5   0.231   0.301  0.31  0.377
              300        1.53  0.236   0.306  0.32  0.377
              SoilCrop CottonSoil: LL=[0.186, 0.196, 0.215, 0.231, 0.237, 0.282, 0.301, 0.306]; KL=[0.07, 0.07, 0.07, 0.07, 0.07, 0.07, 0.07, 0.04]; XF=[1, 1, 1, 1, 1, 1, 1, 1]
            WaterBalance SoilWater: SummerDate=1-Sep; SummerU=6; SummerCona=3.5; WinterDate=1-Jun; WinterU=4; WinterCona=2.5; DiffusConst=88; DiffusSlope=35; Salb=0.13; CN2Bare=73; CNRed=20; CNCov=0.8; PSIDul=-100; Thickness=[50, 100, 150, 300, 300, 300, 300, 300]; SWCON=[0.7, 0.7, 0.7, 0.7, 0.7, 0.7, 0.7, 0.7]
            Organic: FOMCNRatio=40; CarbonUnits=Total
              Thickness  Carbon  SoilCNRatio  FBiom  FInert  FOM
              50         1.22    12.5         0.05   0.39    290.823
              200        1.02    12.5         0.02   0.47    246.176
              300        0.43    12.5         0.015  0.52    191.722
              300        0.23    12.5         0.01   0.62    116.285
            CERESSoilTemperature Temperature
            Chemical: Thickness=[50, 100, 150, 300, 300, 300, 300, 300]; PH=[8.3, 7.9, 7.9, 7.9, 7.8, 7.8, 7.8, 7.8]; PHUnits=Water
              PH source: Unknown source or quality of data (layer 1, 2, 3, 4, 5)
            Nutrient
            Water: Thickness=[50, 100, 150, 300, 300, 300, 300, 300]; InitialValues=[0.26, 0.28, 0.3, 0.3, 0.31, 0.31, 0.31, 0.32]; InitialPAWmm=82.75; RelativeTo=LL15; FilledFromTop=true
            Solute NO3: Thickness=[50, 200, 300, 300]; InitialValues=[12, 6.8, 2.4, 4.3]; InitialValuesUnits=ppm; WaterTableConcentration=0; D0=0; DepthConstant=0; MaxDepthSoluteAccessible=0; RunoffEffectivenessAtMovingSolute=0; MaxEffectiveRunoff=0
            Solute NH4: Thickness=[50, 200, 300, 300]; InitialValues=[2, 2, 1.2, 1.5]; InitialValuesUnits=ppm; WaterTableConcentration=0; D0=0; DepthConstant=0; MaxDepthSoluteAccessible=0; RunoffEffectivenessAtMovingSolute=0; MaxEffectiveRunoff=0
            Solute Urea: Thickness=[1800]; InitialValues=[0]; InitialValuesUnits=ppm; WaterTableConcentration=0; D0=0; DepthConstant=0; MaxDepthSoluteAccessible=0; RunoffEffectivenessAtMovingSolute=0; MaxEffectiveRunoff=0
          SurfaceOrganicMatter: InitialResidueName=Oats; InitialResidueType=oats; InitialResidueMass=0; InitialStandingFraction=0; InitialCPR=0; InitialCNR=0
          Plant Cotton: PlantType=Cotton
          Report DailyReport: EventNames=[Clock].DoReport
            VariableNames:
              [Clock].Today
              [DiagnosticsVariables].Script.AccumPlantN
              [DiagnosticsVariables].Script.AccumMineralisation
              [DiagnosticsVariables].Script.AccumDenit
              [DiagnosticsVariables].Script.AccumFert
              [DiagnosticsVariables].Script.AccumLeach
              [DiagnosticsVariables].Script.AccumDetach
              [DiagnosticsVariables].Script.DeltaSoilOMN
              [DiagnosticsVariables].Script.DeltaSurfaceOMN
              [DiagnosticsVariables].Script.DeltaSoilMineralN
              [Cotton].Root.NSupply
              [Soil].SoilWater.Eo
              [Soil].SoilWater.Es
              [DiagnosticsVariables].Script.SWC
              [DiagnosticsVariables].Script.DUL
              [Soil].SoilWater.Drainage
              [Soil].SoilWater.Runoff
              [DiagnosticsVariables].Script.OutFlowLat
              [Soil].SoilWater.pond
              [DiagnosticsVariables].Script.AccumEO
              [DiagnosticsVariables].Script.AccumEP
              [DiagnosticsVariables].Script.AccumES
              [DiagnosticsVariables].Script.AccumDrainage
              [DiagnosticsVariables].Script.AccumRunoff
              [DiagnosticsVariables].Script.AccumRainfall
              [DiagnosticsVariables].Script.AccumIrrigation
              [DiagnosticsVariables].Script.AccumOutflowLat
              [DiagnosticsVariables].Script.SoilWaterDeficit
              [Cotton].Grain.Live.Wt
              [Cotton].Shell.Live.Wt
              [Cotton].Stem.Live.Wt
              [Cotton].Stem.Live.Wt
              [Cotton].Grain.Live.N
              [Cotton].Shell.Live.N
              [Cotton].Leaf.Live.Wt
              [Cotton].Root.Live.Wt
              [Cotton].Leaf.Live.N
              [Cotton].Root.Live.N
              [Cotton].Leaf.Live.NConc
              [Cotton].Root.Live.NConc
              [Cotton].Root.WaterSupply
              [Cotton].Root.WaterUptake
              [Cotton].Leaf.Transpiration
              [Cotton].Leaf.WaterDemand
              [Cotton].Root.Depth
              [Cotton].Leaf.CoverTotal
              [Cotton].Leaf.CoverDead
              [Cotton].Leaf.LAI
              [Cotton].Leaf.Height
              [Cotton].Leaf.PotentialBiomass
              [Soil].Water.MM
              [Soil].NO3.kgha
              [DiagnosticsVariables].Script.SoilNitrogenContent
              [Cotton].Arbitrator.N.TotalPlantDemand
              [MicroClimate].net_radn
              [MicroClimate].peta
              [MicroClimate].petr
              [DiagnosticsVariables].Script.FomN
              [DiagnosticsVariables].Script.HumN
              [DiagnosticsVariables].Script.BiomN
              [DiagnosticsVariables].Script.DltNMinRes
              [DiagnosticsVariables].Script.DltNMinTot
              [Cotton].Leaf.Fw
              [Cotton].Leaf.Fn
              [Cotton].Phenology.CurrentPhase.Name
              [Cotton].Phenology.Stage
              [Cotton].Pod.Wt
              [Cotton].Pod.N
              [Cotton].Structure.LeafTipsAppeared
              [Cotton].Structure.MainStemPrimordiaNo
              [Cotton].Leaf.CohortArea[1]
              [Cotton].Leaf.CohortArea[2]
              [Cotton].Leaf.CohortArea[3]
              [Cotton].Leaf.CohortArea[4]
              [Cotton].Leaf.CohortArea[5]
              [Cotton].Leaf.CohortArea[6]
              [Cotton].Leaf.CohortArea[7]
              [Cotton].Leaf.CohortArea[8]
              [Cotton].Leaf.CohortArea[9]
              [Cotton].Leaf.CohortArea[10]
              [Cotton].Leaf.CohortArea[11]
              [Cotton].Leaf.CohortArea[12]
              [Cotton].Leaf.CohortArea[13]
              [Cotton].Leaf.CohortArea[14]
              [Cotton].Leaf.CohortArea[15]
              [Cotton].Leaf.AppearedCohortNo
              [Cotton].Leaf.DeadCohortNo
              [Cotton].AboveGround.Wt
              [Cotton].Phenology.Stage
              [Cotton].Structure.MainStemPrimordiaNo
              [Cotton].Phenology.NFF
              [CottonHarvestRule].Script.FinalTag
              [Cotton].Grain.NumberFunction
              [Cotton].Shell.PodNumber
              [Cotton].Phenology.FN
              [Cotton].Phenology.FN.TotalNodes
              [Cotton].Phenology.FN.VegetativeNodes
          Report HarvestReport: EventNames=[Cotton].Harvesting
            VariableNames:
              [Clock].Today
              [Cotton].Structure.MainStemPrimordiaNo
              [Cotton].Phenology.NFF
              [Cotton].Script.FinalTag
      Memo
        Should resemble an S-curve
    Folder Rose0203
      Memo
        Management|Date|DAS|Rate
        -|-|-|-
        N Fertilizer (Ammonium gas)|27 Aug 2002|-44| 120 kg N/ha
        Pre-watering|24 Sep 2002|-17|
        Starting soil-N sampling|1 Oct 2002|-9|
        Sowing|10 Oct 2002|0|
        Irrigation 1|30 Oct 2002|20|
        Irrigation 2|13 Dec 2002|64|
        Irrigation 3|1 Jan 2003?|85|
        Irrigation 4|17 Jan 2003|99|
        Irrigation 5|30 Jan 2003|112|
        Irrigation 6|14 Feb 2003|127|

        =================================================

        Soil-N on 1 Oct 2002:

        Depth mm|Initial values ppm
        -|-
        0-150|37.500
        150-300|11.000
        300-600|2.000
        600-900|0.500
        900-1200|0.500
        1200-1500|0.500
        1500-1800|0.500
      Memo Phenology stages Observed
        Stage|Date|DAS
        -|-|-
        Sowing|10 Oct 2002|0
        Emergence||
        Squaring|2 Dec 2002|53
        Flowering|26 Dec 2002|77
        Cutout||
        OpenBolls|10 Feb 2003?|123
        Maturity|7 Mar 2003|148
        HarvestRipe|11 Apr 2003|183
      Simulation Rose0203_C
        Clock: Start=2002-08-27; End=2003-06-01
        Summary summaryfile
        Weather: FileName=Weatherfiles/ACRI0203.met
        SoilArbitrator Soil Arbitrator
        MicroClimate: a_interception=0; b_interception=1; c_interception=0; d_interception=0; SoilHeatFluxFraction=0.4; MinimumHeightDiffForNewLayer=0; NightInterceptionFraction=0.5; ReferenceHeight=2
        Zone paddock: Area=1; Slope=0; AspectAngle=0; Altitude=50
          Manager Sowing
            Crop = [Cotton]
            SowDate = 10-oct
            CultivarName = Sicot_71B
            SowingDepth = 50
            RowSpacing = 1000
            Population = 12
            script: same as in Validation.Narrabri Deficit Trial 2006.NAR0607.NAR0607Base.paddock.Sowing
          Fertiliser
          Operations FertiliserEvents
            2002-08-27  [Fertiliser].Apply(120, Fertiliser.Types.UreaN,10);
          Irrigation
          Manager FurrowIrrigation
            IrrigateDates = 24-Sep, 30-Oct, 13-Dec, 1-Jan, 17-Jan, 30-Jan, 14-Feb
            asw_depth = 7
            crit_fr_asw = 1
            script: same as in Validation.Narrabri Deficit Trial 2006.NAR0607.Series.Ir80.FurrowIrrigation
          Manager Harvesting: same as Validation.Narrabri Deficit Trial 2006.NAR0607.NAR0607Base.paddock.Harvesting
          Soil Grey Vertosol NMM: ASCOrder=Vertosol; ASCSubOrder=Grey; SoilType=Clay; Site=Myall Vale; NearestTown=Narrabri, NSW 2390; Region=North West Slopes and Plains; State=New South Wales; Country=Australia; NaturalVegetation=Grasslands; ApsoilNumber=97; Latitude=-30.2056; Longitude=149.593; LocationAccuracy=+/- 20m; YearOfSampling=0; DataSource=CSIRO Plant Industry, Myall Vale (D Richards); Comments=Clay -
            Physical: same as Validation.Grey Vertosol NMM.Physical
            WaterBalance SoilWater: same as Validation.Grey Vertosol NMM_20240207.SoilWater
            Organic: same as Validation.Grey Vertosol NMM_20240207.Organic
            Chemical: same as Validation.Grey Vertosol NMM_20240207.Chemical
            Nutrient
            Water: Thickness=[150, 150, 100, 100, 100, 100, 250, 200, 200]; InitialPAWmm=76.5; RelativeTo=LL15; FilledFromTop=true
              InitialValues=[0.475, 0.414, 0.267, 0.264, 0.264, 0.264, 0.264, 0.264, 0.264]
            CERESSoilTemperature
            Solute NO3: Thickness=[150, 150, 300, 300, 300, 300, 300]; InitialValues=[22, 0, -, -, -, -, -]; InitialValuesUnits=ppm; WaterTableConcentration=0; D0=0; DepthConstant=0; MaxDepthSoluteAccessible=0; RunoffEffectivenessAtMovingSolute=0; MaxEffectiveRunoff=0
            Solute NH4: same as Validation.Grey Vertosol NMM_20240207.NH4
            Solute Urea: same as Validation.Grey Vertosol NMM_20240207.NH4
          Plant Cotton: PlantType=Cotton
          Report DailyReport: EventNames=[Clock].DoReport
            VariableNames:
              [Clock].Today
              [Clock].Today.DayOfYear
              [Weather].Rain
              [Weather].MeanT
              [Weather].MaxT
              [Weather].MinT
              [Weather].Radn
              [Weather].VPD
              [Cotton].DaysAfterSowing
              [Cotton].Arbitrator.DM.TotalPlantDemand
              [Cotton].Arbitrator.DM.TotalFixationSupply
              [Cotton].Arbitrator.TotalDMFixationSupply
              [Cotton].Arbitrator.N.TotalFixationSupply
              [Cotton].Arbitrator.N.TotalPlantDemand
              [Cotton].Arbitrator.N.TotalPlantSupply
              sum([Cotton].Arbitrator.N.Fixation) as NFixed
              [Cotton].NitrogenUptake
              [Cotton].Phenology.Stage
              [Cotton].Phenology.ThermalTime
              [Cotton].Phenology.CurrentStageName
              [Cotton].Phenology.Photoperiod
              [Cotton].Phenology.EmergenceDAS
              [Cotton].Phenology.SquaringDAS
              [Cotton].Phenology.FloweringDAS
              [Cotton].Phenology.CutoutDAS
              [Cotton].Phenology.OpenbollsDAS
              [Cotton].Phenology.MaturityDAS
              [Cotton].Phenology.GrowthRateScript.Script.AboveGroundYesterday
              [Cotton].Phenology.GrowthRateScript.Script.FruitYesterday
              [Cotton].Phenology.GrowthRate.CGR
              [Cotton].Phenology.GrowthRate.FGR
              [Cotton].AboveGround.Wt
              [Cotton].AboveGround.N
              [Cotton].AboveGroundLive.Wt
              [Cotton].Leaf.NodeNumber
              [Cotton].Leaf.Fw
              [Cotton].Leaf.Fn
              [Cotton].Leaf.Photosynthesis.FT
              [Cotton].Leaf.Photosynthesis.FVPD
              [Cotton].Leaf.LAI
              [Cotton].Leaf.HeightFunction
              [Cotton].Leaf.Height
              [Cotton].Leaf.CoverGreen
              [Cotton].Leaf.CoverTotal
              [Cotton].Leaf.Live.Wt
              [Cotton].Leaf.Live.StructuralWt
              [Cotton].Leaf.Live.MetabolicWt
              [Cotton].Leaf.Allocated.MetabolicWt
              [Cotton].Leaf.Allocated.StructuralWt
              [Cotton].Leaf.Dead.StructuralWt
              [Cotton].Leaf.Dead.MetabolicWt
              [Cotton].Leaf.Live.N
              [Cotton].Leaf.Live.NConc
              [Cotton].Leaf.Dead.Wt
              [Cotton].Leaf.Dead.N
              [Cotton].Leaf.Dead.NConc
              [Cotton].Leaf.RadiationIntercepted
              [Cotton].Leaf.Wt
              [Cotton].Leaf.Nconc
              [Cotton].Leaf.N
              [Cotton].Leaf.Senesced.Wt
              [Cotton].Leaf.BranchNumber
              [Cotton].Leaf.SpecificAreaCanopy
              [Cotton].Leaf.Sites
              [Cotton].Leaf.SpecificArea
              [Cotton].Leaf.CoverTotal
              [Cotton].Stem.Wt
              [Cotton].Stem.Total.StructuralWt
              [Cotton].Stem.Live.StructuralWt
              [Cotton].Stem.Live.StructuralN
              [Cotton].Stem.N
              [Cotton].Stem.Nconc
              [Cotton].Lint.Wt
              [Cotton].Lint.N
              [Cotton].Lint.Nconc
              [Cotton].Lint.Bales as Bales
              [Cotton].Boll.HarvestIndex
              [Cotton].Lint.Allocated.Wt
              [Cotton].Lint.DMDemand.Total
              [Cotton].Leaf.DMDemand.Total
              [Cotton].Bur.DMDemand.Total
              [Cotton].Stem.DMDemand.Total
              ([Cotton].Bur.DMDemand.Total+[Cotton].Lint.DMDemand.Total+[Cotton].Seed.DMDemand.Total) as BollDemand
              ([Cotton].Stem.DMDemand.Total+[Cotton].Leaf.DMDemand.Total) as VegetativeDemand
              ([Cotton].Stem.DMDemand.Total+[Cotton].Leaf.DMDemand.Total+[Cotton].Lint.DMDemand.Total+[Cotton].Seed.DMDemand.Total+[Cotton].Bur.DMDemand.Total) as ShootDMDemand
              [Cotton].Root.DMDemand.Total
              [Cotton].Lint.NDemand.Total
              [Cotton].Leaf.NDemand.Total
              [Cotton].Stem.NDemand.Total
              [Cotton].Root.NDemand.Total
              [Cotton].Root.NUptake
              [Cotton].Lint.LiveFWt
              [Cotton].Root.Wt
              [Cotton].Root.Depth
              [Soil].Water.Volumetric[1:3]
              [Soil].Water.Volumetric
              sum([Soil].SoilWater.ESW) as TotalESW
              [Soil].SoilWater.SW
              ([Soil].SoilWater.SWmm[1]+[Soil].SoilWater.SWmm[2]+[Soil].SoilWater.SWmm[3]+[Soil].SoilWater.SWmm[4]+[Soil].SoilWater.SWmm[5]+[Soil].SoilWater.SWmm[6]) as SWmm1800
              ([Soil].SoilWater.ESW[1]+[Soil].SoilWater.ESW[2]+[Soil].SoilWater.ESW[3]+[Soil].SoilWater.ESW[4]+[Soil].SoilWater.ESW[5]+[Soil].SoilWater.ESW[6]) as ESW1800
              sum([Soil].NO3.kgha) as TotalSoilNO3
              sum([Soil]..NH4.kgha) as TotalSoilNH4
              sum([Soil].Water.MM) as TotalSW
              sum([Soil].NO3.ppm) as NO3
              sum([Soil].NH4.ppm) as NH4
              sum([Soil].Water.Volumetric) as TotalSWC
              sum([Soil].Water.MM) as TotalWaterMM
              ([Soil].Water.MM[1]+[Soil].Water.MM[2]+[Soil].Water.MM[3]+[Soil].Water.MM[4]+[Soil].Water.MM[5]+[Soil].Water.MM[6]+[Soil].Water.MM[7]) as SW1500mm
              ([Soil].Water.MM[1]+[Soil].Water.MM[2]+[Soil].Water.MM[3]+[Soil].Water.MM[4]+[Soil].Water.MM[5]+[Soil].Water.MM[6]) as SW1800mm
              ([Soil].Water.MM[1]+[Soil].Water.MM[2]+[Soil].Water.MM[3]+[Soil].Water.MM[4]+[Soil].Water.MM[5]) as SW1200mm
              (sum([CottonSoil].PAWmm)/sum([CottonSoil].PAWCmm)) as AvailableSoilMoisture
              ([CottonSoil].PAWmm[1]+[CottonSoil].PAWmm[2]+[CottonSoil].PAWmm[3]+[CottonSoil].PAWmm[4]+[CottonSoil].PAWmm[5]) as PAWTop5Layers
              -(([CottonSoil].PAWCmm[1]+[CottonSoil].PAWCmm[2]+[CottonSoil].PAWCmm[3]+[CottonSoil].PAWCmm[4]+[CottonSoil].PAWCmm[5])-([CottonSoil].PAWmm[1]+[CottonSoil].PAWmm[2]+[CottonSoil].PAWmm[3]+[CottonSoil].PAWmm[4]+[CottonSoil].PAWmm[5])) as SoilWaterDeficit120
              [Irrigation].IrrigationApplied
              [Cotton].Boll.Wt
              [Cotton].Lint.Wt
              [Cotton].Seed.Wt
              [Cotton].Bur.Wt
              [Cotton].NitrogenUptake
              sum([Soil].SoilWater.SWmm) as TotalSWmm
              ([Soil].SoilWater.SWmm[1]) as SW1
              ([Soil].SoilWater.SWmm[2]) as SW2
              ([Soil].SoilWater.SWmm[3]) as SW3
              ([Soil].SoilWater.SWmm[4]) as SW4
              ([Soil].SoilWater.SWmm[5]) as SW5
              ([Soil].SoilWater.SWmm[6]) as SW6
              ([Soil].SoilWater.SWmm[1]+[Soil].SoilWater.SWmm[2]+[Soil].SoilWater.SWmm[3]+[Soil].SoilWater.SWmm[4]+[Soil].SoilWater.SWmm[5]+[Soil].SoilWater.SWmm[6]) as SWmm1800
              //to disable reporting
              ([Soil].SoilWater.SWmm[7]) as SW7
              ([Soil].SoilWater.SWmm[8]) as SW8
              ([Soil].SoilWater.SWmm[9]) as SW9
              ([Soil].SoilWater.SWmm[1]+[Soil].SoilWater.SWmm[2]+[Soil].SoilWater.SWmm[3]+[Soil].SoilWater.SWmm[4]+[Soil].SoilWater.SWmm[5]+[Soil].SoilWater.SWmm[6]+[Soil].SoilWater.SWmm[7]+[Soil].SoilWater.SWmm[8]) as SWmm2400
              [Soil].SoilWater.ESW[1] as ESW1
              [Soil].SoilWater.ESW[2] as ESW2
              [Soil].SoilWater.ESW[3] as ESW3
              [Soil].SoilWater.ESW[4] as ESW4
              [Soil].SoilWater.ESW[5] as ESW5
              [Soil].SoilWater.ESW[6] as ESW6
              [Soil].SoilWater.ESW[7] as ESW7
              [Soil].SoilWater.PAWmm[1] as PAW1
              [Cotton].Arbitrator.SDRatio
              [Cotton].Arbitrator.SDRatioBound
          Report HarvestReport: same as Replacements.HarvestReport
          SurfaceOrganicMatter: InitialResidueName=nativepasture; InitialResidueType=nativepasture; InitialResidueMass=0; InitialStandingFraction=0; InitialCPR=0; InitialCNR=0
      Folder Graphs
        Memo
          Should resemble an S-curve
        Folder Soil water
          Memo
            7/2/2024: Soil depth layers don't match observations...
    Folder ForestHil2023
      Experiment ForestHill2023
        Factors Series
          CompositeFactor IrrigationFull: Specifications=[Operations]
            Operations
              2023-10-25  [Irrigation].Apply(50);
              2023-11-02  [Fertiliser].Apply(300, Fertiliser.Types.UreaN,10);
              2023-11-08  [Irrigation].Apply(30);
              2023-11-09  [Cotton].Sow(population: 12, cultivar: 748V2C , depth: 20, rowSpacing: 1080);
              2023-11-15  [Irrigation].Apply(40);
              2023-12-19  [Irrigation].Apply(40);
              2024-01-19  [Irrigation].Apply(50);
              2024-01-25  [Irrigation].Apply(50);
              2024-02-09  [Irrigation].Apply(50);
              2024-03-06  [Irrigation].Apply(50);
          CompositeFactor IrrigationPartial: Specifications=[Operations]
            Operations
              2023-10-25  [Irrigation].Apply(50);
              2023-11-02  [Fertiliser].Apply(300, Fertiliser.Types.UreaN,10);
              2023-11-08  [Irrigation].Apply(30);
              2023-11-09  [Cotton].Sow(population: 12, cultivar: 748V2C , depth: 20, rowSpacing: 1080);
              2023-11-15  [Irrigation].Apply(40);
              2023-12-19  [Irrigation].Apply(40);
        Simulation ForestHill2023Base
          Clock: Start=2023-11-01; End=2024-04-30
          Summary summaryfile
          Weather: FileName=Weatherfiles/ForestHill.met
          SoilArbitrator Soil Arbitrator
          MicroClimate: a_interception=0; b_interception=1; c_interception=0; d_interception=0; SoilHeatFluxFraction=0.4; MinimumHeightDiffForNewLayer=0; NightInterceptionFraction=0.5; ReferenceHeight=2
          Zone paddock: Area=1; Slope=0; AspectAngle=0; Altitude=50
            Fertiliser
            Operations
            Irrigation
            Soil Grey Vertosol NMM: ASCOrder=Vertosol; ASCSubOrder=Grey; SoilType=Clay; Site=Myall Vale; NearestTown=Narrabri, NSW 2390; Region=North West Slopes and Plains; State=New South Wales; Country=Australia; NaturalVegetation=Grasslands; ApsoilNumber=97; Latitude=-30.2056; Longitude=149.593; LocationAccuracy=+/- 20m; YearOfSampling=0; DataSource=CSIRO Plant Industry, Myall Vale (D Richards); Comments=Clay -
              Physical
                Thickness  ParticleSizeClay  BD    AirDry  LL15   DUL    SAT   KS
                150        60                1.31  0.109   0.109  0.45   0.48  50
                100        60                1.26  0.168   0.21   0.438  0.48  20
                100        60                1.35  0.168   0.21   0.437  0.48  20
                100        60                1.35  0.195   0.21   0.437  0.48  20
                100        60                1.35  0.195   0.21   0.437  0.48  20
                100        60                1.35  0.2     0.21   0.437  0.48  20
                250        60                1.35  0.2     0.21   0.435  0.48  20
                200        60                1.35  0.2     0.21   0.424  0.48  20
                200        60                1.35  0.2     0.21   0.424  0.48  20
                200        60                1.35  0.2     0.21   0.424  0.48  20
                500        60                1.35  0.2     0.21   0.424  0.48  20
                BD, DUL source: Field measured and checked for sensibility
                AirDry, LL15 source: Estimated based on local knowledge
                SAT source: Calculated from measured, estimated or calculated BD
                SoilCrop CottonSoil
                  LL=[0.109, 0.21, 0.21, 0.21, 0.21, 0.21, 0.21, 0.21, 0.21, 0.21, 0.21]
                  KL=[0.15, 0.13, 0.13, 0.1, 0.09, 0.08, 0.07, 0.06, 0.05, 0.04, 0.03]
                  XF=[1, 1, 1, 1, 1, 1, 1, 1, 1, 1, 1]
                  LL source: Field measured and checked for sensibility
              Swim3: Salb=0.13; CN2Bare=75; CNRed=20; CNCov=0.8; KDul=0.1; PSIDul=-100; VC=true; DTMin=0; DTMax=1440; MaxWaterIncrement=5; SpaceWeightingFactor=0; SoluteSpaceWeightingFactor=1; Dis=0; Disp=1; A=2; DTHC=0.1; DTHP=2; eo_time=06:00; eo_durn=720; Diagnostics=true
              LayerStructure
                Thickness=[10, 20, 40, 30, 100, 100, 100, 100, 100, 100, 100, 100, 100, 200, 300, 300, 200]
              Organic: FOMCNRatio=40; CarbonUnits=Total
                Thickness  Carbon  SoilCNRatio  FBiom  FInert  FOM
                150        0.88    12           0.04   0.4     6000
                150        0.76    12           0.02   0.6     1000
                300        0.62    12           0.02   0.8     500
                300        0.32    12           0.02   1       99.454
                300        0.12    12           0.01   1       60.322
                300        0.1     12           0.01   1       36.587
                300        0.05    12           0.01   1       22.191
              Chemical: PHUnits=Water
                Thickness  PH  EC
                150        7   0.15
                150        7   0.2
                300        7   0.26
                300        7   0.6
                300        7   0.6
                300        7   0.6
                300        7   0.6
                PH source: Estimated based on local knowledge
              Nutrient
              Water: Thickness=[150, 100, 100, 100, 100, 100, 250, 200, 200]; InitialPAWmm=63.3; RelativeTo=LL15; FilledFromTop=true
                InitialValues=[0.109, 0.27, 0.27, 0.264, 0.264, 0.264, 0.264, 0.264, 0.264]
              Memo: same as Validation.Grey Vertosol NMM_20240207.Memo
              SoilTemperature Temperature
              Solute NO3: InitialValuesUnits=ppm; WaterTableConcentration=0; D0=0.05; DepthConstant=0; MaxDepthSoluteAccessible=0; RunoffEffectivenessAtMovingSolute=0; MaxEffectiveRunoff=0
                Thickness  InitialValues  Exco  FIP
                150        38.023         0     1
                150        12.955         0     1
                300        0.422          0     1
                300        0.422          0     1
                300        0.422          0     1
                300        0.422          0     1
                500        0.422          0     1
              Solute NH4: same as Validation.ForestHil2023.ForestHill2023.ForestHill2023Base.paddock.Grey Vertosol NMM.NO3
              Solute Urea: InitialValuesUnits=ppm; WaterTableConcentration=0; D0=0.05; DepthConstant=0; MaxDepthSoluteAccessible=0; RunoffEffectivenessAtMovingSolute=0; MaxEffectiveRunoff=0
                Thickness  InitialValues  Exco  FIP
                150        0              0     1
                150        0              0     1
                300        0              0     1
                300        0              0     1
                300        0              0     1
                300        0              0     1
                500        0              0     1
            SurfaceOrganicMatter: InitialResidueName=nativepasture; InitialResidueType=nativepasture; InitialResidueMass=0; InitialStandingFraction=0; InitialCPR=0; InitialCNR=0
            Plant Cotton: PlantType=Cotton
            Report ForestHillReport: EventNames=[Clock].DoReport
              VariableNames:
                [Clock].Today
                [Weather].MaxT
                [Weather].MeanT
                [Weather].MinT
                [Weather].VPD
                [Cotton].DaysAfterSowing
                [Cotton].Leaf.NodeNumber
                [Cotton].Leaf.LAI
                [Cotton].Leaf.Height
                [EMCalculator].Script.EMp100
                [EMCalculator].Script.EMv100
                sum([Soil].Water.MM) as TotalSW
                sum([Soil].Physical.LL15mm) as TotalLL15
                sum([Soil].Physical.DULmm) as TotalDUL
                sum([Soil].NO3.kgha) as TotalNO3
                sum([Soil].NH4.kgha) as TotalNH4
                [Cotton].Phenology.CurrentStageName
                [Cotton].Leaf.Fw
                [Cotton].Leaf.Fn
                [Cotton].Leaf.Photosynthesis.FVPD
                [Cotton].Leaf.Photosynthesis.Ft
                [Cotton].Leaf.Transpiration
                [Cotton].Leaf.WaterDemand
                [Cotton].Leaf.CoverGreen
                [Cotton].Leaf.Wt
                [Cotton].Leaf.N
                [Cotton].Leaf.NConc
                [Cotton].Leaf.Sites
                [Cotton].Leaf.TotalNumber
                [Cotton].Leaf.SpecificArea
                [Cotton].Stem.Wt
                [Cotton].Stem.N
                [Cotton].Stem.NConc
                [Cotton].Boll.Wt
                [Cotton].Bur.Wt
                [Cotton].AboveGround.Wt
                [Cotton].Arbitrator.N.TotalUptakeSupply
                [Cotton].Arbitrator.N.TotalPlantDemand
                [Cotton].Arbitrator.N.TotalPlantAllocation
                [Cotton].Root.Depth
                [Soil].Temperature.AverageSoilTemperature[3] as ST5cm
                [Soil].Temperature.AverageSoilTemperature[8] as ST50cm
                [Soil].Temperature.AverageSoilTemperature[13] as ST100cm
            Manager EMCalculator
              EMLL15 = 80
              EMRange = 110
              EMp100 = 0
              EMv100 = 0
              FASWp = 0
              FASWv = 0
```csharp
using System;
using Models.Core;
using Models.Interfaces;
using Models.PMF;
using APSIM.Shared.Utilities;
using Models.Soils;

namespace Models
{
    [Serializable]
    public class Script : Model
    {
        [Link] IClock Clock;
        [Link] ISummary Summary;
        [Link] Water water;
        [Link] Physical physical;
        [Link] Chemical chemical;
        [Link] private ISoilWater waterBalance;
        [Link] private ISoilTemperature soiltemperature;
        


        [Description("EM reading at LL15")]
        public double EMLL15 { get; set;}
        
        [Description("EM reading range")]
        public double EMRange { get; set;}


       [Description("Daily EMp100")]
        public double EMp100 { get; set;}

       [Description("Daily EMv100")]
        public double EMv100 { get; set;}
        
       [Description("Daily FASW p Dipole")]
        public double FASWp { get; set;}

       [Description("Daily FASW v Dipole")]
        public double FASWv { get; set;}

        [EventSubscribe("DoManagement")]
        private void DoDailyCalculations(object sender, EventArgs e)
        {
            int numlayers = 8;
            double WFptot = 0;
            double WFvtot = 0.0;
            double top = 0;
            double bottom = 0;
            
            for (int i=0; i<numlayers; i++)
            {
               top = bottom;
               bottom = top +physical.Thickness[i] ;
               WFptot += Fcp(top/1000, bottom/1000);
               WFvtot += Fcv(top/1000, bottom/1000);
            }

            top = 0;
            bottom = 0;       
            FASWv = 0;
            FASWp = 0;     
            EMp100 = 0;
            EMv100 = 0;
            for (int i=0; i<numlayers; i++)
            {
               top = bottom;
               bottom = top + physical.Thickness[i] ;
               double WtpLayer = Fcp(top/1000, bottom/1000)/WFptot;
               double WtvLayer = Fcv(top/1000, bottom/1000)/WFvtot;

               //double FASWLayer = (water.MM[i] - physical.LL15mm[i])/(physical.DULmm[i] - physical.LL15mm[i]);
               double FASWLayer = (water.MM[i] - physical.LL15mm[i])/(physical.SATmm[i] - physical.LL15mm[i]);                                             
               FASWp += FASWLayer * WtpLayer;
               FASWv += FASWLayer * WtvLayer;
               
               double f = 2.46 + 3.03/(physical.SAT[i]/physical.BD[i]);
               double EMsat = chemical.EC[i] * f * 100;
               
               double ST = soiltemperature.Value[i];
               double ECLayer = (EMLL15 + FASWLayer * (EMsat - EMLL15))/TF(ST);   
               //double ECLayer = (EMLL15 + FASWLayer * EMRange)/TF(ST);
               EMp100 += ECLayer * WtpLayer;
               EMv100 += ECLayer * WtvLayer;                              
           
            }
        
            
        }
       

private double  phiv(double z )
{
return 4 * z * Math.Pow((4 * Math.Pow(z,2) + 1),-1.5);
}

private double  phih(double z ) 
{
return 2 - 4 * z * Math.Pow((4 * Math.Pow(z, 2) + 1),-0.5);
}


private double  phip(double z ) 
{
return 2 * Math.Pow((4 * Math.Pow(z, 2) + 1),-1.5);
}

private double  Rv(double z ) 
{
return Math.Pow((4 * Math.Pow(z,2) + 1),-0.5);
}

private double  Rh(double z ) 
{
return Math.Pow((4 * Math.Pow(z,2) + 1),0.5) - 2 * z;
}

private double  Rp(double z ) 
{
return 2 * z * Math.Pow((4 * Math.Pow(z,2) + 1),-0.5);
}

private double  Fcv(double D1, double D2 )
{
return Rv(D1) - Rv(D2);
}


private double  Fch(double D1, double D2)
{
return Rh(D1) - Rh(D2);
}
        
private double  Fcp(double D1, double D2)
{
return Rp(D1) - Rp(D2);
}        
        
private double TF(double t)
{ 
 return 1 / (1 + 0.0191 * (t - 25));
}
        
        
    }
}
```
    Folder Burdekin Sowing Time Experiment 2009 (disabled)
      Memo
        29/01/2024:

        Check soils and compare with APSIM Classic sims

        ===================================================================================

        **25/01/2024**

        **From: C:\Users\rhe005\OneDrive - CSIRO\Work Files\00. From Desktop 20221019\Modelling report --> Modelling results.xlxs, Tab "Queensland - Burdekin"**

        1. 2008 most problems - weakest dataset
        2. Remove sites with boll rots
        3. Need dataset with abortions
        4. Planting 3 easist to validate - no cloudy weather
        5. ***Good sites: 2008, PL3 and 2009 PL3***
        6. ***2012 cloudy --> high LAI***
        7. ***Cloudy years most important one --> highest deviation***

        ===================================================================================

        1/12/2023:

        **NEED TO BE ABLE TO MODEL RE-GROWTH**

        1. cloudiness-related fruit loss and subsequent canopy responses changed the ratio of reproductive vs vegetative biomass partitioning.

        2. Differences in biomass partitioning between cultivars were minor. When cloud cover abated, extended
        concurrent vegetative and reproductive growth enabled yield recovery. Greater LAI was a consequence of
        compensatory processes following fruit loss. Faster development of LAI in response to the monsoon during early
        flowering could further shade lower canopy fruiting sites, exacerbating fruit abscission and impacting yield
        compensation.

        3. Compare observed data with that presented in the papers: Table 3 Grundy et al FCR 2020 107868

        ===================================================================================

        * Irrigation was scheduled using electronic capacitance probes(Envirotech, EP100EL-12) that were installed to a depth of 120 cm with dielectric sensors located at 10 cm intervals.

        * Two probes were installed in different replicates for each sowing time, enabling real time monitoring of soil moisture via an integrated radio frequency linked telemetry-based software system.

        * Irrigation was applied using ground water, scheduled at a 35–45 mm water deficit in the top 50 cm of the soil profile and refilled to the drained upper limit during each irrigation.

        * ***The crops were sown with a cone seeder on 750 mm equidistant spaced rows on raised beds (two rows per bed) separated by surface irrigation furrows.***

        ====================================================================================

        See papers:

        Cotton production during the tropical monsoon season. I – The influence of variable radiation on boll loss, compensation and yield

        P. R. Grundy, S. J. Yeates and K. L. Bell

        Field Crops Research 2020 Vol. 254 Pages 107790

        DOI: 10.1016/j.fcr.2020.107790

        Cotton production during the tropical monsoon season. II – Biomass accumulation, partitioning and RUE in response to boll loss and compensation

        P. R. Grundy, S. J. Yeates and K. L. Bell

        Field Crops Research 2020 Vol. 255 Pages 107868

        DOI: 10.1016/j.fcr.2020.107868
      Memo Phenology stages Observed
        1/12/2023: See Fig. 5 Grundy, Yeates, Bell. 2020 Cotton production during the tropical monsoon season. 1.

        Stage|P1|DAS|P2|DAS|P3|DAS
        -|-|-|-|-|-|-
        Sowing|1 Dec 2008|0|19 Dec 2008|0|7 Jan 2009|0
        Emergence||
        Squaring|22 Dec 2008|21|11 Jan 2009|23|2 Feb 2009|26
        Flowering|12 Jan 2009|42|5 Feb 2009|48|5 Mar 2009|57
        Cutout||
        OpenBolls|5 Mar 2009|94|19 Apr 2009|121|5 May 2009|118
        Maturity|14 May 2009|164|12 May 2009|144|10 Jun 2009|154
        Defoliation|5 May 2009?|155?|12 May 2009|144|12 Jun 2009|156
        HarvestRipe|24 May 2009|174|27 May 2009|159|30 Jun 2009|174
      Experiment BDK09
        Factors
          CompositeFactor P1
            Specifications:
              [Operations]
              [FurrowIrrigation]
            Operations
              2008-12-01  [Cotton].Sow(population: 8.1, cultivar: Sicot_74BRF , depth: 50, rowSpacing: 750);
              2008-12-01  [Fertiliser].Apply(90, Fertiliser.Types.UreaN,10);
              2008-12-18  [Fertiliser].Apply(90, Fertiliser.Types.NH4N,10);
            Manager FurrowIrrigation
              IrrigateDates = 1-dec, 6-mar, 13-mar, 21-mar, 28-mar, 4-apr, 12-apr, 19-apr, 26-apr
              asw_depth = 4
              crit_fr_asw = 1
              script: same as in Validation.Narrabri Deficit Trial 2006.NAR0607.Series.Ir80.FurrowIrrigation
          CompositeFactor P2
            Specifications:
              [Operations]
              [FurrowIrrigation]
            Operations
              2008-12-18  [Cotton].Sow(population: 8.4, cultivar: Sicot_74BRF , depth: 50, rowSpacing: 750);
              2008-12-01  [Fertiliser].Apply(90, Fertiliser.Types.UreaN,10);
              2008-12-18  [Fertiliser].Apply(90, Fertiliser.Types.NH4N,10);
            Manager FurrowIrrigation
              IrrigateDates = 6-mar, 13-mar, 21-mar, 28-mar, 4-apr, 12-apr, 19-apr, 26-apr, 1-may
              asw_depth = 7
              crit_fr_asw = 1
              script: same as in Validation.Narrabri Deficit Trial 2006.NAR0607.Series.Ir80.FurrowIrrigation
          CompositeFactor P3
            Specifications:
              [Operations]
              [FurrowIrrigation]
            Operations
              2009-01-07  [Cotton].Sow(population: 8.1, cultivar: Sicot_74BRF , depth: 50, rowSpacing: 750);
              2009-01-07  [Fertiliser].Apply(90, Fertiliser.Types.UreaN,10);
              2008-02-21  [Fertiliser].Apply(90, Fertiliser.Types.NH4N,10);
              2008-02-21  [Fertiliser].Apply(40, Fertiliser.Types.UreaN,10);
            Manager FurrowIrrigation
              IrrigateDates = 6-mar, 13-mar, 21-mar, 28-mar, 4-apr, 12-apr, 19-apr, 26-apr, 2-may, 14-may, 23-may, 29-may
              asw_depth = 7
              crit_fr_asw = 1
              script: same as in Validation.Narrabri Deficit Trial 2006.NAR0607.Series.Ir80.FurrowIrrigation
        Simulation BDK09Base
          Clock: Start=2008-11-30; End=2009-08-31
          Summary summaryfile
          Weather: FileName=Weatherfiles/QLD_BDK2008-12.met
          SoilArbitrator Soil Arbitrator
          MicroClimate: a_interception=0; b_interception=1; c_interception=0; d_interception=0; SoilHeatFluxFraction=0.4; MinimumHeightDiffForNewLayer=0; NightInterceptionFraction=0.5; ReferenceHeight=2
          Zone paddock: Area=1; Slope=0; AspectAngle=0; Altitude=50
            Fertiliser
            Operations
            Irrigation
            Manager FurrowIrrigation
              IrrigateDates =
              asw_depth = 0
              crit_fr_asw = -
              script: same as in Validation.Narrabri Deficit Trial 2006.NAR0607.Series.Ir80.FurrowIrrigation
            Manager Harvesting: same as Validation.KRS19_irrigated.KRS19IRCvSicot_748B3F.paddock.Harvesting
            Soil Ayr Loam (Estimated): SoilType=Grey Vertosol; Site=Ayr Queensland; NearestTown=Ayr, QLD  4807; Region=Burdekin; State=Queensland; Country=Australia; NaturalVegetation=Flood Plain; Latitude=-19.576; Longitude=147.405; LocationAccuracy=+/- 20m; DataSource=CSIRO Plant Industry, Approximation Only
              Comments=Based on Myall Vale heavy clay.  Adjusted based on observations by Dr Stephen Yeates (CSIRO Plant Industry)
              Physical
                Thickness  BD     AirDry  LL15   DUL    SAT
                150        1.527  0.08    0.186  0.279  0.38
                100        1.393  0.099   0.196  0.289  0.38
                100        1.393  0.12    0.215  0.289  0.371
                250        1.437  0.14    0.215  0.297  0.381
                200        1.483  0.15    0.231  0.306  0.392
                200        1.453  0.15    0.231  0.316  0.388
                300        1.506  0.15    0.282  0.306  0.377
                200        1.49   0.15    0.301  0.313  0.377
                200        1.537  0.15    0.306  0.322  0.377
                SoilCrop CottonSoil: LL=[0.19, 0.205, 0.223, 0.223, 0.238, 0.24, 0.29, 0.305, 0.31]; KL=[0.1, 0.1, 0.1, 0.1, 0.09, 0.07, 0.05, 0.05, 0.05]; XF=[1, 1, 1, 1, 1, 1, 1, 1, 1]
              WaterBalance SoilWater: SummerDate=1-Nov; SummerU=6; SummerCona=3.5; WinterDate=1-Apr; WinterU=4; WinterCona=2.5; DiffusConst=40; DiffusSlope=16; Salb=0.12; CN2Bare=73; CNRed=20; CNCov=0.8; PSIDul=-100; Thickness=[150, 100, 100, 250, 200, 200, 300, 200, 200]; SWCON=[0.3, 0.3, 0.3, 0.3, 0.3, 0.3, 0.3, 0.3, 0.3]
              Organic: FOMCNRatio=40; CarbonUnits=Total
                Thickness  Carbon  SoilCNRatio  FBiom  FInert  FOM
                150        0.677   12           0.04   0.4     261.633
                100        0.585   12           0.02   0.6     219.307
                100        0.477   12           0.02   0.8     183.828
                250        0.246   12           0.02   1       118.253
                200        0.092   12           0.01   1       83.087
                200        0.077   12           0.01   1       58.378
                300        0.038   12           0.01   1       34.382
                200        0.03    12           0.01   1       24.157
                200        0.028   12           0.01   1       16.973
              Chemical: Thickness=[150, 100, 100, 250, 200, 200, 300, 200, 200]; PH=[8.9, 9.2, 9.3, 9, 8.8, 7.5, 8.4, 8.4, 8.4]; PHUnits=Water
                PH source: Estimated based on local knowledge (layer 1, 2, 3, 4, 5, 6, 7)
              Nutrient
              Water: Thickness=[150, 100, 100, 250, 200, 200, 300, 200, 200]; InitialPAWmm=47.9; RelativeTo=LL15; FilledFromTop=true
                InitialValues=[0.279, 0.289, 0.289, 0.284, 0.231, 0.231, 0.282, 0.301, 0.306]
              CERESSoilTemperature Temperature
              Solute NO3: Thickness=[100, 200, 300]; InitialValues=[11, 9, 3]; InitialValuesUnits=ppm; WaterTableConcentration=0; D0=0; DepthConstant=0; MaxDepthSoluteAccessible=0; RunoffEffectivenessAtMovingSolute=0; MaxEffectiveRunoff=0
              Solute NH4: Thickness=[100, 200, 300]; InitialValues=[3.46, 2.97, 2.34]; InitialValuesUnits=ppm; WaterTableConcentration=0; D0=0; DepthConstant=0; MaxDepthSoluteAccessible=0; RunoffEffectivenessAtMovingSolute=0; MaxEffectiveRunoff=0
              Solute Urea: Thickness=[100]; InitialValues=[0]; InitialValuesUnits=kg/ha; WaterTableConcentration=0; D0=0; DepthConstant=0; MaxDepthSoluteAccessible=0; RunoffEffectivenessAtMovingSolute=0; MaxEffectiveRunoff=0
            SurfaceOrganicMatter: InitialResidueName=maize; InitialResidueType=maize; InitialResidueMass=2000; InitialStandingFraction=0; InitialCPR=0; InitialCNR=33
            Plant Cotton: PlantType=Cotton
            Report DailyReport: same as Validation.KRS19_irrigated.KRS19IRCvSicot_748B3F.paddock.DailyReport
            Report HarvestReport: EventNames=[Cotton].Harvesting
              VariableNames:
                [Clock].Today
                [Cotton].Structure.MainStemPrimordiaNo
                [Cotton].Phenology.NFF
                [Cotton].Script.FinalTag
      Memo
        Should resemble an S-curve
    Folder Burdekin Sowing Time Experiment 2012 (disabled)
      Memo Phenology stages Observed
        1/12/2023: See Fig. 5 Grundy, Yeates, Bell. 2020 Cotton production during the tropical monsoon season. 1.

        Stage|P1|DAS|P2|DAS
        -|-|-|-|-
        Sowing|18 Dec 2011|0|4 Jan 2012|0
        Emergence||
        Squaring|16 Jan 2012|29|8 Feb 2012|35
        Flowering|6 Feb 2012|50|24 Feb 2012|51
        Cutout||
        OpenBolls|29 Mar 2012|102|30 Apr 2012|117
        Maturity|26 Apr 2012|130|11 Jun 2012|159
        Defoliation|10 May 2012|144|17 Jun 2012|165
        HarvestRipe|5 Jun 2012|170|6 Jul 2012|184
      Experiment BDK12
        Factors
          CompositeFactor P1
            Specifications:
              [Operations]
              [Furrow Irrigation]
            Operations
              2011-12-18  [Cotton].Sow(population: 8, cultivar: Sicot_74BRF , depth: 50, rowSpacing: 750);
              2011-12-18  [Fertiliser].Apply(95, Fertiliser.Types.UreaN,10);
              2012-02-05  [Fertiliser].Apply(95, Fertiliser.Types.NH4N,10);
              2012-02-24  [Fertiliser].Apply(30, Fertiliser.Types.NO3N,10);
            Manager Furrow Irrigation
              asw_depth = 7
              crit_fr_asw = 0.8
              IrrigStart = 18-dec
              IrrigEnd = 12-apr
```csharp
// Applies irrigation into the second soil layer after a crop has been sown(lateral inflow from furrow into adjacent beds)
// Irrigation is applied on a deficit defined by the number of soil layers (depth) and a deficit value [0-1]
// Water applied uses the Irrigation model and is reported in the summary file.
// Local variable returned and available for reporting is: applied_furrow_irrigation

using Models.Interfaces;
using System;
using System.Linq;
using Models.Core;
using System.Collections.Generic;
using System.Text;
using Models.Soils;
using Models.PMF;
using System.Xml.Serialization;
using APSIM.Shared.Utilities;

namespace Models
{
    [Serializable]
    public class Script : Model
    {
        // Links
        [Link] Clock clock;
        [Link] Irrigation Irrigation;
        [Link] Soil Soil;
        [Link] IPhysical soilPhysical;
        [Link] ISoilWater waterBalance;

        // Fields
        public double SW_now;
        public double CLL_now;
        public double SW_full;

        // Properties
        [Description("Number of soil layers used in calculating SW deficit")]
        public int asw_depth { get; set; } // Change to int for layer count
        [Description("Fraction of ASW below which irrigation is applied (0-1.0)")]
        public double crit_fr_asw { get; set; } // Critical fraction of available soil water before applying irrigation
        [Description("The earliest date irrigation will be applied (dd-MMM)")]
        public string IrrigStart { get; set; } // No irrigation will be applied before this date
        [Description("The latest date irrigation will be applied (dd-MMM)")]
        public string IrrigEnd { get; set; } // No irrigation will be applied after this date

        // Output variables
        public double[] inflow_lat { get; set; }
        public double applied_furrow_irrigation { get; set; }

        // Methods

        // Calculate static soil variables
        [EventSubscribe("StartOfSimulation")]
        private void OnStartOfSimulation(object sender, EventArgs e)
        {
            // Initialize inflow_lat array
            inflow_lat = new double[soilPhysical.DULmm.Length];
        }

        // Determine daily requirement for irrigation
        [EventSubscribe("StartOfDay")]
        private void OnStartOfDay(object sender, EventArgs e)
        {
            // Is today within the irrigation window?
            if (DateUtilities.WithinDates(IrrigStart, clock.Today, IrrigEnd))
            {
                // Calculate soil water variables
                double[] SW_add = new double[soilPhysical.DULmm.Length];
                for (int layer = 0; layer < asw_depth; layer++)
                {
                    SW_now += waterBalance.SWmm[layer];
                    CLL_now += soilPhysical.LL15mm[layer];
                    SW_full += (soilPhysical.DULmm[layer] - soilPhysical.LL15mm[layer]);
                    SW_add[layer] = soilPhysical.DULmm[layer] - waterBalance.SWmm[layer];
                }

                // Is the soil water deficit greater than the critical SW fraction?
                if ((SW_now - CLL_now) <= (SW_full * crit_fr_asw))
                {
                    // Calculate irrigation and apply it
                    for (int layer = 1; layer < asw_depth; layer++)
                    {
                        inflow_lat[layer] = SW_add[layer] + (SW_add[0] / (asw_depth - 1));
                        applied_furrow_irrigation += inflow_lat[layer];
                        Irrigation.Apply(inflow_lat[layer], depth: soilPhysical.Thickness[layer]);
                    }
                }
                else
                {
                    for (int layer = 0; layer < soilPhysical.DULmm.Length; layer++)
                    {
                        inflow_lat[layer] = 0;
                        applied_furrow_irrigation = 0;            
        		    }
                }
			}
		}
	}
}
```
          CompositeFactor P2
            Specifications:
              [Operations]
              [Furrow Irrigation]
            Operations
              2012-01-04  [Cotton].Sow(population: 8.4, cultivar: Sicot_74BRF , depth: 50, rowSpacing: 750);
              2012-01-04  [Fertiliser].Apply(95, Fertiliser.Types.UreaN,10);
              2012-02-17  [Fertiliser].Apply(95, Fertiliser.Types.NH4N,10);
              2012-03-10  [Fertiliser].Apply(30, Fertiliser.Types.NO3N,10);
            Manager Furrow Irrigation
              asw_depth = 7
              crit_fr_asw = 0.8
              IrrigStart = 4-jan
              IrrigEnd = 14-may
              script: same as in Validation.Burdekin Sowing Time Experiment 2012.BDK12.Factors.P1.Furrow Irrigation
        Simulation BDK12Base
          Clock: Start=2011-12-18; End=2012-08-31
          Summary summaryfile
          Weather: FileName=Weatherfiles/QLD_BDK2008-12.met
          SoilArbitrator Soil Arbitrator
          MicroClimate: a_interception=0; b_interception=1; c_interception=0; d_interception=0; SoilHeatFluxFraction=0.4; MinimumHeightDiffForNewLayer=0; NightInterceptionFraction=0.5; ReferenceHeight=2
          Zone paddock: Area=1; Slope=0; AspectAngle=0; Altitude=50
            Fertiliser
            Operations
            Irrigation
            Manager Furrow Irrigation
              asw_depth = 0
              crit_fr_asw = 0
              IrrigStart =
              IrrigEnd =
              script: same as in Validation.Burdekin Sowing Time Experiment 2012.BDK12.Factors.P1.Furrow Irrigation
            Manager Harvesting: same as Validation.KRS19_irrigated.KRS19IRCvSicot_748B3F.paddock.Harvesting
            Soil Ayr Loam (Estimated): SoilType=Grey Vertosol; Site=Ayr Queensland; NearestTown=Ayr, QLD  4807; Region=Burdekin; State=Queensland; Country=Australia; NaturalVegetation=Flood Plain; Latitude=-19.576; Longitude=147.405; LocationAccuracy=+/- 20m; DataSource=CSIRO Plant Industry, Approximation Only
              Comments=Based on Myall Vale heavy clay.  Adjusted based on observations by Dr Stephen Yeates (CSIRO Plant Industry)
              Physical: same as Validation.Burdekin Sowing Time Experiment 2009.BDK09.BDK09Base.paddock.Ayr Loam (Estimated).Physical
              WaterBalance SoilWater: same as Validation.Burdekin Sowing Time Experiment 2009.BDK09.BDK09Base.paddock.Ayr Loam (Estimated).SoilWater
              Organic: FOMCNRatio=40; CarbonUnits=Total
                Thickness  Carbon  SoilCNRatio  FBiom  FInert  FOM
                150        0.88    12           0.04   0.4     261.633
                100        0.76    12           0.02   0.6     219.307
                100        0.62    12           0.02   0.8     183.828
                250        0.32    12           0.02   1       118.253
                200        0.12    12           0.01   1       83.087
                200        0.1     12           0.01   1       58.378
                300        0.05    12           0.01   1       34.382
                200        0.039   12           0.01   1       24.157
                200        0.036   12           0.01   1       16.973
              Chemical: same as Validation.Burdekin Sowing Time Experiment 2009.BDK09.BDK09Base.paddock.Ayr Loam (Estimated).Chemical
              Nutrient
              Water: Thickness=[150, 100, 100, 250, 200, 200, 300, 200, 200]; InitialPAWmm=46.85; RelativeTo=LL15; FilledFromTop=true
                InitialValues=[0.279, 0.289, 0.289, 0.251, 0.238, 0.24, 0.29, 0.305, 0.31]
              CERESSoilTemperature Temperature
              Solute NO3: Thickness=[300]; InitialValues=[30]; InitialValuesUnits=ppm; WaterTableConcentration=0; D0=0; DepthConstant=0; MaxDepthSoluteAccessible=0; RunoffEffectivenessAtMovingSolute=0; MaxEffectiveRunoff=0
              Solute NH4: Thickness=[1700]; InitialValues=[0]; InitialValuesUnits=ppm; WaterTableConcentration=0; D0=0; DepthConstant=0; MaxDepthSoluteAccessible=0; RunoffEffectivenessAtMovingSolute=0; MaxEffectiveRunoff=0
              Solute Urea: Thickness=[100]; InitialValues=[0]; InitialValuesUnits=kg/ha; WaterTableConcentration=0; D0=0; DepthConstant=0; MaxDepthSoluteAccessible=0; RunoffEffectivenessAtMovingSolute=0; MaxEffectiveRunoff=0
            SurfaceOrganicMatter: InitialResidueName=maize; InitialResidueType=maize; InitialResidueMass=2000; InitialStandingFraction=0; InitialCPR=0; InitialCNR=33
            Plant Cotton: PlantType=Cotton
            Report DailyReport: same as Validation.KRS19_irrigated.KRS19IRCvSicot_748B3F.paddock.DailyReport
            Report HarvestReport: EventNames=[Cotton].Harvesting
              VariableNames:
                [Clock].Today
                [Cotton].Structure.MainStemPrimordiaNo
                [Cotton].Phenology.NFF
                [Cotton].Script.FinalTag
      Memo
        Should resemble an S-curve
    Folder Emerald Sowing Time Experiment 2015 (disabled)
      Memo
        25/01/2024:

        The very early august sowings got the final irrigation around 10-15 Dec.

        The mid August ones typically got the last one around boxing day or the 27th Dec.

        The Sept sowing would have gotten one more after that about 10 days later.
      Experiment Emerald2015
        Factors Series
          CompositeFactor P1
            Specifications:
              [Operations]
              [Furrow Irrigation]
            Operations
              2015-06-20  [Fertiliser].Apply(100, Fertiliser.Types.UreaN,15); //6-8 weeks prior to sowing
              2015-10-05  [Fertiliser].Apply(140, Fertiliser.Types.UreaN,15); //during early squaring
              2015-08-01  [Cotton].Sow(population: 9.6, cultivar: Sicot_74BRF , depth: 20, rowSpacing: 1000);
            Manager Furrow Irrigation
              asw_depth = 6
              crit_fr_asw = 0.75
              IrrigStart = 1-aug
              IrrigEnd = 10-dec
              script: same as in Validation.Burdekin Sowing Time Experiment 2012.BDK12.Factors.P1.Furrow Irrigation
          CompositeFactor P2
            Specifications:
              [Operations]
              [Furrow Irrigation]
            Operations
              2015-07-10  [Fertiliser].Apply(100, Fertiliser.Types.UreaN,15); //6-8 weeks prior to sowing
              2015-10-16  [Fertiliser].Apply(140, Fertiliser.Types.UreaN,15); //during early squaring
              2015-08-21  [Cotton].Sow(population: 11.3, cultivar: Sicot_74BRF , depth: 20, rowSpacing: 1000);
            Manager Furrow Irrigation
              asw_depth = 6
              crit_fr_asw = 0.75
              IrrigStart = 21-aug
              IrrigEnd = 26-dec
              script: same as in Validation.Burdekin Sowing Time Experiment 2012.BDK12.Factors.P1.Furrow Irrigation
          CompositeFactor P3
            Specifications:
              [Operations]
              [Furrow Irrigation]
            Operations
              2015-08-04  [Fertiliser].Apply(100, Fertiliser.Types.UreaN,15); //6-8 weeks prior to sowing
              2015-11-08  [Fertiliser].Apply(140, Fertiliser.Types.UreaN,15); //during early squaring
              2015-09-15  [Cotton].Sow(population: 10.1, cultivar: Sicot_74BRF , depth: 20, rowSpacing: 1000);
            Manager Furrow Irrigation
              asw_depth = 6
              crit_fr_asw = 0.75
              IrrigStart = 15-sep
              IrrigEnd = 5-jan
              script: same as in Validation.Burdekin Sowing Time Experiment 2012.BDK12.Factors.P1.Furrow Irrigation
        Simulation Emerald2015Base
          Clock: Start=2015-08-01; End=2016-02-28
          Summary summaryfile
          Weather: FileName=Weatherfiles/CQ2013_17.met
          SoilArbitrator Soil Arbitrator
          MicroClimate: a_interception=0; b_interception=1; c_interception=0; d_interception=0; SoilHeatFluxFraction=0.4; MinimumHeightDiffForNewLayer=0; NightInterceptionFraction=0.5; ReferenceHeight=2
          Zone paddock: Area=1; Slope=0; AspectAngle=0; Altitude=50
            Fertiliser
            Operations
              2015-06-20  [Fertiliser].Apply(100, Fertiliser.Types.UreaN,15); //6-8 weeks prior to sowing
            Irrigation
            Manager Furrow Irrigation: same as Validation.Burdekin Sowing Time Experiment 2012.BDK12.BDK12Base.paddock.Furrow Irrigation
            Soil Grey Vertosol NMM: ASCOrder=Vertosol; ASCSubOrder=Grey; SoilType=Clay; Site=Myall Vale; NearestTown=Narrabri, NSW 2390; Region=North West Slopes and Plains; State=New South Wales; Country=Australia; NaturalVegetation=Grasslands; ApsoilNumber=97; Latitude=-30.2056; Longitude=149.593; LocationAccuracy=+/- 20m; YearOfSampling=0; DataSource=CSIRO Plant Industry, Myall Vale (D Richards); Comments=Clay -
              Physical
                Thickness  BD    AirDry  LL15   DUL    SAT
                150        1.31  0.109   0.109  0.475  0.476
                100        1.26  0.168   0.27   0.438  0.494
                100        1.35  0.168   0.27   0.437  0.491
                100        1.35  0.195   0.264  0.437  0.462
                100        1.35  0.195   0.264  0.437  0.462
                100        1.35  0.244   0.264  0.437  0.462
                250        1.39  0.264   0.264  0.435  0.446
                200        1.44  0.264   0.264  0.424  0.428
                200        1.45  0.264   0.264  0.424  0.424
                BD, DUL source: Field measured and checked for sensibility
                AirDry, LL15 source: Estimated based on local knowledge
                SAT source: Calculated from measured, estimated or calculated BD
                SoilCrop CottonSoil
                  LL=[0.109, 0.21, 0.21, 0.244, 0.244, 0.244, 0.277, 0.302, 0.302]
                  KL=[0.06, 0.06, 0.06, 0.04, 0.04, 0.04, 0.04, 0.02, 0.02]
                  XF=[1, 1, 1, 1, 1, 1, 1, 1, 1]
                  LL source: Field measured and checked for sensibility
              WaterBalance SoilWater: SummerDate=1-Nov; SummerU=6; SummerCona=3.5; WinterDate=1-Apr; WinterU=4; WinterCona=2.5; DiffusConst=40; DiffusSlope=16; Salb=0.12; CN2Bare=73; CNRed=20; CNCov=0.8; PSIDul=-100; Thickness=[150, 150, 300, 300, 300, 300, 300]; SWCON=[0.3, 0.3, 0.3, 0.3, 0.3, 0.3, 0.3]
              Organic: FOMCNRatio=40; CarbonUnits=Total
                Thickness  Carbon  SoilCNRatio  FBiom  FInert  FOM
                150        0.88    12           0.04   0.4     347.129
                150        0.76    12           0.02   0.6     270.344
                300        0.62    12           0.02   0.8     163.972
                300        0.32    12           0.02   1       99.454
                300        0.12    12           0.01   1       60.322
                300        0.1     12           0.01   1       36.587
                300        0.05    12           0.01   1       22.191
              Chemical: Thickness=[150, 150, 300, 300, 300, 300, 300]; PH=[8.9, 9.2, 9.3, 9, 8.8, 7.5, 8.4]; PHUnits=Water
                PH source: Estimated based on local knowledge
              Nutrient
              Water: Thickness=[150, 100, 100, 100, 100, 100, 250, 200, 200]; InitialPAWmm=123.5; RelativeTo=LL15; FilledFromTop=true
                InitialValues=[0.475, 0.438, 0.437, 0.437, 0.437, 0.269, 0.264, 0.264, 0.264]
              CERESSoilTemperature
              Solute NO3: Thickness=[150, 150, 300, 300, 300, 300, 300]; InitialValues=[29.7, 18.3, 6.4, 4, 3, 2.8, 0]; InitialValuesUnits=ppm; WaterTableConcentration=0; D0=0; DepthConstant=0; MaxDepthSoluteAccessible=0; RunoffEffectivenessAtMovingSolute=0; MaxEffectiveRunoff=0
              Solute NH4: Thickness=[150, 150, 300, 300, 300, 300, 300]; InitialValues=[0, 0, 0, 0, 0, 0, 0]; InitialValuesUnits=ppm; WaterTableConcentration=0; D0=0; DepthConstant=0; MaxDepthSoluteAccessible=0; RunoffEffectivenessAtMovingSolute=0; MaxEffectiveRunoff=0
              Solute Urea: same as Validation.Emerald Sowing Time Experiment 2015.Emerald2015.Emerald2015Base.paddock.Grey Vertosol NMM.NH4
              Memo
                If you look at the weather files all experiments were pre irrigated in late September – early October so soil profile would have been at DUL below surface layer(s) at planting.

                A combination of post establishment rain, clay soil and very slow crop growth (cold soil and temperatures) meant probes to 1.3 m could not be installed until about a month after establishment.

                Only the surface layers would have dried slightly by 1st probe readings.

                The plants are tiny at this stage at Narrabri so you could assume Dul below about 15 cm.

                APSIM could calculate the soil Et between planting and  probe measurement. Then if needed re set soil water = observed at first measurement and let simulation continue from that point – the error should be small.
            SurfaceOrganicMatter: InitialResidueName=nativepasture; InitialResidueType=nativepasture; InitialResidueMass=0; InitialStandingFraction=0; InitialCPR=0; InitialCNR=0
            Plant Cotton: PlantType=Cotton
            Report DailyReport: EventNames=[Clock].DoReport
              VariableNames:
                [Clock].Today
                [Clock].Today.DayOfYear
                [Weather].Rain
                [Weather].MeanT
                [Weather].MaxT
                [Weather].MinT
                [Weather].Radn
                [Weather].VPD
                [Cotton].DaysAfterSowing
                [Cotton].Arbitrator.DM.TotalFixationSupply
                [Cotton].Arbitrator.TotalDMFixationSupply
                [Cotton].Arbitrator.N.TotalFixationSupply
                [Cotton].Arbitrator.N.TotalPlantDemand
                [Cotton].Arbitrator.N.TotalPlantSupply
                sum([Cotton].Arbitrator.N.Fixation) as NFixed
                [Cotton].NitrogenUptake
                [Cotton].Phenology.Stage
                [Cotton].Phenology.ThermalTime
                [Cotton].Phenology.CurrentStageName
                [Cotton].Phenology.Photoperiod
                [Cotton].Phenology.EmergenceDAS
                [Cotton].Phenology.SquaringDAS
                [Cotton].Phenology.FloweringDAS
                [Cotton].Phenology.CutoutDAS
                [Cotton].Phenology.OpenbollsDAS
                [Cotton].Phenology.MaturityDAS
                [Cotton].AboveGround.Wt
                [Cotton].AboveGround.N
                [Cotton].AboveGroundLive.Wt
                [Cotton].Leaf.NodeNumber
                [Cotton].Leaf.Fw
                [Cotton].Leaf.Fn
                [Cotton].Leaf.Photosynthesis.FT
                [Cotton].Leaf.Photosynthesis.FVPD
                [Cotton].Leaf.LAI
                [Cotton].Leaf.HeightFunction
                [Cotton].Leaf.Height
                [Cotton].Leaf.CoverGreen
                [Cotton].Leaf.CoverTotal
                [Cotton].Leaf.Live.Wt
                [Cotton].Leaf.Live.StructuralWt
                [Cotton].Leaf.Live.MetabolicWt
                [Cotton].Leaf.Allocated.MetabolicWt
                [Cotton].Leaf.Allocated.StructuralWt
                [Cotton].Leaf.Dead.StructuralWt
                [Cotton].Leaf.Dead.MetabolicWt
                [Cotton].Leaf.Live.N
                [Cotton].Leaf.Live.NConc
                [Cotton].Leaf.Dead.Wt
                [Cotton].Leaf.Dead.N
                [Cotton].Leaf.Dead.NConc
                [Cotton].Leaf.RadiationIntercepted
                [Cotton].Leaf.Wt
                [Cotton].Leaf.Nconc
                [Cotton].Leaf.N
                [Cotton].Leaf.Senesced.Wt
                [Cotton].Leaf.BranchNumber
                [Cotton].Leaf.SpecificAreaCanopy
                [Cotton].Leaf.Sites
                [Cotton].Leaf.SpecificArea
                [Cotton].Leaf.CoverTotal
                [Cotton].Stem.Wt
                [Cotton].Stem.Total.StructuralWt
                [Cotton].Stem.Live.StructuralWt
                [Cotton].Stem.Live.StructuralN
                [Cotton].Stem.N
                [Cotton].Stem.Nconc
                [Cotton].Lint.Wt
                [Cotton].Lint.N
                [Cotton].Lint.Nconc
                [Cotton].Lint.Bales as Bales
                [Cotton].Boll.HarvestIndex
                [Cotton].Lint.Allocated.Wt
                [Cotton].Lint.DMDemand.Total
                [Cotton].Leaf.DMDemand.Total
                [Cotton].Bur.DMDemand.Total
                [Cotton].Stem.DMDemand.Total
                ([Cotton].Bur.DMDemand.Total+[Cotton].Lint.DMDemand.Total+[Cotton].Seed.DMDemand.Total) as BollDMDemand
                ([Cotton].Stem.DMDemand.Total+[Cotton].Leaf.DMDemand.Total) as VegetativeDMDemand
                ([Cotton].Stem.DMDemand.Total+[Cotton].Leaf.DMDemand.Total+[Cotton].Lint.DMDemand.Total+[Cotton].Seed.DMDemand.Total+[Cotton].Bur.DMDemand.Total) as ShootDMDemand
                [Cotton].Root.DMDemand.Total
                [Cotton].Lint.NDemand.Total
                [Cotton].Leaf.NDemand.Total
                [Cotton].Stem.NDemand.Total
                [Cotton].Root.NDemand.Total
                [Cotton].Root.NUptake
                [Cotton].Lint.LiveFWt
                [Cotton].Root.Wt
                [Cotton].Root.Depth
                [Soil].Water.Volumetric[1:3]
                [Soil].Water.Volumetric
                sum([Soil].SoilWater.ESW) as TotalESW
                [Soil].SoilWater.SW
                ([Soil].SoilWater.SWmm[1]+[Soil].SoilWater.SWmm[2]+[Soil].SoilWater.SWmm[3]+[Soil].SoilWater.SWmm[4]+[Soil].SoilWater.SWmm[5]+[Soil].SoilWater.SWmm[6]) as SWmm1800
                ([Soil].SoilWater.ESW[1]+[Soil].SoilWater.ESW[2]+[Soil].SoilWater.ESW[3]+[Soil].SoilWater.ESW[4]+[Soil].SoilWater.ESW[5]+[Soil].SoilWater.ESW[6]) as ESW1800
                sum([Soil].NO3.kgha) as TotalSoilNO3
                sum([Soil]..NH4.kgha) as TotalSoilNH4
                sum([Soil].Water.MM) as TotalSW
                sum([Soil].NO3.ppm) as NO3
                sum([Soil].NH4.ppm) as NH4
                sum([Soil].Water.Volumetric) as TotalSWC
                sum([Soil].Water.MM) as TotalWaterMM
                ([Soil].Water.MM[1]+[Soil].Water.MM[2]+[Soil].Water.MM[3]+[Soil].Water.MM[4]+[Soil].Water.MM[5]+[Soil].Water.MM[6]+[Soil].Water.MM[7]) as SW1500mm
                ([Soil].Water.MM[1]+[Soil].Water.MM[2]+[Soil].Water.MM[3]+[Soil].Water.MM[4]+[Soil].Water.MM[5]+[Soil].Water.MM[6]) as SW1800mm
                ([Soil].Water.MM[1]+[Soil].Water.MM[2]+[Soil].Water.MM[3]+[Soil].Water.MM[4]+[Soil].Water.MM[5]) as SW1200mm
                (sum([CottonSoil].PAWmm)/sum([CottonSoil].PAWCmm)) as AvailableSoilMoisture
                ([CottonSoil].PAWmm[1]+[CottonSoil].PAWmm[2]+[CottonSoil].PAWmm[3]+[CottonSoil].PAWmm[4]+[CottonSoil].PAWmm[5]) as PAWTop5Layers
                -(([CottonSoil].PAWCmm[1]+[CottonSoil].PAWCmm[2]+[CottonSoil].PAWCmm[3]+[CottonSoil].PAWCmm[4]+[CottonSoil].PAWCmm[5])-([CottonSoil].PAWmm[1]+[CottonSoil].PAWmm[2]+[CottonSoil].PAWmm[3]+[CottonSoil].PAWmm[4]+[CottonSoil].PAWmm[5])) as SoilWaterDeficit120
                [Irrigation].IrrigationApplied
                [Cotton].Boll.Wt
                [Cotton].Lint.Wt
                [Cotton].Seed.Wt
                [Cotton].Bur.Wt
                [Cotton].NitrogenUptake
                sum([Soil].SoilWater.SWmm) as TotalSWmm
                ([Soil].SoilWater.SWmm[1]) as SW1
                ([Soil].SoilWater.SWmm[2]) as SW2
                ([Soil].SoilWater.SWmm[3]) as SW3
                ([Soil].SoilWater.SWmm[4]) as SW4
                ([Soil].SoilWater.SWmm[5]) as SW5
                ([Soil].SoilWater.SWmm[6]) as SW6
                ([Soil].SoilWater.SWmm[1]+[Soil].SoilWater.SWmm[2]+[Soil].SoilWater.SWmm[3]+[Soil].SoilWater.SWmm[4]+[Soil].SoilWater.SWmm[5]+[Soil].SoilWater.SWmm[6]) as SWmm1800
                [Soil].SoilWater.ESW[1] as ESW1
                [Soil].SoilWater.ESW[2] as ESW2
                [Soil].SoilWater.ESW[3] as ESW3
                [Soil].SoilWater.ESW[4] as ESW4
                [Soil].SoilWater.ESW[5] as ESW5
                [Soil].SoilWater.ESW[6] as ESW6
                [Soil].SoilWater.PAWmm[1] as PAW1
                [Cotton].Arbitrator.SDRatio
                [Cotton].Arbitrator.SDRatioBound
                [Cotton].Phenology.AccB_PER
                [Cotton].Phenology.BollPeriod
                [Cotton].Phenology.GrowthRate.CGR
                [Cotton].Phenology.GrowthRate.FGR
                [Cotton].Phenology.GrowthRate.CGR.SubtractFunction.AboveGroundToday
                [Cotton].Phenology.GrowthRate.CGR.SubtractFunction.AboveGroundYesterday
                [Cotton].Phenology.GrowthRateScript.Script.AboveGroundYesterday
                [Cotton].Phenology.GrowthRate.CGR.SubtractFunction.AboveGroundToday
                [Cotton].Phenology.GrowthRate.CGR.SubtractFunction.AboveGroundYesterday
                [Cotton].Phenology.GrowthRate.FGR.SubtractFunction.FruitToday
                [Cotton].Phenology.GrowthRate.FGR.SubtractFunction.FruitYesterday
                [Cotton].Phenology.GrowthRate.CGR
                [Cotton].Phenology.GrowthRate.FGR
            Report HarvestReport: EventNames=[Cotton].Harvesting
              VariableNames:
                [Clock].Today
                [Cotton].Phenology.CurrentStageName
                [Cotton].Phenology.EmergenceDAS
                [Cotton].Phenology.SquaringDAS
                [Cotton].Phenology.FloweringDAS
                [Cotton].Phenology.CutoutDAS
                [Cotton].Phenology.OpenbollsDAS
                [Cotton].Phenology.MaturityDAS
                [Cotton].AboveGround.Wt
                [Cotton].Boll.Wt
      Memo
        Should resemble an S-curve
    Folder NAR0708 (disabled)
      Memo
        Check observed data, especially LAI!
      Simulation NAR0809Ir80
        Clock: Start=2008-09-01; End=2009-05-01
        Summary summaryfile
        Weather: FileName=Weatherfiles/NAR0809.met
        SoilArbitrator Soil Arbitrator
        MicroClimate: a_interception=0; b_interception=1; c_interception=0; d_interception=0; SoilHeatFluxFraction=0.4; MinimumHeightDiffForNewLayer=0; NightInterceptionFraction=0.5; ReferenceHeight=2
        Zone paddock: Area=1; Slope=0; AspectAngle=0; Altitude=50
          Manager Sowing
            Crop = [Cotton]
            SowDate = 15-oct
            CultivarName = Sicot_71B
            SowingDepth = 50
            RowSpacing = 1000
            Population = 9
            script: same as in Validation.Narrabri Deficit Trial 2006.NAR0607.NAR0607Base.paddock.Sowing
          Fertiliser
          Operations FertiliserEvents
            2008-09-12  [Fertiliser].Apply(200, Fertiliser.Types.UreaN,10);
          Irrigation
          Manager FurrowIrrigation
            IrrigateDates = 2-oct, 9-dec, 22-dec, 2-jan, 9-jan, 15-jan, 23-jan, 30-jan, 5-feb, 11-feb, 27-feb, 12-mar
            asw_depth = 7
            crit_fr_asw = 1
            script: same as in Validation.Narrabri Deficit Trial 2006.NAR0607.Series.Ir80.FurrowIrrigation
          Manager Harvesting: same as Validation.KRS19_irrigated.KRS19IRCvSicot_748B3F.paddock.Harvesting
          Soil Grey Vertosol NMM: ASCOrder=Vertosol; ASCSubOrder=Grey; SoilType=Clay; Site=Myall Vale; NearestTown=Narrabri, NSW 2390; Region=North West Slopes and Plains; State=New South Wales; Country=Australia; NaturalVegetation=Grasslands; ApsoilNumber=97; Latitude=-30.2056; Longitude=149.593; LocationAccuracy=+/- 20m; YearOfSampling=0; DataSource=CSIRO Plant Industry, Myall Vale (D Richards); Comments=Clay -
            Physical: same as Validation.Emerald Sowing Time Experiment 2015.Emerald2015.Emerald2015Base.paddock.Grey Vertosol NMM.Physical
            WaterBalance SoilWater: same as Validation.Emerald Sowing Time Experiment 2015.Emerald2015.Emerald2015Base.paddock.Grey Vertosol NMM.SoilWater
            Organic: same as Validation.Emerald Sowing Time Experiment 2015.Emerald2015.Emerald2015Base.paddock.Grey Vertosol NMM.Organic
            Chemical: same as Validation.Emerald Sowing Time Experiment 2015.Emerald2015.Emerald2015Base.paddock.Grey Vertosol NMM.Chemical
            Nutrient
            Water: Thickness=[150, 100, 100, 100, 100, 100, 250, 200, 200]; InitialPAWmm=34.95; RelativeTo=LL15; FilledFromTop=true
              InitialValues=[0.342, 0.27, 0.27, 0.264, 0.264, 0.264, 0.264, 0.264, 0.264]
            CERESSoilTemperature
            Solute NO3: Thickness=[150, 150]; InitialValues=[2.6, 19.2]; InitialValuesUnits=ppm; WaterTableConcentration=0; D0=0; DepthConstant=0; MaxDepthSoluteAccessible=0; RunoffEffectivenessAtMovingSolute=0; MaxEffectiveRunoff=0
            Solute NH4: same as Validation.Emerald Sowing Time Experiment 2015.Emerald2015.Emerald2015Base.paddock.Grey Vertosol NMM.NH4
            Solute Urea: same as Validation.Emerald Sowing Time Experiment 2015.Emerald2015.Emerald2015Base.paddock.Grey Vertosol NMM.NH4
            Memo: same as Validation.Emerald Sowing Time Experiment 2015.Emerald2015.Emerald2015Base.paddock.Grey Vertosol NMM.Memo
          SurfaceOrganicMatter: InitialResidueName=nativepasture; InitialResidueType=nativepasture; InitialResidueMass=0; InitialStandingFraction=0; InitialCPR=0; InitialCNR=0
          Plant Cotton: PlantType=Cotton
          Report DailyReport: same as Validation.KRS19_irrigated.KRS19IRCvSicot_748B3F.paddock.DailyReport
          Report HarvestReport: EventNames=[Cotton].Harvesting
            VariableNames:
              [Clock].Today
              [Cotton].Structure.MainStemPrimordiaNo
              [Cotton].Phenology.NFF
              [Cotton].Script.FinalTag
      Simulation NAR0809Ir45
        Clock: Start=2008-09-01; End=2009-05-01
        Summary summaryfile
        Weather: FileName=Weatherfiles/NAR0809.met
        SoilArbitrator Soil Arbitrator
        MicroClimate: a_interception=0; b_interception=1; c_interception=0; d_interception=0; SoilHeatFluxFraction=0.4; MinimumHeightDiffForNewLayer=0; NightInterceptionFraction=0.5; ReferenceHeight=2
        Zone paddock: Area=1; Slope=0; AspectAngle=0; Altitude=50
          Manager Sowing: same as Validation.NAR0708.NAR0809Ir80.paddock.Sowing
          Fertiliser
          Operations FertiliserEvents
            2008-09-12  [Fertiliser].Apply(200, Fertiliser.Types.UreaN,10);
          Irrigation
          Manager FurrowIrrigation
            IrrigateDates = 2-oct, 16-jan, 6-feb
            asw_depth = 7
            crit_fr_asw = 1
            script: same as in Validation.Narrabri Deficit Trial 2006.NAR0607.Series.Ir80.FurrowIrrigation
          Manager Harvesting: same as Validation.KRS19_irrigated.KRS19IRCvSicot_748B3F.paddock.Harvesting
          Soil Grey Vertosol NMM: same as Validation.NAR0708.NAR0809Ir80.paddock.Grey Vertosol NMM
          SurfaceOrganicMatter: InitialResidueName=nativepasture; InitialResidueType=nativepasture; InitialResidueMass=0; InitialStandingFraction=0; InitialCPR=0; InitialCNR=0
          Plant Cotton: PlantType=Cotton
          Report DailyReport: same as Validation.KRS19_irrigated.KRS19IRCvSicot_748B3F.paddock.DailyReport
          Report HarvestReport: EventNames=[Cotton].Harvesting
            VariableNames:
              [Clock].Today
              [Cotton].Structure.MainStemPrimordiaNo
              [Cotton].Phenology.NFF
              [Cotton].Script.FinalTag
      Memo
        Should resemble an S-curve
    Folder N_rate (disabled)
      Memo Tim Weaver Nitrogen Experiments
        * Pre-sowing soil test data available (initial NO3, NH4, Org. C). Tim Weaver had them collected and needs to find them

        * Gin turnout data from the 2021 trial not available yet - results not yet received from the lab
      Memo Phenology stages Observed
        There was no phenology data available from the trial since this was not collected.

        These are guestimates (comment 28/11/2023: need to revise):

        Stage|Date|DAS
        -|-|-
        Sowing|4 Nov 2019|0
        Squaring||
        Flowering||
        Cutout|20 Jan 2020|77
        OpenBolls|17 Feb 2020|105
        Maturity|16 Mar 2020|133
        HarvestRipe|14 Jun 2020|223
      Experiment TW20
        Factors
          Permutation
            Factor N
              CompositeFactor 0: Specifications=[FertiliserEvents]
                Operations FertiliserEvents
                  2019-09-27  [Fertiliser].Apply(0, Fertiliser.Types.UreaN,10);
                  2019-12-17  [Fertiliser].Apply(0, Fertiliser.Types.UreaN,10);
              CompositeFactor 100: Specifications=[FertiliserEvents]
                Operations FertiliserEvents
                  2019-09-27  [Fertiliser].Apply(100, Fertiliser.Types.UreaN,10);
              CompositeFactor 200: Specifications=[FertiliserEvents]
                Operations FertiliserEvents
                  2019-09-27  [Fertiliser].Apply(100, Fertiliser.Types.UreaN,10);
                  2019-12-17  [Fertiliser].Apply(100, Fertiliser.Types.UreaN,10);
              CompositeFactor 300: Specifications=[FertiliserEvents]
                Operations FertiliserEvents
                  2019-09-27  [Fertiliser].Apply(100, Fertiliser.Types.UreaN,10);
                  2019-12-17  [Fertiliser].Apply(200, Fertiliser.Types.UreaN,10);
        Simulation ACRI2019_20
          Clock: Start=2019-09-01; End=2020-05-30
          Summary summaryfile
          Weather: FileName=Weatherfiles/WeeWaaAgResStn.met
          SoilArbitrator Soil Arbitrator
          MicroClimate: a_interception=0; b_interception=1; c_interception=0; d_interception=0; SoilHeatFluxFraction=0.4; MinimumHeightDiffForNewLayer=0; NightInterceptionFraction=0.5; ReferenceHeight=2
          Zone paddock: Area=1; Slope=0; AspectAngle=0; Altitude=50
            Manager Sowing
              Crop = [Cotton]
              SowDate = 4-nov
              CultivarName = Sicot_746B3F
              SowingDepth = 30
              RowSpacing = 1000
              Population = 11
              script: same as in Validation.Narrabri Deficit Trial 2006.NAR0607.NAR0607Base.paddock.Sowing
            Fertiliser
            Operations FertiliserEvents
              2019-09-27  [Fertiliser].Apply(0, Fertiliser.Types.UreaN,10);
              2019-09-27  [Fertiliser].Apply(100, Fertiliser.Types.UreaN,10);
              2019-12-17  [Fertiliser].Apply(0, Fertiliser.Types.UreaN,10);
              2019-12-17  [Fertiliser].Apply(100, Fertiliser.Types.UreaN,10);
              2019-12-17  [Fertiliser].Apply(200, Fertiliser.Types.UreaN,10);
            Irrigation
            Manager AutomaticIrrigation
              allowIrrigation = True
              seasonStart = 1-nov
              seasonEnd = 30-may
              seasonsAllocation = 10000
              triggerDeficit = 80
              targetDeficit = 100
              returndays = 0
              maximumAmount = 1000
              depthPAWC = 500
```csharp
using Newtonsoft.Json;
using APSIM.Shared.Utilities;
using System.Xml.Serialization;
using Models.Soils;
using Models.PMF;
using Models.Core;
using System;
using Models.Interfaces;



        
namespace Models
{
    [Serializable] 
    [System.Xml.Serialization.XmlInclude(typeof(Model))]
    public class Script : Model
    {
        [Link] private ISummary summary;
        [Link] private Irrigation Irrigation;
        [Link] private Clock Clock;
        [Link] private Soil Soil;
        [Link(IsOptional = true)] private IPlant existingCrop;
        private DateTime StartDate;
        private DateTime EndDate;
        private double TopDUL;
        private double TopLL;
        private int nLayers;
        [Link]
        private IPhysical soilPhysical;
        [Link]
        private ISoilWater waterBalance;
        //Communication to other modules
       
        //User inputs from properties tab
        [Description("Turn irrigation on?")]
        public bool allowIrrigation { get; set; }
        [Description("Start of irrigation season (dd-MMM)")]
        public string seasonStart { get; set; }
        [Description("End of irrigation season (dd-MMM)")]
        public string seasonEnd { get; set; }
        [Description("Season allocation (mm)")]
        public double seasonsAllocation { get; set; }
        [Description("Deficit to trigger irrigation (% PAWC)")]
        public double triggerDeficit { get; set; }
        [Description("Deficit to stop irrigaton (% PAWC)")]
        public double targetDeficit { get; set; }
        [Description("Minimum days for irrigation to return")]
        public double returndays { get; set; }
        [Description("Maximum irrigation application (mm/day)")]
        public double maximumAmount { get; set; }
        [Description("Depth to calculate PAWC (mm)")]
        public double depthPAWC { get; set; }

        //Class members
        [JsonIgnore] public double TopSWdeficit { get; set; }
        [JsonIgnore] public double TopSWC { get; set; }
        [JsonIgnore] public double DaysSinceIrrigation { get; set; }
        [JsonIgnore] public double AmountToApply { get; set; }
        [JsonIgnore] public double SeasonAppliedAmount { get; set; }
        
        private bool IrrigationIsAllowed { get; set; }
        private bool SeasonIsOpen { get; set; }
        private bool CropIsActive { get; set; }
        private bool IrrigatorIsAvailable { get; set; }
        private bool SoilIsDry { get; set; }

    
        //Calculate static soil variables
        [EventSubscribe("StartOfSimulation")]
        private void OnStartOfSimulation(object sender, EventArgs e)
        {   
            //Set the season dates
            StartDate = DateTime.Parse(seasonStart + "-" + Clock.Today.Year.ToString());
            EndDate = DateTime.Parse(seasonEnd + "-" + Clock.Today.Year.ToString());
            
            //Can we irrigate at all?
            IrrigationIsAllowed = false; 
            if (allowIrrigation)
                IrrigationIsAllowed = true; 

            //Calculate soil water variables
            double depthFromSurface = 0.0;
            double fracLayer = 0.0;
            nLayers = soilPhysical.Thickness.Length;
            for (int layer = 0; layer < nLayers; layer++)
            {
                fracLayer = Math.Min(1.0, (depthPAWC - depthFromSurface) / soilPhysical.Thickness[layer]);
                TopLL += soilPhysical.LL15mm[layer] * fracLayer;
                TopDUL += soilPhysical.DULmm[layer] * fracLayer;
                depthFromSurface += soilPhysical.Thickness[layer];
                if (depthFromSurface >= depthPAWC)
                    layer = nLayers;
            }
        }
             
        //Determine daily requirement for irrigation
        [EventSubscribe("StartOfDay")]
        private void OnStartOfDay(object sender, EventArgs e)
        {
            //Can we irrigate today?          
            SeasonIsOpen = isBetween(Clock.Today, StartDate, EndDate);
            if (!SeasonIsOpen)
                SeasonAppliedAmount = 0;

            //Is there a crop in the ground that needs irrigation?
            CropIsActive = false;
            if ((existingCrop != null) && (existingCrop.IsAlive))
                CropIsActive = true;
            //if ((existingCrop.Phenology.Stage >= 3.0) && (existingCrop.Phenology.Stage < 6.0))
          
            //Is the irrigator available?
            IrrigatorIsAvailable = false;
            DaysSinceIrrigation += 1;
            if (DaysSinceIrrigation >= returndays)
                IrrigatorIsAvailable = true;
          
            //Is the soil dry enough to require irrigation?
            SoilIsDry = false;
            double depthFromSurface = 0.0;
            double fracLayer = 0.0;
            TopSWC = 0.0;
            for (int layer = 0; layer < nLayers; layer++)
            //for (int layer = 0; depthFromSurface < depthPAWC + soilPhysical.Thickness[layer]; layer++)
            {
                fracLayer = Math.Min(1.0, (depthPAWC - depthFromSurface) / soilPhysical.Thickness[layer]);
                TopSWC += waterBalance.SWmm[layer] * fracLayer;
                depthFromSurface += soilPhysical.Thickness[layer];
                if (depthFromSurface >= depthPAWC)
                    layer = nLayers;
            }
            
            TopSWdeficit = TopSWC - TopDUL;
            if (Math.Max(0.0, -TopSWdeficit) >= (TopDUL - TopLL) * (100 - triggerDeficit) / 100)
                SoilIsDry = true;
                
            //Are all the conditions ratifying irrigation
            if (IrrigationIsAllowed && SeasonIsOpen && CropIsActive && IrrigatorIsAvailable && SoilIsDry)
            {
                //Lets bloody well irrigate then!!!!
                AmountToApply = TopDUL * targetDeficit / 100 - TopSWC;
                AmountToApply = Math.Max(0.0, Math.Min(AmountToApply, seasonsAllocation - SeasonAppliedAmount));
                AmountToApply = Math.Min(AmountToApply,maximumAmount);
                Irrigation.Apply(AmountToApply);
                DaysSinceIrrigation = 0;
                SeasonAppliedAmount += AmountToApply;
            }
        }
        
        ///Checks whether theDate is between iniDate and endDate (non-year specific)
        private bool isBetween(DateTime theDay, DateTime iniDate, DateTime endDate)
        {
            bool result = false;
            if (iniDate.DayOfYear < endDate.DayOfYear)
            {
                // period is within one year, ex: summer in the northern hemisphere
                if ((theDay.DayOfYear >= iniDate.DayOfYear) && (theDay.DayOfYear <= endDate.DayOfYear))
                    result = true;
            }
            else
            {
                // period goes over the end of the year, ex: summer in the southern hemisphere
                if ((theDay.DayOfYear >= iniDate.DayOfYear) || (theDay.DayOfYear <= endDate.DayOfYear))
                    result = true;
            }
            
            return result;
        }
    }
}
```
            Manager Harvesting: same as Validation.KRS19_irrigated.KRS19IRCvSicot_748B3F.paddock.Harvesting
            Soil Grey Vertosol (Myall Vale No097): ASCOrder=Vertosol; ASCSubOrder=Grey; SoilType=Clay; Site=Myall Vale; NearestTown=Narrabri, NSW 2390; Region=North West Slopes and Plains; State=New South Wales; Country=Australia; NaturalVegetation=Grasslands; ApsoilNumber=97; Latitude=-30.2056; Longitude=149.593; LocationAccuracy=+/- 20m; YearOfSampling=0; DataSource=CSIRO Plant Industry, Myall Vale (D Richards); Comments=Clay -
              Physical
                Thickness  BD    AirDry  LL15  DUL   SAT
                150        1.31  0.11    0.22  0.43  0.48
                150        1.26  0.176   0.22  0.44  0.49
                300        1.36  0.22    0.22  0.41  0.46
                300        1.39  0.22    0.22  0.4   0.45
                300        1.44  0.22    0.22  0.38  0.43
                300        1.45  0.22    0.22  0.37  0.42
                300        1.46  0.22    0.22  0.37  0.42
                BD, DUL source: Field measured and checked for sensibility
                AirDry, LL15 source: Estimated based on local knowledge
                SAT source: Calculated from measured, estimated or calculated BD
                SoilCrop CottonSoil: LL=[0.22, 0.22, 0.22, 0.25, 0.27, 0.3, 0.33]; KL=[0.1, 0.1, 0.1, 0.1, 0.09, 0.07, 0.05]; XF=[1, 1, 1, 1, 1, 1, 1]
                  LL source: Field measured and checked for sensibility
              WaterBalance SoilWater: same as Validation.Emerald Sowing Time Experiment 2015.Emerald2015.Emerald2015Base.paddock.Grey Vertosol NMM.SoilWater
              Organic: same as Validation.Emerald Sowing Time Experiment 2015.Emerald2015.Emerald2015Base.paddock.Grey Vertosol NMM.Organic
              Chemical: same as Validation.Emerald Sowing Time Experiment 2015.Emerald2015.Emerald2015Base.paddock.Grey Vertosol NMM.Chemical
              Nutrient
              Water: Thickness=[150, 150, 300, 300, 300, 300, 300]; InitialValues=[0.22, 0.22, 0.22, 0.22, 0.22, 0.22, 0.22]; InitialPAWmm=0; RelativeTo=LL15; FilledFromTop=true
              CERESSoilTemperature
              Solute NO3: Thickness=[150, 150, 300, 300, 300, 300, 300]; InitialValues=[30, 20, 7, 5, 3, 2, 1]; InitialValuesUnits=ppm; WaterTableConcentration=0; D0=0; DepthConstant=0; MaxDepthSoluteAccessible=0; RunoffEffectivenessAtMovingSolute=0; MaxEffectiveRunoff=0
              Solute NH4: Thickness=[150, 150, 300, 300, 300, 300, 300]; InitialValues=[1, 1, 1, 1, 1, 1, 1]; InitialValuesUnits=ppm; WaterTableConcentration=0; D0=0; DepthConstant=0; MaxDepthSoluteAccessible=0; RunoffEffectivenessAtMovingSolute=0; MaxEffectiveRunoff=0
              Solute Urea: same as Validation.Emerald Sowing Time Experiment 2015.Emerald2015.Emerald2015Base.paddock.Grey Vertosol NMM.NH4
            SurfaceOrganicMatter: InitialResidueName=nativepasture; InitialResidueType=nativepasture; InitialResidueMass=3833; InitialStandingFraction=0.3; InitialCPR=0; InitialCNR=34
            Plant Cotton: PlantType=Cotton
            Report DailyReport: EventNames=[Clock].DoReport
              VariableNames:
                [Clock].Today
                [DiagnosticsVariables].Script.AccumPlantN
                [DiagnosticsVariables].Script.AccumMineralisation
                [DiagnosticsVariables].Script.AccumDenit
                [DiagnosticsVariables].Script.AccumFert
                [DiagnosticsVariables].Script.AccumLeach
                [DiagnosticsVariables].Script.AccumDetach
                [DiagnosticsVariables].Script.DeltaSoilOMN
                [DiagnosticsVariables].Script.DeltaSurfaceOMN
                [DiagnosticsVariables].Script.DeltaSoilMineralN
                [Cotton].Root.NSupply
                [Soil].SoilWater.Eo
                [Soil].SoilWater.Es
                [DiagnosticsVariables].Script.SWC
                [DiagnosticsVariables].Script.DUL
                [Soil].SoilWater.Drainage
                [Soil].SoilWater.Runoff
                [DiagnosticsVariables].Script.OutFlowLat
                [Soil].SoilWater.pond
                [DiagnosticsVariables].Script.AccumEO
                [DiagnosticsVariables].Script.AccumEP
                [DiagnosticsVariables].Script.AccumES
                [DiagnosticsVariables].Script.AccumDrainage
                [DiagnosticsVariables].Script.AccumRunoff
                [DiagnosticsVariables].Script.AccumRainfall
                [DiagnosticsVariables].Script.AccumIrrigation
                [DiagnosticsVariables].Script.AccumOutflowLat
                [DiagnosticsVariables].Script.SoilWaterDeficit
                [Cotton].Grain.Live.Wt
                [Cotton].Shell.Live.Wt
                [Cotton].Stem.Live.Wt
                [Cotton].Stem.Live.Wt
                [Cotton].Grain.Live.N
                [Cotton].Shell.Live.N
                [Cotton].Leaf.Live.Wt
                [Cotton].Root.Live.Wt
                [Cotton].Leaf.Live.N
                [Cotton].Root.Live.N
                [Cotton].Leaf.Live.NConc
                [Cotton].Root.Live.NConc
                [Cotton].Root.WaterSupply
                [Cotton].Root.WaterUptake
                [Cotton].Leaf.Transpiration
                [Cotton].Leaf.WaterDemand
                [Cotton].Root.Depth
                [Cotton].Leaf.CoverTotal
                [Cotton].Leaf.CoverDead
                [Cotton].Leaf.LAI
                [Cotton].Leaf.Height
                [Cotton].Leaf.PotentialBiomass
                [Soil].Water.MM
                [Soil].NO3.kgha
                [DiagnosticsVariables].Script.SoilNitrogenContent
                [Cotton].Arbitrator.N.TotalPlantDemand
                [MicroClimate].net_radn
                [MicroClimate].peta
                [MicroClimate].petr
                [DiagnosticsVariables].Script.FomN
                [DiagnosticsVariables].Script.HumN
                [DiagnosticsVariables].Script.BiomN
                [DiagnosticsVariables].Script.DltNMinRes
                [DiagnosticsVariables].Script.DltNMinTot
                [Cotton].Leaf.Fw
                [Cotton].Leaf.Fn
                [Cotton].Phenology.ThermalTime
                [Cotton].Phenology.DD
                [Cotton].Phenology.CurrentPhase.Name
                [Cotton].Phenology.Stage
                [Cotton].Pod.Wt
                [Cotton].Pod.N
                [Cotton].Structure.LeafTipsAppeared
                [Cotton].Structure.MainStemPrimordiaNo
                [Cotton].Leaf.AppearedCohortNo
                [Cotton].Leaf.DeadCohortNo
                [Cotton].AboveGround.Wt
                [Cotton].AboveGround.N
                [Cotton].Phenology.Stage
                [Cotton].Structure.MainStemPrimordiaNo
                [Cotton].Phenology.NFF
                [CottonHarvestRule].Script.FinalTag
                [Cotton].Grain.NumberFunction
                [Cotton].Shell.PodNumber
                [Cotton].Phenology.FN
                [Cotton].Phenology.FN.TotalNodes
                [Cotton].Phenology.FN.VegetativeNodes
                [Fertiliser].NitrogenApplied
            Report HarvestReport: same as Validation.Emerald Sowing Time Experiment 2015.Emerald2015.Emerald2015Base.paddock.HarvestReport
      Memo
        Add branches to observed data --> I have this data!
      Memo
        Should resemble an S-curve
    Folder ACRI0708 (disabled)
      Experiment ACRI_
        Factors
          Permutation
            Factor Irrigation
              CompositeFactor 25: Specifications=[IrrigationEvents]
                Operations IrrigationEvents
                  2007-12-11  [Irrigation].Apply(2.4); // 25
                  2007-12-13  [Irrigation].Apply(3.6);
                  2007-12-14  [Irrigation].Apply(2.4);
                  2007-12-18  [Irrigation].Apply(2.4);
                  2007-12-26  [Irrigation].Apply(3.6);
                  2007-12-29  [Irrigation].Apply(3.6);
                  2007-12-31  [Irrigation].Apply(3.6);
                  2008-01-02  [Irrigation].Apply(3.6);
                  2008-01-04  [Irrigation].Apply(3.6);
                  2008-01-05  [Irrigation].Apply(3.6);
                  2008-01-08  [Irrigation].Apply(3.3);
                  2008-01-11  [Irrigation].Apply(3.8);
                  2008-01-14  [Irrigation].Apply(3.8);
                  2008-01-15  [Irrigation].Apply(3.8);
                  2008-01-16  [Irrigation].Apply(2.8);
                  2008-01-24  [Irrigation].Apply(3.8);
                  2008-01-25  [Irrigation].Apply(2.6);
                  2008-01-27  [Irrigation].Apply(2.5);
                  2008-01-29  [Irrigation].Apply(3.8);
                  2008-01-31  [Irrigation].Apply(4.0);
                  2008-02-02  [Irrigation].Apply(1.5);
                  2008-02-06  [Irrigation].Apply(1.5);
                  2008-02-08  [Irrigation].Apply(2.6);
                  2008-02-11  [Irrigation].Apply(4.4);
                  2008-02-15  [Irrigation].Apply(1.5);
                  2008-02-16  [Irrigation].Apply(4.3);
                  2008-02-18  [Irrigation].Apply(3.3);
                  2008-02-21  [Irrigation].Apply(3.8);
                  2008-02-25  [Irrigation].Apply(4.0);
                  2008-02-26  [Irrigation].Apply(4.0);
                  2008-02-27  [Irrigation].Apply(2.5);
                  2008-03-03  [Irrigation].Apply(3.0);
                  2008-03-04  [Irrigation].Apply(2.3);
                  2008-03-05  [Irrigation].Apply(2.7);
                  2008-03-07  [Irrigation].Apply(3.0);
                  2008-03-10  [Irrigation].Apply(3.8);
                  2008-03-11  [Irrigation].Apply(2.4);
                  2008-03-13  [Irrigation].Apply(2.9);
                  2008-03-14  [Irrigation].Apply(1.5);
                  2008-03-17  [Irrigation].Apply(3.8);
                  2008-03-18  [Irrigation].Apply(2.2);
              CompositeFactor 50: Specifications=[IrrigationEvents]
                Operations IrrigationEvents
                  2007-12-11  [Irrigation].Apply(4.8); // 50
                  2007-12-13  [Irrigation].Apply(7.2);
                  2007-12-14  [Irrigation].Apply(4.8);
                  2007-12-18  [Irrigation].Apply(4.8);
                  2007-12-26  [Irrigation].Apply(7.2);
                  2007-12-29  [Irrigation].Apply(7.2);
                  2007-12-31  [Irrigation].Apply(7.2);
                  2008-01-02  [Irrigation].Apply(7.2);
                  2008-01-04  [Irrigation].Apply(7.2);
                  2008-01-05  [Irrigation].Apply(7.2);
                  2008-01-08  [Irrigation].Apply(6.5);
                  2008-01-11  [Irrigation].Apply(7.5);
                  2008-01-14  [Irrigation].Apply(7.5);
                  2008-01-15  [Irrigation].Apply(7.5);
                  2008-01-16  [Irrigation].Apply(5.7);
                  2008-01-24  [Irrigation].Apply(7.5);
                  2008-01-25  [Irrigation].Apply(5.1);
                  2008-01-27  [Irrigation].Apply(5.0);
                  2008-01-29  [Irrigation].Apply(7.6);
                  2008-01-31  [Irrigation].Apply(8.0);
                  2008-02-02  [Irrigation].Apply(2.9);
                  2008-02-06  [Irrigation].Apply(3.0);
                  2008-02-08  [Irrigation].Apply(5.2);
                  2008-02-11  [Irrigation].Apply(8.7);
                  2008-02-15  [Irrigation].Apply(3.0);
                  2008-02-16  [Irrigation].Apply(8.6);
                  2008-02-18  [Irrigation].Apply(6.5);
                  2008-02-21  [Irrigation].Apply(7.5);
                  2008-02-25  [Irrigation].Apply(8.0);
                  2008-02-26  [Irrigation].Apply(8.0);
                  2008-02-27  [Irrigation].Apply(5.0);
                  2008-03-03  [Irrigation].Apply(6.0);
                  2008-03-04  [Irrigation].Apply(4.5);
                  2008-03-05  [Irrigation].Apply(5.5);
                  2008-03-07  [Irrigation].Apply(6.1);
                  2008-03-10  [Irrigation].Apply(7.5);
                  2008-03-11  [Irrigation].Apply(4.7);
                  2008-03-13  [Irrigation].Apply(5.9);
                  2008-03-14  [Irrigation].Apply(3.0);
                  2008-03-17  [Irrigation].Apply(7.5);
                  2008-03-18  [Irrigation].Apply(4.3);
              CompositeFactor 75: Specifications=[IrrigationEvents]
                Operations IrrigationEvents
                  2007-12-11  [Irrigation].Apply(7.2); // 75
                  2007-12-13  [Irrigation].Apply(10.8);
                  2007-12-14  [Irrigation].Apply(7.2);
                  2007-12-18  [Irrigation].Apply(7.2);
                  2007-12-26  [Irrigation].Apply(10.8);
                  2007-12-29  [Irrigation].Apply(10.8);
                  2007-12-31  [Irrigation].Apply(10.8);
                  2008-01-02  [Irrigation].Apply(10.8);
                  2008-01-04  [Irrigation].Apply(10.8);
                  2008-01-05  [Irrigation].Apply(10.8);
                  2008-01-08  [Irrigation].Apply(9.8);
                  2008-01-11  [Irrigation].Apply(11.3);
                  2008-01-14  [Irrigation].Apply(11.3);
                  2008-01-15  [Irrigation].Apply(11.3);
                  2008-01-16  [Irrigation].Apply(8.5);
                  2008-01-24  [Irrigation].Apply(11.3);
                  2008-01-25  [Irrigation].Apply(7.7);
                  2008-01-27  [Irrigation].Apply(7.5);
                  2008-01-29  [Irrigation].Apply(11.4);
                  2008-01-31  [Irrigation].Apply(11.9);
                  2008-02-02  [Irrigation].Apply(4.4);
                  2008-02-06  [Irrigation].Apply(4.5);
                  2008-02-08  [Irrigation].Apply(7.7);
                  2008-02-11  [Irrigation].Apply(13.1);
                  2008-02-15  [Irrigation].Apply(4.5);
                  2008-02-16  [Irrigation].Apply(12.9);
                  2008-02-18  [Irrigation].Apply(9.8);
                  2008-02-21  [Irrigation].Apply(11.3);
                  2008-02-25  [Irrigation].Apply(12.0);
                  2008-02-26  [Irrigation].Apply(12.0);
                  2008-02-27  [Irrigation].Apply(7.5);
                  2008-03-03  [Irrigation].Apply(9.0);
                  2008-03-04  [Irrigation].Apply(6.8);
                  2008-03-05  [Irrigation].Apply(8.2);
                  2008-03-07  [Irrigation].Apply(9.1);
                  2008-03-10  [Irrigation].Apply(11.3);
                  2008-03-11  [Irrigation].Apply(7.1);
                  2008-03-13  [Irrigation].Apply(8.8);
                  2008-03-14  [Irrigation].Apply(4.6);
                  2008-03-17  [Irrigation].Apply(11.3);
                  2008-03-18  [Irrigation].Apply(6.5);
                  2008-03-21  [Irrigation].Apply(4.5);
                  2008-03-25  [Irrigation].Apply(10.2);
                  2008-03-28  [Irrigation].Apply(3.8);
              CompositeFactor 100: Specifications=[IrrigationEvents]
                Operations IrrigationEvents
                  2007-12-11  [Irrigation].Apply(9.6); // 100
                  2007-12-13  [Irrigation].Apply(14.4);
                  2007-12-14  [Irrigation].Apply(9.6);
                  2007-12-18  [Irrigation].Apply(9.6);
                  2007-12-26  [Irrigation].Apply(14.4);
                  2007-12-29  [Irrigation].Apply(14.4);
                  2007-12-31  [Irrigation].Apply(14.4);
                  2008-01-02  [Irrigation].Apply(14.4);
                  2008-01-04  [Irrigation].Apply(14.4);
                  2008-01-05  [Irrigation].Apply(14.4);
                  2008-01-08  [Irrigation].Apply(13.0);
                  2008-01-11  [Irrigation].Apply(15.0);
                  2008-01-14  [Irrigation].Apply(15.0);
                  2008-01-15  [Irrigation].Apply(15.0);
                  2008-01-16  [Irrigation].Apply(11.3);
                  2008-01-24  [Irrigation].Apply(15.0);
                  2008-01-25  [Irrigation].Apply(10.3);
                  2008-01-27  [Irrigation].Apply(10.0);
                  2008-01-29  [Irrigation].Apply(15.2);
                  2008-01-31  [Irrigation].Apply(15.9);
                  2008-02-02  [Irrigation].Apply(5.9);
                  2008-02-06  [Irrigation].Apply(6.0);
                  2008-02-08  [Irrigation].Apply(10.3);
                  2008-02-11  [Irrigation].Apply(17.4);
                  2008-02-15  [Irrigation].Apply(6.0);
                  2008-02-16  [Irrigation].Apply(17.2);
                  2008-02-18  [Irrigation].Apply(13.0);
                  2008-02-21  [Irrigation].Apply(15.0);
                  2008-02-25  [Irrigation].Apply(16.0);
                  2008-02-26  [Irrigation].Apply(16.0);
                  2008-02-27  [Irrigation].Apply(10.0);
                  2008-03-03  [Irrigation].Apply(12.0);
                  2008-03-04  [Irrigation].Apply(9.0);
                  2008-03-05  [Irrigation].Apply(10.9);
                  2008-03-07  [Irrigation].Apply(12.1);
                  2008-03-10  [Irrigation].Apply(15.0);
                  2008-03-11  [Irrigation].Apply(9.4);
                  2008-03-13  [Irrigation].Apply(11.7);
                  2008-03-14  [Irrigation].Apply(6.1);
                  2008-03-17  [Irrigation].Apply(15.0);
                  2008-03-18  [Irrigation].Apply(8.6);
                  2008-03-21  [Irrigation].Apply(6.0);
                  2008-03-25  [Irrigation].Apply(13.7);
                  2008-03-28  [Irrigation].Apply(5.1);
              CompositeFactor 125: Specifications=[IrrigationEvents]
                Operations IrrigationEvents
                  2007-12-11  [Irrigation].Apply(12.0); // 125
                  2007-12-13  [Irrigation].Apply(18.0);
                  2007-12-14  [Irrigation].Apply(12.0);
                  2007-12-18  [Irrigation].Apply(12.0);
                  2007-12-26  [Irrigation].Apply(18.0);
                  2007-12-29  [Irrigation].Apply(18.0);
                  2007-12-31  [Irrigation].Apply(18.0);
                  2008-01-02  [Irrigation].Apply(18.0);
                  2008-01-04  [Irrigation].Apply(18.0);
                  2008-01-05  [Irrigation].Apply(18.0);
                  2008-01-08  [Irrigation].Apply(16.3);
                  2008-01-11  [Irrigation].Apply(18.8);
                  2008-01-14  [Irrigation].Apply(18.8);
                  2008-01-15  [Irrigation].Apply(18.8);
                  2008-01-16  [Irrigation].Apply(14.1);
                  2008-01-24  [Irrigation].Apply(18.8);
                  2008-01-25  [Irrigation].Apply(12.9);
                  2008-01-27  [Irrigation].Apply(12.5);
                  2008-01-29  [Irrigation].Apply(19.0);
                  2008-01-31  [Irrigation].Apply(19.9);
                  2008-02-02  [Irrigation].Apply(7.4);
                  2008-02-06  [Irrigation].Apply(7.5);
                  2008-02-08  [Irrigation].Apply(12.9);
                  2008-02-11  [Irrigation].Apply(21.8);
                  2008-02-15  [Irrigation].Apply(7.5);
                  2008-02-16  [Irrigation].Apply(21.5);
                  2008-02-18  [Irrigation].Apply(16.3);
                  2008-02-21  [Irrigation].Apply(18.8);
                  2008-02-25  [Irrigation].Apply(20.0);
                  2008-02-26  [Irrigation].Apply(20.0);
                  2008-02-27  [Irrigation].Apply(12.5);
                  2008-03-03  [Irrigation].Apply(15.0);
                  2008-03-04  [Irrigation].Apply(11.3);
                  2008-03-05  [Irrigation].Apply(13.7);
                  2008-03-07  [Irrigation].Apply(15.1);
                  2008-03-10  [Irrigation].Apply(18.8);
                  2008-03-11  [Irrigation].Apply(11.8);
                  2008-03-13  [Irrigation].Apply(14.7);
                  2008-03-14  [Irrigation].Apply(7.6);
                  2008-03-17  [Irrigation].Apply(18.8);
                  2008-03-18  [Irrigation].Apply(10.8);
                  2008-03-21  [Irrigation].Apply(7.5);
                  2008-03-25  [Irrigation].Apply(17.1);
                  2008-03-28  [Irrigation].Apply(6.4);
        Simulation ACRI drip irrigation trial 0708
          Memo Phenology stages Observed
            Stage|Date|DAS
            -|-|-
            Sowing|05 Oct 2007|0
            Emergence|11 Oct 2006|6
            Squaring||
            Flowering||
            Cutout|12 Jan 2008|99
            OpenBolls||
            Maturity||
            Defoliation|31 Mar 2008|178
            HarvestRipe|1 Apr 2008|179
          Memo Notes
            Treatment 1: total irrigation applied 187 mm
          Clock: Start=2007-09-01; End=2008-04-30
          Summary summaryfile
          Weather
            FileName=C:/Users/rhe005/OneDrive - CSIRO/Work Files/00. APSIM NEXTGEN/Toowoomba 27 Feb to 3 Mar/Validation Data Sets/Warren Conaty - drip irrigation trial/ACRI200708.met
          SoilArbitrator Soil Arbitrator
          MicroClimate: a_interception=0; b_interception=1; c_interception=0; d_interception=0; SoilHeatFluxFraction=0.4; MinimumHeightDiffForNewLayer=0; NightInterceptionFraction=0.5; ReferenceHeight=2
          Zone paddock: Area=1; Slope=0; AspectAngle=0; Altitude=50
            Manager Sowing
              Crop = [Cotton]
              SowDate = 5-Oct
              CultivarName = Sicot_70BRF
              SowingDepth = 50
              RowSpacing = 1000
              Population = 11
              script: same as in Validation.Narrabri Deficit Trial 2006.NAR0607.NAR0607Base.paddock.Sowing
            Fertiliser
            Operations FertiliserEvents
              2007-09-14  [Fertiliser].Apply(160, Fertiliser.Types.UreaN,10);
            Irrigation
            Operations IrrigationEvents
              2007-12-11  [Irrigation].Apply(2.4); // 25
              2007-12-13  [Irrigation].Apply(3.6);
              2007-12-14  [Irrigation].Apply(2.4);
              2007-12-18  [Irrigation].Apply(2.4);
              2007-12-26  [Irrigation].Apply(3.6);
              2007-12-29  [Irrigation].Apply(3.6);
              2007-12-31  [Irrigation].Apply(3.6);
              2008-01-02  [Irrigation].Apply(3.6);
              2008-01-04  [Irrigation].Apply(3.6);
              2008-01-05  [Irrigation].Apply(3.6);
              2008-01-08  [Irrigation].Apply(3.3);
              2008-01-11  [Irrigation].Apply(3.8);
              2008-01-14  [Irrigation].Apply(3.8);
              2008-01-15  [Irrigation].Apply(3.8);
              2008-01-16  [Irrigation].Apply(2.8);
              2008-01-24  [Irrigation].Apply(3.8);
              2008-01-25  [Irrigation].Apply(2.6);
              2008-01-27  [Irrigation].Apply(2.5);
              2008-01-29  [Irrigation].Apply(3.8);
              2008-01-31  [Irrigation].Apply(4.0);
              2008-02-02  [Irrigation].Apply(1.5);
              2008-02-06  [Irrigation].Apply(1.5);
              2008-02-08  [Irrigation].Apply(2.6);
              2008-02-11  [Irrigation].Apply(4.4);
              2008-02-15  [Irrigation].Apply(1.5);
              2008-02-16  [Irrigation].Apply(4.3);
              2008-02-18  [Irrigation].Apply(3.3);
              2008-02-21  [Irrigation].Apply(3.8);
              2008-02-25  [Irrigation].Apply(4.0);
              2008-02-26  [Irrigation].Apply(4.0);
              2008-02-27  [Irrigation].Apply(2.5);
              2008-03-03  [Irrigation].Apply(3.0);
              2008-03-04  [Irrigation].Apply(2.3);
              2008-03-05  [Irrigation].Apply(2.7);
              2008-03-07  [Irrigation].Apply(3.0);
              2008-03-10  [Irrigation].Apply(3.8);
              2008-03-11  [Irrigation].Apply(2.4);
              2008-03-13  [Irrigation].Apply(2.9);
              2008-03-14  [Irrigation].Apply(1.5);
              2008-03-17  [Irrigation].Apply(3.8);
              2008-03-18  [Irrigation].Apply(2.2);
              2007-12-11  [Irrigation].Apply(4.8); // 50
              2007-12-13  [Irrigation].Apply(7.2);
              2007-12-14  [Irrigation].Apply(4.8);
              2007-12-18  [Irrigation].Apply(4.8);
              2007-12-26  [Irrigation].Apply(7.2);
              2007-12-29  [Irrigation].Apply(7.2);
              2007-12-31  [Irrigation].Apply(7.2);
              2008-01-02  [Irrigation].Apply(7.2);
              2008-01-04  [Irrigation].Apply(7.2);
              2008-01-05  [Irrigation].Apply(7.2);
              2008-01-08  [Irrigation].Apply(6.5);
              2008-01-11  [Irrigation].Apply(7.5);
              2008-01-14  [Irrigation].Apply(7.5);
              2008-01-15  [Irrigation].Apply(7.5);
              2008-01-16  [Irrigation].Apply(5.7);
              2008-01-24  [Irrigation].Apply(7.5);
              2008-01-25  [Irrigation].Apply(5.1);
              2008-01-27  [Irrigation].Apply(5.0);
              2008-01-29  [Irrigation].Apply(7.6);
              2008-01-31  [Irrigation].Apply(8.0);
              2008-02-02  [Irrigation].Apply(2.9);
              2008-02-06  [Irrigation].Apply(3.0);
              2008-02-08  [Irrigation].Apply(5.2);
              2008-02-11  [Irrigation].Apply(8.7);
              2008-02-15  [Irrigation].Apply(3.0);
              2008-02-16  [Irrigation].Apply(8.6);
              2008-02-18  [Irrigation].Apply(6.5);
              2008-02-21  [Irrigation].Apply(7.5);
              2008-02-25  [Irrigation].Apply(8.0);
              2008-02-26  [Irrigation].Apply(8.0);
              2008-02-27  [Irrigation].Apply(5.0);
              2008-03-03  [Irrigation].Apply(6.0);
              2008-03-04  [Irrigation].Apply(4.5);
              2008-03-05  [Irrigation].Apply(5.5);
              2008-03-07  [Irrigation].Apply(6.1);
              2008-03-10  [Irrigation].Apply(7.5);
              2008-03-11  [Irrigation].Apply(4.7);
              2008-03-13  [Irrigation].Apply(5.9);
              2008-03-14  [Irrigation].Apply(3.0);
              2008-03-17  [Irrigation].Apply(7.5);
              2008-03-18  [Irrigation].Apply(4.3);
              2007-12-11  [Irrigation].Apply(7.2); // 75
              2007-12-13  [Irrigation].Apply(10.8);
              2007-12-14  [Irrigation].Apply(7.2);
              2007-12-18  [Irrigation].Apply(7.2);
              2007-12-26  [Irrigation].Apply(10.8);
              2007-12-29  [Irrigation].Apply(10.8);
              2007-12-31  [Irrigation].Apply(10.8);
              2008-01-02  [Irrigation].Apply(10.8);
              2008-01-04  [Irrigation].Apply(10.8);
              2008-01-05  [Irrigation].Apply(10.8);
              2008-01-08  [Irrigation].Apply(9.8);
              2008-01-11  [Irrigation].Apply(11.3);
              2008-01-14  [Irrigation].Apply(11.3);
              2008-01-15  [Irrigation].Apply(11.3);
              2008-01-16  [Irrigation].Apply(8.5);
              2008-01-24  [Irrigation].Apply(11.3);
              2008-01-25  [Irrigation].Apply(7.7);
              2008-01-27  [Irrigation].Apply(7.5);
              2008-01-29  [Irrigation].Apply(11.4);
              2008-01-31  [Irrigation].Apply(11.9);
              2008-02-02  [Irrigation].Apply(4.4);
              2008-02-06  [Irrigation].Apply(4.5);
              2008-02-08  [Irrigation].Apply(7.7);
              2008-02-11  [Irrigation].Apply(13.1);
              2008-02-15  [Irrigation].Apply(4.5);
              2008-02-16  [Irrigation].Apply(12.9);
              2008-02-18  [Irrigation].Apply(9.8);
              2008-02-21  [Irrigation].Apply(11.3);
              2008-02-25  [Irrigation].Apply(12.0);
              2008-02-26  [Irrigation].Apply(12.0);
              2008-02-27  [Irrigation].Apply(7.5);
              2008-03-03  [Irrigation].Apply(9.0);
              2008-03-04  [Irrigation].Apply(6.8);
              2008-03-05  [Irrigation].Apply(8.2);
              2008-03-07  [Irrigation].Apply(9.1);
              2008-03-10  [Irrigation].Apply(11.3);
              2008-03-11  [Irrigation].Apply(7.1);
              2008-03-13  [Irrigation].Apply(8.8);
              2008-03-14  [Irrigation].Apply(4.6);
              2008-03-17  [Irrigation].Apply(11.3);
              2008-03-18  [Irrigation].Apply(6.5);
              2008-03-21  [Irrigation].Apply(4.5);
              2008-03-25  [Irrigation].Apply(10.2);
              2008-03-28  [Irrigation].Apply(3.8);
              2007-12-11  [Irrigation].Apply(9.6); // 100
              2007-12-13  [Irrigation].Apply(14.4);
              2007-12-14  [Irrigation].Apply(9.6);
              2007-12-18  [Irrigation].Apply(9.6);
              2007-12-26  [Irrigation].Apply(14.4);
              2007-12-29  [Irrigation].Apply(14.4);
              2007-12-31  [Irrigation].Apply(14.4);
              2008-01-02  [Irrigation].Apply(14.4);
              2008-01-04  [Irrigation].Apply(14.4);
              2008-01-05  [Irrigation].Apply(14.4);
              2008-01-08  [Irrigation].Apply(13.0);
              2008-01-11  [Irrigation].Apply(15.0);
              2008-01-14  [Irrigation].Apply(15.0);
              2008-01-15  [Irrigation].Apply(15.0);
              2008-01-16  [Irrigation].Apply(11.3);
              2008-01-24  [Irrigation].Apply(15.0);
              2008-01-25  [Irrigation].Apply(10.3);
              2008-01-27  [Irrigation].Apply(10.0);
              2008-01-29  [Irrigation].Apply(15.2);
              2008-01-31  [Irrigation].Apply(15.9);
              2008-02-02  [Irrigation].Apply(5.9);
              2008-02-06  [Irrigation].Apply(6.0);
              2008-02-08  [Irrigation].Apply(10.3);
              2008-02-11  [Irrigation].Apply(17.4);
              2008-02-15  [Irrigation].Apply(6.0);
              2008-02-16  [Irrigation].Apply(17.2);
              2008-02-18  [Irrigation].Apply(13.0);
              2008-02-21  [Irrigation].Apply(15.0);
              2008-02-25  [Irrigation].Apply(16.0);
              2008-02-26  [Irrigation].Apply(16.0);
              2008-02-27  [Irrigation].Apply(10.0);
              2008-03-03  [Irrigation].Apply(12.0);
              2008-03-04  [Irrigation].Apply(9.0);
              2008-03-05  [Irrigation].Apply(10.9);
              2008-03-07  [Irrigation].Apply(12.1);
              2008-03-10  [Irrigation].Apply(15.0);
              2008-03-11  [Irrigation].Apply(9.4);
              2008-03-13  [Irrigation].Apply(11.7);
              2008-03-14  [Irrigation].Apply(6.1);
              2008-03-17  [Irrigation].Apply(15.0);
              2008-03-18  [Irrigation].Apply(8.6);
              2008-03-21  [Irrigation].Apply(6.0);
              2008-03-25  [Irrigation].Apply(13.7);
              2008-03-28  [Irrigation].Apply(5.1);
              2007-12-11  [Irrigation].Apply(12.0); // 125
              2007-12-13  [Irrigation].Apply(18.0);
              2007-12-14  [Irrigation].Apply(12.0);
              2007-12-18  [Irrigation].Apply(12.0);
              2007-12-26  [Irrigation].Apply(18.0);
              2007-12-29  [Irrigation].Apply(18.0);
              2007-12-31  [Irrigation].Apply(18.0);
              2008-01-02  [Irrigation].Apply(18.0);
              2008-01-04  [Irrigation].Apply(18.0);
              2008-01-05  [Irrigation].Apply(18.0);
              2008-01-08  [Irrigation].Apply(16.3);
              2008-01-11  [Irrigation].Apply(18.8);
              2008-01-14  [Irrigation].Apply(18.8);
              2008-01-15  [Irrigation].Apply(18.8);
              2008-01-16  [Irrigation].Apply(14.1);
              2008-01-24  [Irrigation].Apply(18.8);
              2008-01-25  [Irrigation].Apply(12.9);
              2008-01-27  [Irrigation].Apply(12.5);
              2008-01-29  [Irrigation].Apply(19.0);
              2008-01-31  [Irrigation].Apply(19.9);
              2008-02-02  [Irrigation].Apply(7.4);
              2008-02-06  [Irrigation].Apply(7.5);
              2008-02-08  [Irrigation].Apply(12.9);
              2008-02-11  [Irrigation].Apply(21.8);
              2008-02-15  [Irrigation].Apply(7.5);
              2008-02-16  [Irrigation].Apply(21.5);
              2008-02-18  [Irrigation].Apply(16.3);
              2008-02-21  [Irrigation].Apply(18.8);
              2008-02-25  [Irrigation].Apply(20.0);
              2008-02-26  [Irrigation].Apply(20.0);
              2008-02-27  [Irrigation].Apply(12.5);
              2008-03-03  [Irrigation].Apply(15.0);
              2008-03-04  [Irrigation].Apply(11.3);
              2008-03-05  [Irrigation].Apply(13.7);
              2008-03-07  [Irrigation].Apply(15.1);
              2008-03-10  [Irrigation].Apply(18.8);
              2008-03-11  [Irrigation].Apply(11.8);
              2008-03-13  [Irrigation].Apply(14.7);
              2008-03-14  [Irrigation].Apply(7.6);
              2008-03-17  [Irrigation].Apply(18.8);
              2008-03-18  [Irrigation].Apply(10.8);
              2008-03-21  [Irrigation].Apply(7.5);
              2008-03-25  [Irrigation].Apply(17.1);
              2008-03-28  [Irrigation].Apply(6.4);
            Manager Harvesting: same as Validation.KRS19_irrigated.KRS19IRCvSicot_748B3F.paddock.Harvesting
            Manager Reset initial water
              ResetDate = 28-sep
              ResetWater = Yes
              ResetNutrients = No
              ResetSOM = No
```csharp
using Models.Soils.Nutrients;
using APSIM.Shared.Utilities;
using Models.Surface;
using Models.Utilities;
using Models.Soils.Nutrients;
using Models.Soils;
using Models.PMF;
using Models.Core;
using System;
using System.Linq;
using Models.Interfaces;

namespace Models
{
    [Serializable]
    public class Script : Model
    {
        [Link] private Clock Clock;
        [Link] private Plant Wheat;
        [Link] private ISoilWater SoilWater;
        [Link] private Nutrient nutrient;
        [Link] private SurfaceOrganicMatter SOM;
        [Link] private Summary Summary;

        [Description("Date to reset on:")]
        public string ResetDate {get;set;}

        [Description("Reset Water? (Yes or No)")]
        public string ResetWater {get;set;}

        [Description("Reset Soil Nutrients ? (Yes or No)")]
        public string ResetNutrients {get;set;}

        [Description("Reset Surface Organic Matter? (Yes or No)")]
        public string ResetSOM {get;set;}

        [EventSubscribe("DoManagement")]
        private void OnDoManagement(object sender, EventArgs e)
        {
            if (DateUtilities.WithinDates(ResetDate, Clock.Today, ResetDate))
            {
                if (ResetWater == "Yes")
                {
                    Summary.WriteMessage(this, "Reset Water", MessageType.Diagnostic);
                    SoilWater.Reset();
                }
                if (ResetNutrients == "Yes")
                {
                    Summary.WriteMessage(this, "Reset Nitrogen", MessageType.Diagnostic);
                    nutrient.Reset();
                }
                if (ResetSOM == "Yes")
                {
                    Summary.WriteMessage(this, "Reset Surface OM", MessageType.Diagnostic);
                    SOM.Reset();
                }
            }
        }
    }
}
```
            Plant Cotton: PlantType=Cotton
            Soil Grey Vertosol (Myall Vale No097): ASCOrder=Vertosol; ASCSubOrder=Grey; SoilType=Clay; Site=Myall Vale; NearestTown=Narrabri, NSW 2390; Region=North West Slopes and Plains; State=New South Wales; Country=Australia; NaturalVegetation=Grasslands; ApsoilNumber=97; Latitude=-30.2056; Longitude=149.593; LocationAccuracy=+/- 20m; YearOfSampling=0; DataSource=CSIRO Plant Industry, Myall Vale (D Richards); Comments=Clay -
              Physical: same as Validation.N_rate.TW20.ACRI2019_20.paddock.Grey Vertosol (Myall Vale No097).Physical
              WaterBalance SoilWater: same as Validation.Emerald Sowing Time Experiment 2015.Emerald2015.Emerald2015Base.paddock.Grey Vertosol NMM.SoilWater
              Organic: same as Validation.Emerald Sowing Time Experiment 2015.Emerald2015.Emerald2015Base.paddock.Grey Vertosol NMM.Organic
              Chemical: same as Validation.Emerald Sowing Time Experiment 2015.Emerald2015.Emerald2015Base.paddock.Grey Vertosol NMM.Chemical
              Nutrient
              Water: Thickness=[150, 150, 300, 300, 300, 300, 300]; InitialValues=[0.43, 0.44, 0.41, 0.4, 0.38, 0.37, 0.37]; InitialPAWmm=313.5; RelativeTo=LL15; FilledFromTop=true
              CERESSoilTemperature
              Solute NO3: same as Validation.Emerald Sowing Time Experiment 2015.Emerald2015.Emerald2015Base.paddock.Grey Vertosol NMM.NO3
              Solute NH4: same as Validation.Emerald Sowing Time Experiment 2015.Emerald2015.Emerald2015Base.paddock.Grey Vertosol NMM.NH4
              Solute Urea: same as Validation.Emerald Sowing Time Experiment 2015.Emerald2015.Emerald2015Base.paddock.Grey Vertosol NMM.NH4
            Report DailyReport: EventNames=[Clock].DoReport
              VariableNames:
                [Clock].Today
                [Clock].Today.DayOfYear
                [Weather].Rain
                [Weather].MeanT
                [Weather].MaxT
                [Weather].MinT
                [Weather].Radn
                [Weather].VPD
                [Cotton].DaysAfterSowing
                [Cotton].Arbitrator.DM.TotalPlantDemand
                [Cotton].Arbitrator.DM.TotalFixationSupply
                [Cotton].Arbitrator.TotalDMFixationSupply
                [Cotton].Arbitrator.N.TotalFixationSupply
                [Cotton].Arbitrator.N.TotalPlantDemand
                [Cotton].Arbitrator.N.TotalPlantSupply
                sum([Cotton].Arbitrator.N.Fixation) as NFixed
                [Cotton].NitrogenUptake
                [Cotton].Phenology.Stage
                [Cotton].Phenology.ThermalTime
                [Cotton].Phenology.CurrentStageName
                [Cotton].Phenology.Photoperiod
                [Cotton].Phenology.EmergenceDAS
                [Cotton].Phenology.SquaringDAS
                [Cotton].Phenology.FloweringDAS
                [Cotton].Phenology.CutoutDAS
                [Cotton].Phenology.OpenbollsDAS
                [Cotton].Phenology.MaturityDAS
                [Cotton].Phenology.GrowthRateScript.Script.AboveGroundYesterday
                [Cotton].Phenology.GrowthRateScript.Script.FruitYesterday
                [Cotton].Phenology.GrowthRate.CGR
                [Cotton].Phenology.GrowthRate.FGR
                [Cotton].AboveGround.Wt
                [Cotton].AboveGround.N
                [Cotton].AboveGroundLive.Wt
                [Cotton].Leaf.NodeNumber
                [Cotton].Leaf.Fw
                [Cotton].Leaf.Fn
                [Cotton].Leaf.Photosynthesis.FT
                [Cotton].Leaf.Photosynthesis.FVPD
                [Cotton].Leaf.LAI
                [Cotton].Leaf.HeightFunction
                [Cotton].Leaf.Height
                [Cotton].Leaf.CoverGreen
                [Cotton].Leaf.CoverTotal
                [Cotton].Leaf.Live.Wt
                [Cotton].Leaf.Live.StructuralWt
                [Cotton].Leaf.Live.MetabolicWt
                [Cotton].Leaf.Allocated.MetabolicWt
                [Cotton].Leaf.Allocated.StructuralWt
                [Cotton].Leaf.Dead.StructuralWt
                [Cotton].Leaf.Dead.MetabolicWt
                [Cotton].Leaf.Live.N
                [Cotton].Leaf.Live.NConc
                [Cotton].Leaf.Dead.Wt
                [Cotton].Leaf.Dead.N
                [Cotton].Leaf.Dead.NConc
                [Cotton].Leaf.RadiationIntercepted
                [Cotton].Leaf.Wt
                [Cotton].Leaf.Nconc
                [Cotton].Leaf.N
                [Cotton].Leaf.Senesced.Wt
                [Cotton].Leaf.BranchNumber
                [Cotton].Leaf.SpecificAreaCanopy
                [Cotton].Leaf.Sites
                [Cotton].Leaf.SpecificArea
                [Cotton].Leaf.CoverTotal
                [Cotton].Stem.Wt
                [Cotton].Stem.Total.StructuralWt
                [Cotton].Stem.Live.StructuralWt
                [Cotton].Stem.Live.StructuralN
                [Cotton].Stem.N
                [Cotton].Stem.Nconc
                [Cotton].Lint.Wt
                [Cotton].Lint.N
                [Cotton].Lint.Nconc
                [Cotton].Lint.Bales as Bales
                [Cotton].Boll.HarvestIndex
                [Cotton].Lint.Allocated.Wt
                [Cotton].Lint.DMDemand.Total
                [Cotton].Leaf.DMDemand.Total
                [Cotton].Bur.DMDemand.Total
                [Cotton].Stem.DMDemand.Total
                ([Cotton].Bur.DMDemand.Total+[Cotton].Lint.DMDemand.Total+[Cotton].Seed.DMDemand.Total) as BollDemand
                ([Cotton].Stem.DMDemand.Total+[Cotton].Leaf.DMDemand.Total) as VegetativeDemand
                ([Cotton].Stem.DMDemand.Total+[Cotton].Leaf.DMDemand.Total+[Cotton].Lint.DMDemand.Total+[Cotton].Seed.DMDemand.Total+[Cotton].Bur.DMDemand.Total) as ShootDMDemand
                [Cotton].Root.DMDemand.Total
                [Cotton].Lint.NDemand.Total
                [Cotton].Leaf.NDemand.Total
                [Cotton].Stem.NDemand.Total
                [Cotton].Root.NDemand.Total
                [Cotton].Root.NUptake
                [Cotton].Lint.LiveFWt
                [Cotton].Root.Wt
                [Cotton].Root.Depth
                [Soil].Water.Volumetric[1:3]
                [Soil].Water.Volumetric
                sum([Soil].SoilWater.ESW) as TotalESW
                [Soil].SoilWater.SW
                ([Soil].SoilWater.SWmm[1]+[Soil].SoilWater.SWmm[2]+[Soil].SoilWater.SWmm[3]+[Soil].SoilWater.SWmm[4]+[Soil].SoilWater.SWmm[5]+[Soil].SoilWater.SWmm[6]) as SWmm1800
                ([Soil].SoilWater.ESW[1]+[Soil].SoilWater.ESW[2]+[Soil].SoilWater.ESW[3]+[Soil].SoilWater.ESW[4]+[Soil].SoilWater.ESW[5]+[Soil].SoilWater.ESW[6]) as ESW1800
                sum([Soil].NO3.kgha) as TotalSoilNO3
                sum([Soil]..NH4.kgha) as TotalSoilNH4
                sum([Soil].Water.MM) as TotalSW
                sum([Soil].NO3.ppm) as NO3
                sum([Soil].NH4.ppm) as NH4
                sum([Soil].Water.Volumetric) as TotalSWC
                sum([Soil].Water.MM) as TotalWaterMM
                ([Soil].Water.MM[1]+[Soil].Water.MM[2]+[Soil].Water.MM[3]+[Soil].Water.MM[4]+[Soil].Water.MM[5]+[Soil].Water.MM[6]+[Soil].Water.MM[7]) as SW1500mm
                ([Soil].Water.MM[1]+[Soil].Water.MM[2]+[Soil].Water.MM[3]+[Soil].Water.MM[4]+[Soil].Water.MM[5]+[Soil].Water.MM[6]) as SW1800mm
                ([Soil].Water.MM[1]+[Soil].Water.MM[2]+[Soil].Water.MM[3]+[Soil].Water.MM[4]+[Soil].Water.MM[5]) as SW1200mm
                (sum([CottonSoil].PAWmm)/sum([CottonSoil].PAWCmm)) as AvailableSoilMoisture
                ([CottonSoil].PAWmm[1]+[CottonSoil].PAWmm[2]+[CottonSoil].PAWmm[3]+[CottonSoil].PAWmm[4]+[CottonSoil].PAWmm[5]) as PAWTop5Layers
                -(([CottonSoil].PAWCmm[1]+[CottonSoil].PAWCmm[2]+[CottonSoil].PAWCmm[3]+[CottonSoil].PAWCmm[4]+[CottonSoil].PAWCmm[5])-([CottonSoil].PAWmm[1]+[CottonSoil].PAWmm[2]+[CottonSoil].PAWmm[3]+[CottonSoil].PAWmm[4]+[CottonSoil].PAWmm[5])) as SoilWaterDeficit120
                [Irrigation].IrrigationApplied
                [Cotton].Boll.Wt
                [Cotton].Lint.Wt
                [Cotton].Seed.Wt
                [Cotton].Bur.Wt
                [Cotton].NitrogenUptake
                sum([Soil].SoilWater.SWmm) as TotalSWmm
                ([Soil].SoilWater.SWmm[1]) as SW1
                ([Soil].SoilWater.SWmm[2]) as SW2
                ([Soil].SoilWater.SWmm[3]) as SW3
                ([Soil].SoilWater.SWmm[4]) as SW4
                ([Soil].SoilWater.SWmm[5]) as SW5
                ([Soil].SoilWater.SWmm[6]) as SW6
                ([Soil].SoilWater.SWmm[1]+[Soil].SoilWater.SWmm[2]+[Soil].SoilWater.SWmm[3]+[Soil].SoilWater.SWmm[4]+[Soil].SoilWater.SWmm[5]+[Soil].SoilWater.SWmm[6]) as SWmm1800
                //to disable reporting
                ([Soil].SoilWater.SWmm[7]) as SW7
                ([Soil].SoilWater.SWmm[8]) as SW8
                ([Soil].SoilWater.SWmm[1]+[Soil].SoilWater.SWmm[2]+[Soil].SoilWater.SWmm[3]+[Soil].SoilWater.SWmm[4]+[Soil].SoilWater.SWmm[5]+[Soil].SoilWater.SWmm[6]+[Soil].SoilWater.SWmm[7]+[Soil].SoilWater.SWmm[8]) as SWmm2400
                [Soil].SoilWater.ESW[1] as ESW1
                [Soil].SoilWater.ESW[2] as ESW2
                [Soil].SoilWater.ESW[3] as ESW3
                [Soil].SoilWater.ESW[4] as ESW4
                [Soil].SoilWater.ESW[5] as ESW5
                [Soil].SoilWater.ESW[6] as ESW6
                [Soil].SoilWater.ESW[7] as ESW7
                [Soil].SoilWater.PAWmm[1] as PAW1
                [Cotton].Arbitrator.SDRatio
                [Cotton].Arbitrator.SDRatioBound
                [Soil].Physical.DULmm
                [Soil].Physical.LL15mm
                [Soil].SoilWater.SWmm
            Report HarvestReport: same as Validation.Emerald Sowing Time Experiment 2015.Emerald2015.Emerald2015Base.paddock.HarvestReport
            SurfaceOrganicMatter: InitialResidueName=nativepasture; InitialResidueType=nativepasture; InitialResidueMass=0; InitialStandingFraction=0; InitialCPR=0; InitialCNR=0
      Memo
        Should resemble an S-curve
    Folder Unreliable (disabled)
      Folder HRF20
        Simulation HRF20
          Memo Phenology stages Observed
            PHENOLOGY AND GROWTH NOT RELIABLE DUE TO MANAGEMENT ERRORS!!!!!

            Management (PIX) caused cutout to occur earlier; best to disregard simulation?!

            Stage|Date|DAS
            -|-|-
            Sowing|9 Jan 2020|0
            Emergence||
            Squaring|11 Feb 2020|33
            Flowering|28 Feb 2020|50
            Cutout|18 Mar 2020|69
            OpenBolls|20 Apr 2020|102
            Maturity|29 Apr 2020|111
            HarvestRipe|28 May 2020|140
          Memo
            check nitrogen stress and starting water content
          Clock: Start=2019-12-01; End=2020-08-16
          Summary summaryfile
          Weather: FileName=Weatherfiles/HD 2020.met
          SoilArbitrator Soil Arbitrator
          MicroClimate: a_interception=0; b_interception=1; c_interception=0; d_interception=0; SoilHeatFluxFraction=0.4; MinimumHeightDiffForNewLayer=0; NightInterceptionFraction=0.5; ReferenceHeight=2
          Zone paddock: Area=1; Slope=0; AspectAngle=0; Altitude=50
            Manager Sowing
              Crop = [Cotton]
              SowDate = 9-jan
              CultivarName = Sicot_746B3F
              SowingDepth = 40
              RowSpacing = 1000
              Population = 8.25
              script: same as in Validation.Narrabri Deficit Trial 2006.NAR0607.NAR0607Base.paddock.Sowing
            Fertiliser
            Operations FertiliserEvents
              2019-12-23  [Fertiliser].Apply(1.24, Fertiliser.Types.UreaN,10);
              2020-01-25  [Fertiliser].Apply(32.2, Fertiliser.Types.UreaN,10);
              2019-02-18  [Fertiliser].Apply(22.5, Fertiliser.Types.NH4NO3N,10);
              2019-03-03  [Fertiliser].Apply(33.8, Fertiliser.Types.UreaN,10);
            Irrigation
            Manager Harvesting: same as Validation.KRS19_irrigated.KRS19IRCvSicot_748B3F.paddock.Harvesting
            Soil Oollo_Howie_2020_187mm: SoilType=Sandy Loam; LocalName=HD20; Site=Chris Howie; NearestTown=Douglas Daly; Region=Douglas Daly; State=NT; Country=Australia; Latitude=0; Longitude=0; LocationAccuracy=Regional Soils; YearOfSampling=0; DataSource=Ian Bigs & Nick Hartly
              Comments=Modified from Tonks Camp Sandly Loam by S Yeates using local data
              Physical
                Thickness  BD    AirDry  LL15   DUL    SAT
                150        1.42  0.009   0.031  0.157  0.434
                150        1.71  0.011   0.047  0.177  0.35
                300        1.56  0.03    0.061  0.138  0.381
                300        1.6   0.027   0.06   0.151  0.368
                300        1.56  0.026   0.053  0.159  0.38
                600        1.56  0.055   0.055  0.159  0.38
                400        1.67  0.054   0.054  0.149  0.339
                300        1.67  0.054   0.054  0.149  0.339
                SoilCrop CottonSoil: LL=[0.091, 0.081, 0.081, 0.071, 0.053, 0.055, 0.08, 0.147]; KL=[0.06, 0.06, 0.04, 0.04, 0.02, 0.02, 0.01, 0.01]; XF=[1, 1, 1, 1, 1, 1, 1, 1]
              WaterBalance SoilWater: SummerDate=1-Sep; SummerU=6; SummerCona=3.5; WinterDate=1-jun; WinterU=4; WinterCona=3; DiffusConst=88; DiffusSlope=35.4; Salb=0.13; CN2Bare=80; CNRed=20; CNCov=0.8; PSIDul=-100; Thickness=[150, 150, 300, 300, 300, 300, 300]; SWCON=[0.9, 0.7, 0.7, 0.5, 0.4, 0.4, 0.4]
              Organic: FOMCNRatio=40; CarbonUnits=Total
                Thickness  Carbon  SoilCNRatio  FBiom  FInert  FOM
                150        0.41    13           0.04   0.3     347.129
                150        0.27    13           0.03   0.3     270.344
              CERESSoilTemperature Temperature
              Chemical: Thickness=[150, 150, 300, 300, 300, 300, 300, 300, 300, 300, 300]; PH=[7.14, 6.5, 7.11, 7.45, 7.63, 7.76, 7.83, -, -, -, -]; PHUnits=Water
                PH source: Unknown source or quality of data (layer 1, 2, 3, 4, 5, 6, 7)
              Nutrient
              Water: Thickness=[150, 150, 300, 300, 300, 600, 400, 300]; InitialValues=[0.157, 0.177, 0.099, 0.06, 0.053, 0.055, 0.054, 0.054]; InitialPAWmm=49.8; RelativeTo=LL15; FilledFromTop=true
              Solute NO3: Thickness=[150, 150, 300, 300, 300]; InitialValues=[4, 3, 6, 1, 1]; InitialValuesUnits=ppm; WaterTableConcentration=0; D0=0; DepthConstant=0; MaxDepthSoluteAccessible=0; RunoffEffectivenessAtMovingSolute=0; MaxEffectiveRunoff=0
              Solute NH4: Thickness=[150, 150, 300, 300, 300]; InitialValues=[14, 20, 21, 21, 22]; InitialValuesUnits=ppm; WaterTableConcentration=0; D0=0; DepthConstant=0; MaxDepthSoluteAccessible=0; RunoffEffectivenessAtMovingSolute=0; MaxEffectiveRunoff=0
              Solute Urea: Thickness=[1800]; InitialValues=[0]; InitialValuesUnits=ppm; WaterTableConcentration=0; D0=0; DepthConstant=0; MaxDepthSoluteAccessible=0; RunoffEffectivenessAtMovingSolute=0; MaxEffectiveRunoff=0
            SurfaceOrganicMatter: InitialResidueName=Jarra grass; InitialResidueType=grass; InitialResidueMass=7327; InitialStandingFraction=0.6; InitialCPR=0; InitialCNR=30.9
            Plant Cotton: PlantType=Cotton
            Report DailyReport: same as Validation.KRS19_irrigated.KRS19IRCvSicot_748B3F.paddock.DailyReport
            Report HarvestReport: EventNames=[Cotton].Harvesting
              VariableNames:
                [Clock].Today
                [Cotton].Structure.MainStemPrimordiaNo
                [Cotton].Phenology.NFF
                [Cotton].Script.FinalTag
        Memo
          Add branches to observed data --> I have this data!
        Memo
          Should resemble an S-curve
      Folder KRS19_rainfed
        Simulation KRS19RFRS1000CvSicot_748B3F
          Memo
            Planting density (plants/m2):

            714/1000 - 9.5;
            714/2000 - 10.0;
            714/3000 - 8.5;
            748/1000 - 12.0;
            748/2000 - 8.5;
            748/3000 - 9.5

            Average: 9.7

            Cultivars:

            714 - Buchanan;
            748 - Davis
          Memo Phenology stages Observed
            Stage|Date|DAS
            -|-|-
            Sowing|12 Jan 2019|0
            Emergence||
            Squaring|7 Feb 2019|26
            Flowering|21 Feb 2019|
            Cutout||
            OpenBolls||
            Maturity||
            Defoliation||
            HarvestRipe|27 May 2019|135
          Clock: Start=2018-10-15; End=2019-08-31
          Summary summaryfile
          Weather: FileName=Weatherfiles/KRSRF1819.met
          SoilArbitrator Soil Arbitrator
          MicroClimate: a_interception=0; b_interception=1; c_interception=0; d_interception=0; SoilHeatFluxFraction=0.4; MinimumHeightDiffForNewLayer=0; NightInterceptionFraction=0.5; ReferenceHeight=2
          Zone paddock: Area=1; Slope=0; AspectAngle=0; Altitude=50
            Manager Sowing
              Crop = [Cotton]
              SowDate = 12-jan
              CultivarName = Sicot_748B3F
              SowingDepth = 40
              RowSpacing = 1000
              Population = 12
              script: same as in Validation.Narrabri Deficit Trial 2006.NAR0607.NAR0607Base.paddock.Sowing
            Fertiliser
            Operations FertiliserEvents
              2019-01-12  [Fertiliser].Apply(44, Fertiliser.Types.NH4NO3N,10);
              2019-02-09  [Fertiliser].Apply(46, Fertiliser.Types.UreaN,10);
              2019-03-04  [Fertiliser].Apply(0.1, Fertiliser.Types.UreaN,10);
            Irrigation
            Manager Harvesting: same as Validation.KRS19_irrigated.KRS19IRCvSicot_748B3F.paddock.Harvesting
            Soil Tippera clay loam: SoilType=Clay Loam, Red Earth, Alfisol - Katherine (PAWC = 83mm); LocalName=Tippera; NearestTown=Katherine; State=NT; YearOfSampling=0; DataSource=Perry Poulton from FS48 W2 and FS48.N2 files
              Physical: same as Validation.KRS19_irrigated.KRS19IRCvSicot_748B3F.paddock.Tippera clay loam.Physical
              WaterBalance SoilWater: same as Validation.KRS19_irrigated.KRS19IRCvSicot_748B3F.paddock.Tippera clay loam.SoilWater
              Organic: same as Validation.KRS19_irrigated.KRS19IRCvSicot_748B3F.paddock.Tippera clay loam.Organic
              CERESSoilTemperature Temperature
              Chemical: same as Validation.KRS19_irrigated.KRS19IRCvSicot_748B3F.paddock.Tippera clay loam.Chemical
              Nutrient
              Water: Thickness=[50, 100, 150, 300, 300, 300, 300, 300]; InitialValues=[0.186, 0.196, 0.215, 0.231, 0.237, 0.282, 0.301, 0.306]; InitialPAWmm=0; RelativeTo=LL15; FilledFromTop=true
              Solute NO3: Thickness=[50, 200, 300, 300]; InitialValues=[12, 6.8, 2.4, 4.3]; InitialValuesUnits=ppm; WaterTableConcentration=0; D0=0; DepthConstant=0; MaxDepthSoluteAccessible=0; RunoffEffectivenessAtMovingSolute=0; MaxEffectiveRunoff=0
              Solute NH4: Thickness=[50, 200, 300, 300]; InitialValues=[2, 2, 1.2, 1.5]; InitialValuesUnits=ppm; WaterTableConcentration=0; D0=0; DepthConstant=0; MaxDepthSoluteAccessible=0; RunoffEffectivenessAtMovingSolute=0; MaxEffectiveRunoff=0
              Solute Urea: Thickness=[1800]; InitialValues=[0]; InitialValuesUnits=ppm; WaterTableConcentration=0; D0=0; DepthConstant=0; MaxDepthSoluteAccessible=0; RunoffEffectivenessAtMovingSolute=0; MaxEffectiveRunoff=0
            SurfaceOrganicMatter: InitialResidueName=Sorghum; InitialResidueType=sorghum; InitialResidueMass=0; InitialStandingFraction=0; InitialCPR=0; InitialCNR=0
            Plant Cotton: PlantType=Cotton
            Report DailyReport: same as Validation.KRS19_irrigated.KRS19IRCvSicot_748B3F.paddock.DailyReport
            Report HarvestReport: EventNames=[Cotton].Harvesting
              VariableNames:
                [Clock].Today
                [Cotton].Structure.MainStemPrimordiaNo
                [Cotton].Phenology.NFF
                [Cotton].Script.FinalTag
        Memo
          Should resemble an S-curve
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