Simulations: Version=181
  Memo TitlePage
    # APSIM MicroClimate Model
  Folder Replacements
    Soil WURSoil: SoilType=Sand; Latitude=-27.581836; Longitude=151.320206
      Physical
        Thickness  BD   AirDry  LL15  DUL   SAT   KS
        150        1.4  0.05    0.1   0.25  0.35  100
        150        1.4  0.05    0.1   0.25  0.35  100
        300        1.4  0.05    0.1   0.25  0.35  100
        300        1.4  0.05    0.1   0.2   0.3   100
        300        1.4  0.05    0.1   0.2   0.3   100
        300        1.4  0.05    0.1   0.2   0.3   100
        300        1.4  0.05    0.1   0.2   0.3   100
        SoilCrop WheatSoil: LL=[0.1, 0.1, 0.1, 0.1, 0.1, 0.1, 0.1]; KL=[0.06, 0.06, 0.06, 0.04, 0.04, 0.04, 0.04]; XF=[1, 1, 1, 1, 1, 1, 1]
        SoilCrop MaizeSoil: LL=[0.1, 0.1, 0.1, 0.1, 0.1, 0.1, 0.1]; KL=[0.06, 0.06, 0.06, 0.04, 0.04, 0.04, 0.04]; XF=[1, 1, 1, 1, 1, 1, 1]
      WaterBalance SoilWater: SummerDate=1-Mar; SummerU=2; SummerCona=2; WinterDate=1-Nov; WinterU=2; WinterCona=2; DiffusConst=40; DiffusSlope=16; Salb=0.18; CN2Bare=65; CNRed=20; CNCov=0.8; PSIDul=-100; Thickness=[150, 150, 300, 300, 300, 300, 300]; SWCON=[0.3, 0.3, 0.3, 0.3, 0.3, 0.3, 0.3]
      Organic: FOMCNRatio=40; CarbonUnits=Total
        Thickness  Carbon  SoilCNRatio  FBiom  FInert  FOM
        150        3       14           0.04   0.4     347.129
        150        0.96    14           0.02   0.6     270.344
        300        0.6     14           0.02   0.8     163.972
        300        0.3     14           0.02   1       99.4541
        300        0.18    14           0.01   1       60.322
        300        0.12    14           0.01   1       36.5871
        300        0.12    14           0.01   1       22.1912
      Chemical: Thickness=[150, 150, 300, 300, 300, 300, 300]; PH=[8, 8, 8, 8, 8, 8, 8]; PHUnits=Water
      Water: Thickness=[150, 150, 300, 300, 300, 300, 300]; InitialValues=[0.25, 0.25, 0.25, 0.2, 0.2, 0.2, 0.2]; InitialPAWmm=210; RelativeTo=LL15; FilledFromTop=false
      CERESSoilTemperature Temperature
      Nutrient
      Solute NO3: Thickness=[150, 150, 300, 300, 300, 300, 300]; InitialValues=[10, 1, 1, 1, 1, 1, 1]; InitialValuesUnits=ppm; WaterTableConcentration=0; D0=0; DepthConstant=0; MaxDepthSoluteAccessible=0; RunoffEffectivenessAtMovingSolute=0; MaxEffectiveRunoff=0
      Solute NH4: Thickness=[150, 150, 300, 300, 300, 300, 300]; InitialValues=[0.1, 0.1, 0.1, 0.1, 0.1, 0.1, 0.1]; InitialValuesUnits=ppm; WaterTableConcentration=0; D0=0; DepthConstant=0; MaxDepthSoluteAccessible=0; RunoffEffectivenessAtMovingSolute=0; MaxEffectiveRunoff=0
      Solute Urea: Thickness=[150, 150, 300, 300, 300, 300, 300]; InitialValues=[0, 0, 0, 0, 0, 0, 0]; InitialValuesUnits=kg/ha; WaterTableConcentration=0; D0=0; DepthConstant=0; MaxDepthSoluteAccessible=0; RunoffEffectivenessAtMovingSolute=0; MaxEffectiveRunoff=0
    Report WURReport: EventNames=[Clock].DoReport
      VariableNames:
        [Clock].Today
        [Maize].Phenology.Photoperiod
        [Maize].Phenology.CurrentStageName
        [Maize].AboveGround.Wt
        [Maize].AboveGround.N
        [Maize].EarLive.Wt
        [Maize].Grain.Wt
        [Maize].Grain.Size
        [Maize].Grain.NumberFunction
        [Maize].Grain.N
        [Maize].Leaf.LAI
        [Maize].Leaf.Fw
        [Maize].Leaf.Fn
        [Maize].Leaf.Transpiration
        [Maize].Leaf.CoverTotal
        [Maize].Leaf.Photosynthesis
        [Maize].Leaf.RadiationIntercepted
        [Maize].Structure.LeafTipsAppeared
        [Maize].Leaf.ExpandedCohortNo
        [Maize].Structure.Height
        [Maize].Total.Wt
        sum([Soil].Water.MM) as SWTot
        [Wheat].Phenology.Zadok.Stage
        [Wheat].Phenology.CurrentStageName
        [Wheat].AboveGround.Wt
        [Wheat].AboveGround.N
        [Wheat].Ear.Wt
        [Wheat].Grain.Total.Wt*10 as Yield
        [Wheat].Grain.Protein
        [Wheat].Grain.Size
        [Wheat].Grain.Number
        [Wheat].Grain.Total.Wt
        [Wheat].Grain.Total.N
        [Wheat].Leaf.LAI
        [Wheat].Total.Wt
        [Wheat].Leaf.Fw
        [Wheat].Leaf.Fn
        [Wheat].Root.Depth
        [Wheat].Leaf.Transpiration
        [Wheat].Leaf.CoverTotal
        [Wheat].Leaf.Tips
        [Wheat].Leaf.Ligules
        [Wheat].Leaf.Height
        [Soil].SoilWater.Drainage
  DataStore
    ExcelInput Observed: FileNames=[Observed.xlsx]; SheetNames=[Observed, ObservedOld]
    PredictedObserved: PredictedTableName=Report; ObservedTableName=Observed; FieldNameUsedForMatch=SimulationName; FieldName2UsedForMatch=Clock.Today; AllColumns=false
  Folder ScopingTest
    Simulation MicrometInFields
      Clock: Start=1900-01-01; End=1900-12-31
      Summary SummaryFile
      Weather: FileName=%root%/Examples/WeatherFiles/AU_Dalby.met
      Zone Field1: Area=1; Slope=0; AspectAngle=0; Altitude=50
        Report: EventNames=[Clock].DoReport
          VariableNames:
            [Clock].Today
            [Wheat].Leaf.Transpiration
        Fertiliser
        Soil: ASCOrder=Vertosol; ASCSubOrder=Black; SoilType=Clay; Site=Norwin; NearestTown=Norwin; Region=Darling Downs and Granite Belt; State=Queensland; Country=Australia; NaturalVegetation=Qld. Bluegrass, possible Qld. Blue gum; ApsoilNumber=900; Latitude=-27.581836; Longitude=151.320206; LocationAccuracy=+/- 20m
          DataSource=CSIRO Sustainable Ecosystems, Toowoomba; Characteriesd as part of the GRDC funded project"Doing it better, doing it smarter, managing soil water in Australian agriculture' 2011
          Comments=OC, CLL for all crops estimated-based on Bongeen Mywybilla Soil No1
          Physical
            Thickness  BD       AirDry    LL15      DUL       SAT       KS
            150        1.01056  0.13025   0.2605    0.521     0.588655  20
            150        1.07146  0.198689  0.248362  0.496723  0.565677  20
            300        1.09394  0.28      0.28      0.488438  0.557193  20
            300        1.15861  0.28      0.28      0.480297  0.532787  20
            300        1.17301  0.28      0.28      0.471584  0.527354  20
            300        1.16287  0.28      0.28      0.457071  0.53118   20
            300        1.1875   0.28      0.28      0.452332  0.521888  20
            SoilCrop WheatSoil: LL=[0.261, 0.248, 0.28, 0.306, 0.36, 0.392, 0.446]; KL=[0.06, 0.06, 0.06, 0.04, 0.04, 0.02, 0.01]; XF=[1, 1, 1, 1, 1, 1, 1]
          WaterBalance SoilWater: SummerDate=1-Nov; SummerU=5; SummerCona=5; WinterDate=1-Apr; WinterU=5; WinterCona=5; DiffusConst=40; DiffusSlope=16; Salb=0.12; CN2Bare=73; CNRed=20; CNCov=0.8; PSIDul=-100; Thickness=[150, 150, 300, 300, 300, 300, 300]; SWCON=[0.3, 0.3, 0.3, 0.3, 0.3, 0.3, 0.3]
          Organic: FOMCNRatio=40; CarbonUnits=Total
            Thickness  Carbon  SoilCNRatio  FBiom  FInert  FOM
            150        1.2     12           0.04   0.4     347.129
            150        0.96    12           0.02   0.6     270.344
            300        0.6     12           0.02   0.8     163.972
            300        0.3     12           0.02   1       99.4541
            300        0.18    12           0.01   1       60.322
            300        0.12    12           0.01   1       36.5871
            300        0.12    12           0.01   1       22.1912
          Chemical: Thickness=[150, 150, 300, 300, 300, 300, 300]; PH=[8, 8, 8, 8, 8, 8, 8]; PHUnits=Water
          Water: Thickness=[150, 150, 300, 300, 300, 300, 300]; InitialPAWmm=361.245; RelativeTo=LL15; FilledFromTop=false
            InitialValues=[0.521, 0.496723, 0.488438, 0.480297, 0.471584, 0.457071, 0.452332]
          CERESSoilTemperature Temperature
          Nutrient
          Solute NO3: Thickness=[150, 150, 300, 300, 300, 300, 300]; InitialValues=[1, 1, 1, 1, 1, 1, 1]; InitialValuesUnits=ppm; WaterTableConcentration=0; D0=0; DepthConstant=0; MaxDepthSoluteAccessible=0; RunoffEffectivenessAtMovingSolute=0; MaxEffectiveRunoff=0
          Solute NH4: same as Replacements.WURSoil.NH4
          Solute Urea: same as Replacements.WURSoil.Urea
        SurfaceOrganicMatter: InitialResidueName=wheat_stubble; InitialResidueType=wheat; InitialResidueMass=500; InitialStandingFraction=0; InitialCPR=0; InitialCNR=100
        Plant Wheat
        MicroClimate: a_interception=0; b_interception=1; c_interception=0; d_interception=0; SoilHeatFluxFraction=0.4; MinimumHeightDiffForNewLayer=0; NightInterceptionFraction=0.5; ReferenceHeight=2
        Manager SowingFertiliser
          Amount = 20
          CropName = wheat
```csharp
using Models.Soils;
using System;
using Models.Core;
using Models.PMF;
namespace Models
{
    [Serializable]
    public class Script : Model
    {
        [Link] Clock Clock;
        [Link] Fertiliser Fertiliser;
        [Link] Summary Summary;
        
        
        [Description("Amount of fertiliser to be applied (kg/ha)")]
        public double Amount { get; set; }
        
        [Description("Crop to be fertilised")]
        public string CropName { get; set; }
        
        
        

        [EventSubscribe("Sowing")]
        private void OnSowing(object sender, EventArgs e)
        {
            Model crop = sender as Model;
            if (crop.Name.ToLower() == CropName.ToLower())
                Fertiliser.Apply(Amount: Amount, Type: Fertiliser.Types.NO3N);
        }
        
    }
}
```
        Manager SowingRule
          StartDate = 1-may
          EndDate = 10-jul
          MinESW = 100
          MinRain = 25
          RainDays = 7
          CultivarName = Hartog
          SowingDepth = 30
          RowSpacing = 250
          Population = 120
```csharp
using Models.Interfaces;
using System;
using Models.Core;
using Models.PMF;
using Models.Soils;
using Models.Soils.Nutrients;
using Models.Utilities;
using APSIM.Shared.Utilities;
using Models.Climate;

namespace Models
{
    [Serializable]
    public class Script : Model
    {
        [Link] private Clock Clock;
        [Link] private Fertiliser Fertiliser;
        [Link] private Summary Summary;
        [Link] private Plant Wheat;
        [Link] private Soil Soil;
        private Accumulator accumulatedRain;
        [Link]
        private ISoilWater waterBalance;
        
        [Description("Start of sowing window (d-mmm)")]
        public string StartDate { get; set;}
        [Description("End of sowing window (d-mmm)")]
        public string EndDate { get; set;}
        [Description("Minimum extractable soil water for sowing (mm)")]
        public double MinESW { get; set;}
        [Description("Accumulated rainfall required for sowing (mm)")]
        public double MinRain { get; set;}
        [Description("Duration of rainfall accumulation (d)")]
        public int RainDays { get; set;}
        [Description("Cultivar to be sown")]
        public string CultivarName { get; set;}
        [Description("Sowing depth (mm)")]
        public double SowingDepth { get; set;}        
        [Description("Row spacing (mm)")]
        public double RowSpacing { get; set;}    
        [Description("Plant population (/m2)")]
        public double Population { get; set;}    
        
        
        [EventSubscribe("StartOfSimulation")]
        private void OnSimulationCommencing(object sender, EventArgs e)
        {
            accumulatedRain = new Accumulator(this, "[Weather].Rain", RainDays);
        }
        

        [EventSubscribe("DoManagement")]
        private void OnDoManagement(object sender, EventArgs e)
        {
            accumulatedRain.Update();
            
            if (DateUtilities.WithinDates(StartDate,Clock.Today,EndDate) &&
                !Wheat.IsAlive &&
                MathUtilities.Sum(waterBalance.ESW) > MinESW &&
                accumulatedRain.Sum > MinRain)
            {
               Wheat.Sow(population:Population, cultivar:CultivarName, depth:SowingDepth, rowSpacing:RowSpacing);    
            }
        
        }
        
    }
}
```
      Zone Field2: same as ScopingTest.MicrometInFields.Field1
      Zone Field3: Area=1; Slope=0; AspectAngle=0; Altitude=50
        Report: EventNames=[Clock].DoReport
          VariableNames:
            [Clock].Today
            [Wheat].Leaf.Transpiration
        Fertiliser
        Soil: same as ScopingTest.MicrometInFields.Field1.Soil
        SurfaceOrganicMatter: InitialResidueName=wheat_stubble; InitialResidueType=wheat; InitialResidueMass=500; InitialStandingFraction=0; InitialCPR=0; InitialCNR=100
        Plant Wheat
        MicroClimate: a_interception=0; b_interception=1; c_interception=0; d_interception=0; SoilHeatFluxFraction=0.4; MinimumHeightDiffForNewLayer=0; NightInterceptionFraction=0.5; ReferenceHeight=2
        Manager SowingFertiliser
          Amount = 300
          CropName = wheat
          script: same as in ScopingTest.MicrometInFields.Field1.SowingFertiliser
        Manager SowingRule: same as ScopingTest.MicrometInFields.Field1.SowingRule
      SoilArbitrator
    Simulation MicrometTopLevel
      Clock: Start=1900-01-01; End=1900-12-31
      Summary SummaryFile
      Weather: FileName=%root%/Examples/WeatherFiles/AU_Dalby.met
      MicroClimate: a_interception=0; b_interception=1; c_interception=0; d_interception=0; SoilHeatFluxFraction=0.4; MinimumHeightDiffForNewLayer=0; NightInterceptionFraction=0.5; ReferenceHeight=2
      Zone Field1: Area=1; Slope=0; AspectAngle=0; Altitude=50
        Report: EventNames=[Clock].DoReport
          VariableNames:
            [Clock].Today
            [Wheat].Leaf.Transpiration
        Fertiliser
        Soil: same as ScopingTest.MicrometInFields.Field1.Soil
        SurfaceOrganicMatter: InitialResidueName=wheat_stubble; InitialResidueType=wheat; InitialResidueMass=500; InitialStandingFraction=0; InitialCPR=0; InitialCNR=100
        Plant Wheat
        Manager SowingFertiliser: same as ScopingTest.MicrometInFields.Field1.SowingFertiliser
        Manager SowingRule: same as ScopingTest.MicrometInFields.Field1.SowingRule
        MicroClimate: a_interception=0; b_interception=1; c_interception=0; d_interception=0; SoilHeatFluxFraction=0.4; MinimumHeightDiffForNewLayer=0; NightInterceptionFraction=0.5; ReferenceHeight=2
      Zone Field2: Area=1; Slope=0; AspectAngle=0; Altitude=50
        Report: EventNames=[Clock].DoReport
          VariableNames:
            [Clock].Today
            [Wheat].Leaf.Transpiration
        Fertiliser
        Soil: same as ScopingTest.MicrometInFields.Field1.Soil
        SurfaceOrganicMatter: InitialResidueName=wheat_stubble; InitialResidueType=wheat; InitialResidueMass=500; InitialStandingFraction=0; InitialCPR=0; InitialCNR=100
        Plant Wheat
        Manager SowingFertiliser: same as ScopingTest.MicrometInFields.Field1.SowingFertiliser
        Manager SowingRule: same as ScopingTest.MicrometInFields.Field1.SowingRule
      Zone Field3: Area=1; Slope=0; AspectAngle=0; Altitude=50
        Report: EventNames=[Clock].DoReport
          VariableNames:
            [Clock].Today
            [Wheat].Leaf.Transpiration
        Fertiliser
        Soil: same as ScopingTest.MicrometInFields.Field1.Soil
        SurfaceOrganicMatter: InitialResidueName=wheat_stubble; InitialResidueType=wheat; InitialResidueMass=500; InitialStandingFraction=0; InitialCPR=0; InitialCNR=100
        Plant Wheat
        Manager SowingFertiliser: same as ScopingTest.MicrometInFields.Field3.SowingFertiliser
        Manager SowingRule: same as ScopingTest.MicrometInFields.Field1.SowingRule
      SoilArbitrator
  Folder WageningenStripCrop
    Experiment WUR2013
      Factors
        Factor Treatment
          CompositeFactor SoleCrop
            Specifications:
              [WheatZone].Width=100
              [MaizeZone].Width=100
              [SetupMaizeRootZones].Script.UseExtraZone=false
              [SetupWheatRootZones].Script.UseExtraZone=false
          CompositeFactor 60WM
            Specifications:
              [WheatZone].Width=0.75
              [MaizeZone].Width=1.50
              [SowMaize].Script.SowDate=1-Jan
          CompositeFactor 02WM
            Specifications:
              [WheatZone].Width=0.75
              [MaizeZone].Width=1.50
              [SowWheat].Script.SowDate=1-Jan
          CompositeFactor 62WM
            Specifications:
              [WheatZone].Width=0.75
              [MaizeZone].Width=1.50
      Simulation WUR2013BaseSimulation
        Clock: Start=2013-03-01; End=2013-12-31
        Summary SummaryFile
        Weather: FileName=Volkel.met
        MicroClimate: a_interception=0; b_interception=1; c_interception=0; d_interception=0; SoilHeatFluxFraction=0.4; MinimumHeightDiffForNewLayer=0; NightInterceptionFraction=0.5; ReferenceHeight=2
        SoilArbitrator Soil Arbitrator
        RectangularZone WheatZone: Length=1; Width=100; Slope=0; AspectAngle=0; Altitude=50
          Report: EventNames=[Clock].DoReport
            VariableNames:
              [Clock].Today
              [Wheat].Phenology.Zadok.Stage
              [Wheat].Phenology.CurrentStageName
              [Wheat].AboveGround.Wt
              [Wheat].AboveGround.N
              [Wheat].Grain.Wt
              [Wheat].Grain.Total.N
              [Wheat].Grain.Size
              [Wheat].Grain.Number
              [Wheat].Ear.Wt
              [Wheat].Leaf.Fw
              [Wheat].Leaf.Fn
              [Wheat].Leaf.Tips
              [Wheat].Leaf.Ligules
              [Wheat].Leaf.Height
              [Wheat].Leaf.LAI
              [Wheat].Leaf.CoverTotal
              [Wheat].Total.Wt
              sum([Soil].Water.MM) as SWTot
          Fertiliser
          SurfaceOrganicMatter: InitialResidueName=wheat_stubble; InitialResidueType=wheat; InitialResidueMass=500; InitialStandingFraction=0; InitialCPR=0; InitialCNR=100
          Soil WURSoil: ASCOrder=Vertosol; ASCSubOrder=Black; SoilType=Clay; Site=Norwin; NearestTown=Norwin; Region=Darling Downs and Granite Belt; State=Queensland; Country=Australia; NaturalVegetation=Qld. Bluegrass, possible Qld. Blue gum; ApsoilNumber=900; Latitude=-27.581836; Longitude=151.320206; LocationAccuracy=+/- 20m
            DataSource=CSIRO Sustainable Ecosystems, Toowoomba; Characteriesd as part of the GRDC funded project"Doing it better, doing it smarter, managing soil water in Australian agriculture' 2011
            Comments=OC, CLL for all crops estimated-based on Bongeen Mywybilla Soil No1
            Physical
              Thickness  BD   AirDry  LL15  DUL  SAT  KS
              150        1.4  0.05    0.1   0.2  0.3  100
              150        1.4  0.05    0.1   0.2  0.3  100
              300        1.4  0.05    0.1   0.2  0.3  100
              300        1.4  0.05    0.1   0.2  0.3  100
              300        1.4  0.05    0.1   0.2  0.3  100
              300        1.4  0.05    0.1   0.2  0.3  100
              300        1.4  0.05    0.1   0.2  0.3  100
              SoilCrop WheatSoil: LL=[0.1, 0.1, 0.1, 0.1, 0.1, 0.1, 0.1]; KL=[0.06, 0.06, 0.06, 0.04, 0.04, 0.02, 0.01]; XF=[1, 1, 1, 1, 1, 1, 1]
              SoilCrop MaizeSoil: LL=[0.1, 0.1, 0.1, 0.1, 0.1, 0.1, 0.1]; KL=[0.06, 0.06, 0.06, 0.04, 0.04, 0.02, 0.01]; XF=[1, 1, 1, 1, 1, 1, 1]
            WaterBalance SoilWater: SummerDate=1-Apr; SummerU=6; SummerCona=3.5; WinterDate=1-Nov; WinterU=2; WinterCona=2; DiffusConst=40; DiffusSlope=16; Salb=0.12; CN2Bare=70; CNRed=20; CNCov=0.8; PSIDul=-100; Thickness=[150, 150, 300, 300, 300, 300, 300]; SWCON=[0.3, 0.3, 0.3, 0.3, 0.3, 0.3, 0.3]
            Organic: same as Replacements.WURSoil.Organic
            Chemical: Thickness=[150, 150, 300, 300, 300, 300, 300]; PH=[8, 8, 8, 8, 8, 8, 8]; PHUnits=Water
            Water: Thickness=[150, 150, 300, 300, 300, 300, 300]; InitialValues=[0.2, 0.2, 0.2, 0.2, 0.2, 0.2, 0.2]; InitialPAWmm=180; RelativeTo=LL15; FilledFromTop=false
            CERESSoilTemperature Temperature
            Nutrient
            Solute NO3: same as ScopingTest.MicrometInFields.Field1.Soil.NO3
            Solute NH4: same as Replacements.WURSoil.NH4
            Solute Urea: same as Replacements.WURSoil.Urea
          Operations
            // 2013-03-21  [Wheat].Sow(population: 250, cultivar: Tybalt, depth: 30, rowSpacing: 125);
            2013-03-21  [Irrigation].Apply(amount: 15);
            2013-04-19  [Fertiliser].Apply(Amount: 57, Type: Fertiliser.Types.NO3N);
            2013-05-30  [Fertiliser].Apply(Amount: 75, Type: Fertiliser.Types.NO3N);
            2013-06-18  [Fertiliser].Apply(Amount: 27, Type: Fertiliser.Types.NO3N);
            // 2013-08-20  [Wheat].Harvest();
            // 2013-08-20  [Wheat].EndCrop();
            2013-07-12  [Irrigation].Apply(amount: 15);
            2013-07-19  [Irrigation].Apply(amount: 15);
            2013-07-22  [Irrigation].Apply(amount: 15);
            2013-07-26  [Irrigation].Apply(amount: 15);
            2013-09-06  [Irrigation].Apply(amount: 15);
            2013-07-01  [Irrigation].Apply(amount: 50);
          Plant Wheat
          Irrigation
          Manager SetupWheatRootZones
            UseExtraZone = True
```csharp
using Models.Soils;
using Models.Functions;
using APSIM.Shared.Utilities;
using System.Xml.Serialization;
using Models;
using Models.PMF;
using System.Text;
using System.Collections.Generic;
using Models.Core;
using System;
using Models.PMF.Organs;

namespace Models
{
    [Serializable] 
    public class Script : Model
    {
        [Link] private Plant Wheat;
        [Link] private Clock Clock;
        [Link] private Zone zone;
        [Link(Type = LinkType.Path, Path = "[Wheat].Root")]
        private Root root;

        [Description("Use extra root zone")]
        public bool UseExtraZone { get; set; }

        
        [EventSubscribe("StartOfSimulation")]
        private void OnSimulationCommencing(object sender, EventArgs e)
        {
            if (UseExtraZone)
            {
            root.ZoneNamesToGrowRootsIn.Add("MaizeZone");
            root.ZoneRootDepths.Add(50);
NutrientPoolFunctions InitialDM = new NutrientPoolFunctions();
Constant InitStruct = new Constant();
InitStruct.FixedValue = 10;
InitialDM.Structural = InitStruct;
Constant InitMetab = new Constant();
InitMetab.FixedValue = 0;
InitialDM.Metabolic = InitMetab;
Constant InitStor = new Constant();
InitStor.FixedValue = 0;
InitialDM.Storage = InitStor;
            root.ZoneInitialDM.Add(InitialDM);

            }
        }
    }
}
```
          Manager SowWheat
            SowDate = 21-Mar
            CultivarName = Tybalt
            SowingDepth = 30
            RowSpacing = 125
            Population = 250
```csharp
using Models.Soils.Nutrients;
using System;
using Models.Core;
using Models.PMF;
using Models.Soils;
using Models.Soils.Nutrients;
using Models.Utilities;
using APSIM.Shared.Utilities;

namespace Models
{
    [Serializable]
    public class Script : Model
    {
        [Link] Clock Clock;
        [Link] Fertiliser Fertiliser;
        [Link] Summary Summary;
        [Link] Soil Soil;
        [Link] Plant Wheat;
        Accumulator accumulatedRain;
        
        [Description("Sowing date (d-mmm)")]
        public string SowDate { get; set; }
    
        [Description("Cultivar to be sown")]
        public string CultivarName { get; set; }
        [Description("Sowing depth (mm)")]
        public double SowingDepth { get; set; }
        [Description("Row spacing (mm)")]
        public double RowSpacing { get; set; }
        [Description("Plant population (/m2)")]
        public double Population { get; set; }
        


        [EventSubscribe("DoManagement")]
        private void OnDoManagement(object sender, EventArgs e)
        {
            if (DateUtilities.WithinDates(SowDate, Clock.Today, SowDate))
            {
                Wheat.Sow(population: Population, cultivar: CultivarName, depth: SowingDepth, rowSpacing: RowSpacing);    
            }
        
        }
        
    }
}
```
          Manager Harvesting
```csharp
using Models.Soils.Nutrients;
using System;
using Models.Core;
using Models.PMF;
using Models.Soils;
using Models.Soils.Nutrients;
using Models.Utilities;
using APSIM.Shared.Utilities;

namespace Models
{
    [Serializable] 
    public class Script : Model
    {
        [Link] Plant Wheat { get; set; }
        
        [EventSubscribe("DoManagement")]
        private void OnDoManagement(object sender, EventArgs e)
        {
            if (Wheat.IsReadyForHarvesting)
            {
                Wheat.Harvest();
                Wheat.EndCrop();
            }
        }
    }
}
```
        RectangularZone MaizeZone: Length=1; Width=100; Slope=0; AspectAngle=0; Altitude=50
          Report: EventNames=[Clock].DoReport
            VariableNames:
              [Clock].Today
              [Maize].Phenology.CurrentStageName
              [Maize].AboveGround.Wt
              [Maize].AboveGround.N
              [Maize].Grain.Wt
              [Maize].Grain.Number
              [Maize].EarLive.Wt
              [Maize].Structure.LeafTipsAppeared
              [Maize].Leaf.ExpandedCohortNo
              [Maize].Structure.Height
              [Maize].Leaf.LAI
              [Maize].Leaf.CoverTotal
              [Maize].Leaf.Fw
              [Maize].Leaf.Fn
              [Maize].Total.Wt
              sum([Soil].Water.MM) as SWTot
          Fertiliser
          Soil WURSoil: ASCOrder=Vertosol; ASCSubOrder=Black; SoilType=Clay; Site=Norwin; NearestTown=Norwin; Region=Darling Downs and Granite Belt; State=Queensland; Country=Australia; NaturalVegetation=Qld. Bluegrass, possible Qld. Blue gum; ApsoilNumber=900; Latitude=-27.581836; Longitude=151.320206; LocationAccuracy=+/- 20m
            DataSource=CSIRO Sustainable Ecosystems, Toowoomba; Characteriesd as part of the GRDC funded project"Doing it better, doing it smarter, managing soil water in Australian agriculture' 2011
            Comments=OC, CLL for all crops estimated-based on Bongeen Mywybilla Soil No1
            Physical
              Thickness  BD   AirDry  LL15  DUL  SAT  KS
              150        1.4  0.05    0.1   0.2  0.3  100
              150        1.4  0.05    0.1   0.2  0.3  100
              300        1.4  0.05    0.1   0.2  0.3  100
              300        1.4  0.05    0.1   0.2  0.3  100
              300        1.4  0.05    0.1   0.2  0.3  100
              300        1.4  0.05    0.1   0.2  0.3  100
              300        1.4  0.05    0.1   0.2  0.3  100
              SoilCrop MaizeSoil: LL=[0.1, 0.1, 0.1, 0.1, 0.1, 0.1, 0.1]; KL=[0.06, 0.06, 0.06, 0.04, 0.04, 0.02, 0.01]; XF=[1, 1, 1, 1, 1, 1, 1]
            WaterBalance SoilWater: same as ScopingTest.MicrometInFields.Field1.Soil.SoilWater
            Organic: same as Replacements.WURSoil.Organic
            Chemical: Thickness=[150, 150, 300, 300, 300, 300, 300]; PH=[8, 8, 8, 8, 8, 8, 8]; PHUnits=Water
            Water: Thickness=[150, 150, 300, 300, 300, 300, 300]; InitialValues=[0.2, 0.2, 0.2, 0.2, 0.2, 0.2, 0.2]; InitialPAWmm=180; RelativeTo=LL15; FilledFromTop=false
            CERESSoilTemperature Temperature
            Nutrient
            Solute NO3: same as ScopingTest.MicrometInFields.Field1.Soil.NO3
            Solute NH4: same as Replacements.WURSoil.NH4
            Solute Urea: same as Replacements.WURSoil.Urea
          SurfaceOrganicMatter: InitialResidueName=wheat_stubble; InitialResidueType=wheat; InitialResidueMass=500; InitialStandingFraction=0; InitialCPR=0; InitialCNR=100
          Irrigation
          Operations
            // 2013-05-14  [Maize].Sow(population: 10, cultivar: Atrium, depth: 30, rowSpacing: 750);
            2013-05-14  [Irrigation].Apply(amount: 15);
            2013-04-19  [Fertiliser].Apply(Amount: 57, Type: Fertiliser.Types.NO3N);
            2013-05-30  [Fertiliser].Apply(Amount: 75, Type: Fertiliser.Types.NO3N);
            2013-06-18  [Fertiliser].Apply(Amount: 27, Type: Fertiliser.Types.NO3N);
            // 2013-10-16  [Maize].Harvest();
            // 2013-10-16  [Maize].EndCrop();
            2013-07-12  [Irrigation].Apply(amount: 15);
            2013-07-19  [Irrigation].Apply(amount: 15);
            2013-07-22  [Irrigation].Apply(amount: 15);
            2013-07-26  [Irrigation].Apply(amount: 15);
            2013-09-06  [Irrigation].Apply(amount: 15);
            2013-07-01  [Irrigation].Apply(amount: 50);
          Plant Maize
          Manager SowMaize
            SowDate = 14-May
            CultivarName = Atrium
            SowingDepth = 30
            RowSpacing = 750
            Population = 10
```csharp
using Models.Soils.Nutrients;
using System;
using Models.Core;
using Models.PMF;
using Models.Soils;
using Models.Soils.Nutrients;
using Models.Utilities;
using APSIM.Shared.Utilities;

namespace Models
{
    [Serializable]
    public class Script : Model
    {
        [Link] Clock Clock;
        [Link] Fertiliser Fertiliser;
        [Link] Summary Summary;
        [Link] Soil Soil;
        [Link] Plant Maize;
        Accumulator accumulatedRain;
        
        [Description("Sowing date (d-mmm)")]
        public string SowDate { get; set; }
    
        [Description("Cultivar to be sown")]
        public string CultivarName { get; set; }
        [Description("Sowing depth (mm)")]
        public double SowingDepth { get; set; }
        [Description("Row spacing (mm)")]
        public double RowSpacing { get; set; }
        [Description("Plant population (/m2)")]
        public double Population { get; set; }
        


        [EventSubscribe("DoManagement")]
        private void OnDoManagement(object sender, EventArgs e)
        {
            if (DateUtilities.WithinDates(SowDate, Clock.Today, SowDate))
            {
                Maize.Sow(population: Population, cultivar: CultivarName, depth: SowingDepth, rowSpacing: RowSpacing);    
            }
        
        }
        
    }
}
```
          Manager SetupMaizeRootZones
            UseExtraZone = True
```csharp
using Models.Soils;
using Models.Functions;
using APSIM.Shared.Utilities;
using System.Xml.Serialization;
using Models;
using Models.PMF;
using System.Text;
using System.Collections.Generic;
using Models.Core;
using System;
using Models.PMF.Organs;

namespace Models
{
    [Serializable] 
    public class Script : Model
    {
        [Link] private Plant Maize;
        [Link] private Clock Clock;
        [Link] private Zone zone;
        [Link(Type = LinkType.Path, Path = "[Maize].Root")]
        private Root root;

        [Description("Use extra root zone")]
        public bool UseExtraZone { get; set; }

        
        [EventSubscribe("StartOfSimulation")]
        private void OnSimulationCommencing(object sender, EventArgs e)
        {
            if (UseExtraZone)
            {
            root.ZoneNamesToGrowRootsIn.Add("WheatZone");
            root.ZoneRootDepths.Add(50);
NutrientPoolFunctions InitialDM = new NutrientPoolFunctions();
Constant InitStruct = new Constant();
InitStruct.FixedValue = 10;
InitialDM.Structural = InitStruct;
Constant InitMetab = new Constant();
InitMetab.FixedValue = 0;
InitialDM.Metabolic = InitMetab;
Constant InitStor = new Constant();
InitStor.FixedValue = 0;
InitialDM.Storage = InitStor;
            root.ZoneInitialDM.Add(InitialDM);

            }
        }
    }
}
```
          Manager Harvesting
```csharp
using Models.Soils.Nutrients;
using System;
using Models.Core;
using Models.PMF;
using Models.Soils;
using Models.Soils.Nutrients;
using Models.Utilities;
using APSIM.Shared.Utilities;

namespace Models
{
    [Serializable] 
    public class Script : Model
    {
        [Link] Plant Maize { get; set; }
        
        [EventSubscribe("DoManagement")]
        private void OnDoManagement(object sender, EventArgs e)
        {
            if (Maize.IsReadyForHarvesting)
            {
                Maize.Harvest();
                Maize.EndCrop();
            }
        }
    }
}
```
    Experiment WUR2014
      Factors
        Factor Treatment
          CompositeFactor SoleCrop
            Specifications:
              [WheatZone].Width=100
              [MaizeZone].Width=100
              [SetupMaizeRootZones].Script.UseExtraZone=false
              [SetupWheatRootZones].Script.UseExtraZone=false
          CompositeFactor 60WM
            Specifications:
              [WheatZone].Width=0.75
              [MaizeZone].Width=1.50
              [SowMaize].Script.SowDate=1-Jan
          CompositeFactor 02WM
            Specifications:
              [WheatZone].Width=0.75
              [MaizeZone].Width=1.50
              [SowWheat].Script.SowDate=1-Jan
          CompositeFactor 62WM
            Specifications:
              [WheatZone].Width=0.75
              [MaizeZone].Width=1.50
          CompositeFactor 63WM
            Specifications:
              [WheatZone].Width=0.75
              [MaizeZone].Width=1.50
              [SowMaize].Script.Population = 15
              [SowMaize].Script.RowSpacing = 375
      Simulation WUR2014BaseSimulation
        Clock: Start=2014-03-01; End=2014-12-31
        Summary SummaryFile
        Weather: FileName=Volkel.met
        MicroClimate: a_interception=0; b_interception=1; c_interception=0; d_interception=0; SoilHeatFluxFraction=0.4; MinimumHeightDiffForNewLayer=0; NightInterceptionFraction=0.5; ReferenceHeight=2
        SoilArbitrator Soil Arbitrator
        RectangularZone WheatZone: Length=1; Width=1; Slope=0; AspectAngle=0; Altitude=50
          Report: EventNames=[Clock].DoReport
            VariableNames:
              [Clock].Today
              [Wheat].Phenology.Zadok.Stage
              [Wheat].Phenology.CurrentStageName
              [Wheat].AboveGround.Wt
              [Wheat].AboveGround.N
              [Wheat].Grain.Wt
              [Wheat].Grain.Total.N
              [Wheat].Grain.Size
              [Wheat].Grain.Number
              [Wheat].Ear.Wt
              [Wheat].Leaf.Fw
              [Wheat].Leaf.Fn
              [Wheat].Leaf.Tips
              [Wheat].Leaf.Ligules
              [Wheat].Leaf.Height
              [Wheat].Leaf.LAI
              [Wheat].Leaf.CoverTotal
              [Wheat].Total.Wt
              sum([Soil].Water.MM) as SWTot
              [Wheat].Root.Depth
              ([Wheat].Leaf.RadiationIntercepted / [Weather].Radn) as WheatFPAR
              ([MicroClimate].SurfaceRS[1] / [Weather].Radn) as WheatZoneLightTransmission
          Fertiliser
          SurfaceOrganicMatter: InitialResidueName=wheat_stubble; InitialResidueType=wheat; InitialResidueMass=500; InitialStandingFraction=0; InitialCPR=0; InitialCNR=100
          Soil WURSoil: same as WageningenStripCrop.WUR2013.WUR2013BaseSimulation.WheatZone.WURSoil
          Operations
            // 2014-03-13  [Wheat].Sow(population: 250, cultivar: Tybalt, depth: 30, rowSpacing: 125);
            2014-03-13  [Irrigation].Apply(amount: 15);
            2014-04-09  [Fertiliser].Apply(Amount: 70, Type: Fertiliser.Types.NO3N);
            2014-05-09  [Fertiliser].Apply(Amount: 76, Type: Fertiliser.Types.NO3N);
            2014-06-06  [Fertiliser].Apply(Amount: 27, Type: Fertiliser.Types.NO3N);
            // 2014-08-04  [Wheat].Harvest();
            // 2014-08-04  [Wheat].EndCrop();
            2014-07-01  [Irrigation].Apply(amount: 30);
            2014-07-04  [Irrigation].Apply(amount: 30);
            2014-07-22  [Irrigation].Apply(amount: 30);
          Plant Wheat
          Irrigation
          Manager SetupWheatRootZones: same as WageningenStripCrop.WUR2013.WUR2013BaseSimulation.WheatZone.SetupWheatRootZones
          Manager SowWheat
            SowDate = 13-Mar
            CultivarName = Tybalt
            SowingDepth = 30
            RowSpacing = 125
            Population = 250
            script: same as in WageningenStripCrop.WUR2013.WUR2013BaseSimulation.WheatZone.SowWheat
          Manager Harvesting: same as WageningenStripCrop.WUR2013.WUR2013BaseSimulation.WheatZone.Harvesting
        RectangularZone MaizeZone: Length=1; Width=1; Slope=0; AspectAngle=0; Altitude=50
          Report: EventNames=[Clock].DoReport
            VariableNames:
              [Clock].Today
              [Maize].Phenology.CurrentStageName
              [Maize].AboveGround.Wt
              [Maize].AboveGround.N
              [Maize].Grain.Wt
              [Maize].Grain.Number
              [Maize].EarLive.Wt
              [Maize].Structure.LeafTipsAppeared
              [Maize].Leaf.ExpandedCohortNo
              [Maize].Structure.Height
              [Maize].Leaf.LAI
              [Maize].Leaf.CoverTotal
              [Maize].Leaf.Fw
              [Maize].Leaf.Fn
              [Maize].Total.Wt
              sum([Soil].Water.MM) as SWTot
              ([Maize].Leaf.RadiationIntercepted / [Weather].Radn) as MaizeFPAR
              ([MicroClimate].SurfaceRS[2] / [Weather].Radn) as MaizeZoneLightTransmission
          Fertiliser
          Soil WURSoil: same as WageningenStripCrop.WUR2013.WUR2013BaseSimulation.MaizeZone.WURSoil
          SurfaceOrganicMatter: InitialResidueName=wheat_stubble; InitialResidueType=wheat; InitialResidueMass=500; InitialStandingFraction=0; InitialCPR=0; InitialCNR=100
          Operations
            // 2014-05-07  [Maize].Sow(population: 10, cultivar: Atrium, depth: 30, rowSpacing: 750);
            2014-05-07  [Irrigation].Apply(amount: 15);
            2014-04-09  [Fertiliser].Apply(Amount: 70, Type: Fertiliser.Types.NO3N);
            2014-05-09  [Fertiliser].Apply(Amount: 76, Type: Fertiliser.Types.NO3N);
            2014-06-06  [Fertiliser].Apply(Amount: 27, Type: Fertiliser.Types.NO3N);
            // 2014-09-23  [Maize].Harvest();
            // 2014-09-23  [Maize].EndCrop();
            2014-07-01  [Irrigation].Apply(amount: 30);
            2014-07-04  [Irrigation].Apply(amount: 30);
            2014-07-22  [Irrigation].Apply(amount: 30);
          Plant Maize
          Irrigation
          Manager SetupMaizeRootZones: same as WageningenStripCrop.WUR2013.WUR2013BaseSimulation.MaizeZone.SetupMaizeRootZones
          Manager SowMaize
            SowDate = 7-May
            CultivarName = Atrium
            SowingDepth = 30
            RowSpacing = 750
            Population = 10
            script: same as in WageningenStripCrop.WUR2013.WUR2013BaseSimulation.MaizeZone.SowMaize
          Manager Harvesting: same as WageningenStripCrop.WUR2013.WUR2013BaseSimulation.MaizeZone.Harvesting
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