Simulations: Version=84
  DataStore
    Input: FileNames=[observed.prn]
    PredictedObserved POMonthly: PredictedTableName=MonthlyOutput; ObservedTableName=Input; FieldNameUsedForMatch=Clock.Today
      Tests: POName=POMonthly
        AcceptedStats:
          Name              n    Slope     Intercept  SEslope    SEintercept  R2        RMSE     NSE       ME          MAE       RSR
          OilPalm.LAI       101  0.577029  2.3609     0.0519785  0.301489     0.554533  0.55024  0.546703  -0.0679724  0.437153  0.669932
          OilPalm.StemMass  3    1.07848   -38.5646   0.0914881  200.619      0.992855  135.159  0.594682  132.714     132.714   0.519819
        AcceptedStatsName=Name n Slope Intercept SEslope SEintercept R2 RMSE NSE ME MAE RSR
    PredictedObserved POAnnual: PredictedTableName=AnnualOutput; ObservedTableName=Input; FieldNameUsedForMatch=Clock.Today
      Tests: POName=POAnnual
        AcceptedStats:
          Name                                 n   Slope     Intercept  SEslope    SEintercept  R2        RMSE     NSE       ME         MAE      RSR
          Calculations.Script.AnnualBunches    90  0.977225  0.143341   0.0569289  0.732769     0.770032  2.27302  0.713295  -0.133409  1.83312  0.532466
          Calculations.Script.AnnualBunchSize  90  0.898347  1.73427    0.0383639  0.730473     0.861707  1.62208  0.85893   -0.150823  1.28779  0.3735
          Calculations.Script.AnnualYield      90  0.83387   3.93955    0.0846716  2.43743      0.524295  5.29972  0.329105  -0.72046   4.15034  0.814518
        AcceptedStatsName=Name n Slope Intercept SEslope SEintercept R2 RMSE NSE ME MAE RSR
    TimeSeriesStats: TableName=POAnnual
  Folder Validation
    Memo
      Data from three sites across PNG with different climate and soils were used for model testing. Soils ranged from sandy clay (volcanic ash) to alluvial clay. Mean annual rainfall ranged from 2400 mm at Sagarai (1990-2008) and Sangara (1986-2009) to 4350 mm at Hargy(1989-2008) with annual rainfall variability larger at Sagarai than the other two sites. Whilst there is only a small difference in temperature across the sites, rainfall patterns do impact on both annual (Hargy 15.9 MJ; Sangara 17.0 MJ; Sagarai 18.1 MJ) and monthly variation in mean daily solar radiation.

      Fertiliser trial data were obtained for each location from the PNG Oil Palm Research Association trial database (Table Below). All trials had the same commercial dura x pisifera palms planted in an equilateral triangular pattern. Trials included multiple rates of nitrogen including a control in which no nitrogen was applied. Fertilisers were applied in two to three applications per year. Trial 324 evaluated the effect of nitrogen rate and source (five sources). There was no effect of nitrogen source and so these data have been combined in this study as there was no effect of nitrogen source. Trial 504 investigated nutrient interactions (N x K). Data from treatments for which potassium was not limiting were combined. Trial 212 investigated nitrogen rate only. All other macro- and micronutrients were maintained at sufficient levels in all trials. Plots in each trial consisted of 16 to 30 palms surrounded by guard rows between neighbouring plots. Levels of replication ranged from two to four. In trials 324 and 504, trenches were dug around plots to minimise poaching of nutrients by palms from neighbouring plots.

      **Description of fertiliser trials and selected treatments used in model development and testing.**

      Location: **Hargy**
       Trial number: 212
       Previous land use: Oil Palm
       Year planted: 1996
       Treatment commenced: 2002
       Population: 140 (palms/ha)
       NRates: 0, 1.0, 2.0 (kg/palm/ha/y)

      Location: **Sangara**
       Trial number: 324
       Previous land use: Oil Palm
       Year planted: 1996
       Treatment commenced: 2001
       Population: 135 (palms/ha)
       NRates: 0, 0.42, 1.68 (kg/palm/ha/y)

      Location: **Sagarai**
       Trial number: 504
       Previous land use: Forest / Rubber plantation
       Year planted: 1991
       Treatment commenced: 1995
       Population: 127 (palms/ha)
       NRates: 0, 0.42, 1.26 (kg/palm/ha/y)

      Harvested ripe bunches were counted and weighed (together with loose fruits) fortnightly for every palm. Leaf samples were collected from frond 17 from selected palms in all plots at least once a year and were oven dried and analysed for nitrogen content. Petiole cross-sectional area, leaflet lengths and frond length of frond 17 was measured to allow calculation of leaf area and mass (Corley et al., 1971). The total number of fronds on each palm was counted, and the first frond was marked twice a year to determine frond production rate. Stem heights of selected palms were measured periodically in two of the trials, and these were combined with a single measurement of stem diameter to calculate stem mass, assuming a linear increase in stem density with plantation age (Corley et al., 1971).

      Parameterisation of soil process models used information from a variety of sources. Soil hydraulic properties were derived from pressure plate water retention data. Runoff curve number (Hawkins, 1996) was estimated to 72 for clay soils and 50 for ash soils using runoff data from PNG oil palm plantations (Banabas et al., 2008b). Soil organic carbon data were available for Trials 324 and 504\. Simulations of Trial 212 utilised carbon measurements available for a nearby planting. The fractionation of soil organic carbon into the various model pools is very important for model accuracy. It has been shown that it is possible to deduce, a priori, the apparent soil organic matter composition from observed patterns (Huth et al., 2010). The inert fraction of the total soil organic matter is an important parameter and methods for its determination for the volcanic soils in PNG have not been developed. In this study, we have assumed that the inert carbon content does not vary significantly with depth and that it can be approximated using the carbon content at a depth of approximately 0.5 m. Most carbon cycling occurs above this depth and carbon contents vary less below this depth. Therefore we assumed that carbon above this value is available for decomposition. Finally, as trials 212 and 324 were planted after felling of existing plantations, we initialised the surface organic matter pools to consist of 24 t/ ha of fronds with a C:N of 39 and 63 t/ ha of stems with a C:N of 145\. In the absence of other information, the same initial surface organic matter was used for trial 504.

      Daily meteorological data (rainfall, sunshine hours, temperature) for Trial 324 were taken from the nearby research station of the PNG Oil Palm Research Association. Sunshine hour data was used to calculate incoming global shortwave radiation as described by Banabas (2007). Complete daily meteorological datasets were not available for the other two sites apart from a limited number of monthly totals for sunshine hours and rainfall. Daily estimates of the required climate weather data for these sites were derived from estimates obtained from the NASA Langley Research Center POWER Project funded through the NASA Earth Science Directorate Applied Science Program ([http://power.larc.nasa.gov/](http://power.larc.nasa.gov/)). Adequacy of this dataset was tested via comparison of satellite-derived estimates of monthly mean solar radiation with that calculated from measured monthly sunshine hours for Hargy (data not shown). No data on sunshine hours were available for Sagarai and neither site had measured temperature data for comparison. Satellite-derived estimates of monthly rainfall proved inadequate when compared to available monthly data. Therefore, observed monthly rainfall totals were disaggregated into daily data using the satellite-derived daily rainfall estimates. Satellite-derived estimates of daily temperatures were used for these two sites but could not be tested for accuracy.

      **References**

      Banabas, M., 2007\. Study of Nitrogen loss pathways in oil palm (Elaeis guineensis Jacq.) growing agro-ecosystems in volcanic ash soils in Papua New Guinea. Soil Sci. Massey University, Palmerston North, New Zealand.

      Banabas, M., Turner, M.A., Scotter, D.R., Nelson, P.N., 2008\. Losses of nitrogen fertiliser under oil palm in Papua New Guinea: 1\. Water balance, and nitrogen in soil solution and runoff. Aust J Soil Res 46, 332-339.

      Banabas, M., Scotter, D.R., Turner, M.A., 2008\. Losses of nitrogen fertiliser under oil palm in Papua New Guinea: 2\. Nitrogen transformations and leaching, and a residence time model. Aust J Soil Res 46, 340-347.

      Corley, R.H.V., Hardon, J.J., Tan, G.Y., 1971\. Analysis of growth of oil palm (Elaeis-guineensis Jacq) .1\. Estimation of growth parameters and application in breeding. Euphytica 20, 307-315.

      Hawkins, R.H., 1996\. Runoff Curve Number: Has It Reached Maturity? Journal of Hydrologic Engineering 1, 11-19.

      Huth, N.I., Thorburn, P.J., Radford, B.J., Thornton, C.M., 2010\. Impacts of fertilisers and legumes on N2O and CO2 emissions from soils in subtropical agricultural systems: A simulation study. Agriculture Ecosystems And Environment 136, 351-357.
    Folder Combined Results
      Memo
        Simulation results for the combined datasets from the various countries are shown in the following graphs.  The model is able to adequately capture the influence of growing conditions (soil, climate) and management (Nitrogen)
    Experiment Sangara
      Factors
        Factor N: Specification=[operations]
          Operations 0
            1996-04-01  [Fertiliser].Apply(1.9, Fertiliser.Types.NH4NO3N, 10);
            1996-06-01  [Fertiliser].Apply(3.8, Fertiliser.Types.NH4NO3N, 10);
            1996-09-01  [Fertiliser].Apply(3.8, Fertiliser.Types.NH4NO3N, 10);
            1996-12-01  [Fertiliser].Apply(3.8, Fertiliser.Types.NH4NO3N, 10);
            1997-03-01  [Fertiliser].Apply(5.7, Fertiliser.Types.NH4NO3N, 10);
            1997-07-01  [Fertiliser].Apply(11.8, Fertiliser.Types.NH4NO3N, 10);
            1997-11-01  [Fertiliser].Apply(11.8, Fertiliser.Types.NH4NO3N, 10);
            1998-03-01  [Fertiliser].Apply(16.5, Fertiliser.Types.NH4NO3N, 10);
            1998-07-01  [Fertiliser].Apply(23.6, Fertiliser.Types.NH4NO3N, 10);
            1998-11-01  [Fertiliser].Apply(23.6, Fertiliser.Types.NH4NO3N, 10);
            1999-03-01  [Fertiliser].Apply(33.1, Fertiliser.Types.NH4NO3N, 10);
            1999-07-01  [Fertiliser].Apply(37.8, Fertiliser.Types.NH4NO3N, 10);
            1999-11-01  [Fertiliser].Apply(37.8, Fertiliser.Types.NH4NO3N, 10);
            2000-03-01  [Fertiliser].Apply(42.5, Fertiliser.Types.NH4NO3N, 10);
            2000-07-01  [Fertiliser].Apply(47.3, Fertiliser.Types.NH4NO3N, 10);
            2000-11-01  [Fertiliser].Apply(47.3, Fertiliser.Types.NH4NO3N, 10);
          Operations 1
            1996-04-01  [Fertiliser].Apply(1.9, Fertiliser.Types.NH4NO3N, 10);
            1996-06-01  [Fertiliser].Apply(3.8, Fertiliser.Types.NH4NO3N, 10);
            1996-09-01  [Fertiliser].Apply(3.8, Fertiliser.Types.NH4NO3N, 10);
            1996-12-01  [Fertiliser].Apply(3.8, Fertiliser.Types.NH4NO3N, 10);
            1997-03-01  [Fertiliser].Apply(5.7, Fertiliser.Types.NH4NO3N, 10);
            1997-07-01  [Fertiliser].Apply(11.8, Fertiliser.Types.NH4NO3N, 10);
            1997-11-01  [Fertiliser].Apply(11.8, Fertiliser.Types.NH4NO3N, 10);
            1998-03-01  [Fertiliser].Apply(16.5, Fertiliser.Types.NH4NO3N, 10);
            1998-07-01  [Fertiliser].Apply(23.6, Fertiliser.Types.NH4NO3N, 10);
            1998-11-01  [Fertiliser].Apply(23.6, Fertiliser.Types.NH4NO3N, 10);
            1999-03-01  [Fertiliser].Apply(33.1, Fertiliser.Types.NH4NO3N, 10);
            1999-07-01  [Fertiliser].Apply(37.8, Fertiliser.Types.NH4NO3N, 10);
            1999-11-01  [Fertiliser].Apply(37.8, Fertiliser.Types.NH4NO3N, 10);
            2000-03-01  [Fertiliser].Apply(42.5, Fertiliser.Types.NH4NO3N, 10);
            2000-07-01  [Fertiliser].Apply(47.3, Fertiliser.Types.NH4NO3N, 10);
            2000-11-01  [Fertiliser].Apply(47.3, Fertiliser.Types.NH4NO3N, 10);
            2001-03-01  [Fertiliser].Apply(57, Fertiliser.Types.UreaN, 10);
            2002-03-01  [Fertiliser].Apply(57, Fertiliser.Types.UreaN, 10);
            2003-03-01  [Fertiliser].Apply(57, Fertiliser.Types.UreaN, 10);
            2004-03-01  [Fertiliser].Apply(57, Fertiliser.Types.UreaN, 10);
            2005-03-01  [Fertiliser].Apply(57, Fertiliser.Types.UreaN, 10);
            2006-03-01  [Fertiliser].Apply(57, Fertiliser.Types.UreaN, 10);
            2007-03-01  [Fertiliser].Apply(57, Fertiliser.Types.UreaN, 10);
            2008-03-01  [Fertiliser].Apply(57, Fertiliser.Types.UreaN, 10);
            2009-03-01  [Fertiliser].Apply(57, Fertiliser.Types.UreaN, 10);
            2010-03-01  [Fertiliser].Apply(57, Fertiliser.Types.UreaN, 10);
          Operations 2
            1996-04-01  [Fertiliser].Apply(1.9, Fertiliser.Types.NH4NO3N, 10);
            1996-06-01  [Fertiliser].Apply(3.8, Fertiliser.Types.NH4NO3N, 10);
            1996-09-01  [Fertiliser].Apply(3.8, Fertiliser.Types.NH4NO3N, 10);
            1996-12-01  [Fertiliser].Apply(3.8, Fertiliser.Types.NH4NO3N, 10);
            1997-03-01  [Fertiliser].Apply(5.7, Fertiliser.Types.NH4NO3N, 10);
            1997-07-01  [Fertiliser].Apply(11.8, Fertiliser.Types.NH4NO3N, 10);
            1997-11-01  [Fertiliser].Apply(11.8, Fertiliser.Types.NH4NO3N, 10);
            1998-03-01  [Fertiliser].Apply(16.5, Fertiliser.Types.NH4NO3N, 10);
            1998-07-01  [Fertiliser].Apply(23.6, Fertiliser.Types.NH4NO3N, 10);
            1998-11-01  [Fertiliser].Apply(23.6, Fertiliser.Types.NH4NO3N, 10);
            1999-03-01  [Fertiliser].Apply(33.1, Fertiliser.Types.NH4NO3N, 10);
            1999-07-01  [Fertiliser].Apply(37.8, Fertiliser.Types.NH4NO3N, 10);
            1999-11-01  [Fertiliser].Apply(37.8, Fertiliser.Types.NH4NO3N, 10);
            2000-03-01  [Fertiliser].Apply(42.5, Fertiliser.Types.NH4NO3N, 10);
            2000-07-01  [Fertiliser].Apply(47.3, Fertiliser.Types.NH4NO3N, 10);
            2000-11-01  [Fertiliser].Apply(47.3, Fertiliser.Types.NH4NO3N, 10);
            2001-03-01  [Fertiliser].Apply(227, Fertiliser.Types.UreaN, 10);
            2002-03-01  [Fertiliser].Apply(227, Fertiliser.Types.UreaN, 10);
            2003-03-01  [Fertiliser].Apply(227, Fertiliser.Types.UreaN, 10);
            2004-03-01  [Fertiliser].Apply(227, Fertiliser.Types.UreaN, 10);
            2005-03-01  [Fertiliser].Apply(227, Fertiliser.Types.UreaN, 10);
            2006-03-01  [Fertiliser].Apply(227, Fertiliser.Types.UreaN, 10);
            2007-03-01  [Fertiliser].Apply(227, Fertiliser.Types.UreaN, 10);
            2008-03-01  [Fertiliser].Apply(227, Fertiliser.Types.UreaN, 10);
            2009-03-01  [Fertiliser].Apply(227, Fertiliser.Types.UreaN, 10);
            2010-03-01  [Fertiliser].Apply(227, Fertiliser.Types.UreaN, 10);
      Simulation Base324
        Weather: FileName=..\..\WeatherFiles\Popondetta.met
        Clock: Start=1996-03-01; End=2010-09-29
        Summary
        Zone Field: Area=1; Slope=0; AspectAngle=0; Altitude=50
          Fertiliser
          SurfaceOrganicMatter SurfaceOM: InitialResidueName=oilpalm; InitialResidueType=oilpalm; InitialResidueMass=0; InitialStandingFraction=0; InitialCPR=0; InitialCNR=0; FractionFaecesAdded=1
          Soil: SoilType=Higaturu Series; Site=Sangara Estate; NearestTown=Popondetta; Region=Oro Province; Latitude=0; Longitude=0
            Physical
              Thickness  BD    AirDry  LL15   DUL    SAT
              100        1.22  0.127   0.38   0.48   0.53
              200        1.22  0.127   0.38   0.48   0.53
              300        1.43  0.1     0.3    0.4    0.45
              300        1.14  0.137   0.41   0.51   0.56
              300        1.15  0.135   0.406  0.506  0.556
              300        1.15  0.135   0.406  0.506  0.556
              500        1.43  0.1     0.3    0.4    0.45
              500        1.43  0.1     0.3    0.4    0.45
              500        1.43  0.1     0.3    0.4    0.45
              500        1.43  0.1     0.3    0.4    0.45
              500        1.43  0.1     0.3    0.4    0.45
              1000       1.43  0.1     0.3    0.4    0.45
              SoilCrop OilPalmSoil
                LL=[0.38, 0.38, 0.3, 0.41, 0.406, 0.406, 0.3, 0.3, 0.3, 0.3, 0.3, 0.3]
                KL=[0.06, 0.04, 0.03, 0.02, 0.02, 0.02, 0.01, 0.01, 0.01, 0, 0, 0]
                XF=[1, 1, 1, 1, 1, 1, 1, 1, 1, 0, 0, 0]
            SoilWater: SummerDate=1-Nov; SummerU=5; SummerCona=5; WinterDate=1-Apr; WinterU=5; WinterCona=5; DiffusConst=88; DiffusSlope=35.4; Salb=0.18; CN2Bare=68; CNRed=20; CNCov=0.8; slope=0; discharge_width=0; catchment_area=0; max_pond=0; PrecipitationInterception=0
              Thickness  SWCON  KLAT
              100        0.7    0
              200        0.7    0
              300        0.7    0
              300        0.7    0
              300        0.7    0
              300        0.7    0
              500        0.5    0
              500        0.5    0
              500        0.5    0
              500        0.5    0
              500        0.5    0
              1000       0.5    0
            Organic: FOMCNRatio=30
              Thickness  Carbon  SoilCNRatio  FBiom  FInert  FOM
              100        2.1     12           0.04   0.24    532.719
              100        1.06    12           0.03   0.47    501.696
              100        0.65    12           0.015  0.77    472.479
              300        0.5     12           0.01   0.95    394.648
              300        0.4     12           0.01   0.99    329.638
              600        0.4     12           0.01   0.99    229.98
              500        0.4     12           0.01   0.99    170.374
              500        0.4     12           0.01   0.99    126.216
              500        0.4     12           0.01   0.99    93.5031
              500        0.4     12           0.01   0.99    69.2688
              500        0.4     12           0.01   0.99    51.3156
              1000       0.4     12           0.01   0.99    28.1626
            Chemical
              Thickness  NO3N  NH4N  PH
              100        5     0     6.3
              200        5     0     6.4
              300        1     0     6.7
              300        1     0     6.8
              300        1     0     6.8
              300        0     0     6.8
              500        0     0     6.8
              500        0     0     6.8
              500        0     0     6.8
              500        0     0     6.8
              500        0     0     6.8
              1000       0     0     6.8
            InitialWater Initial water: PercentMethod=1; FractionFull=1
            Sample Initial nitrogen: SWUnits=Volumetric; OCUnits=Total; PHUnits=Water
              Thickness=[100, 200, 300, 300, 300, 300, 500, 500, 500, 500, 500, 1000]
            CERESSoilTemperature
            Nutrient
              DirectedGraphInfo={Nodes=[{Name=Inert, OutlineColour=Black}, {Name=SurfaceResidue, OutlineColour=Black}, {Name=FOMLignin, OutlineColour=Black}, {Name=FOMCellulose, OutlineColour=Black}, {Name=FOMCarbohydrate, OutlineColour=Black}, {Name=Microbial, OutlineColour=Black}, {Name=Humic, OutlineColour=Black}, {Name=Urea, OutlineColour=Black}, {Name=NO3, OutlineColour=Black}, {Name=NH4, OutlineColour=Black}, {Name=Atmosphere, OutlineColour=White}], Arcs=[{SourceName=SurfaceResidue, DestinationName=Microbial}, {SourceName=SurfaceResidue, DestinationName=Humic}, {SourceName=FOMLignin, DestinationName=Microbial}, {SourceName=FOMLignin, DestinationName=Humic}, {SourceName=FOMCellulose, DestinationName=Microbial}, {SourceName=FOMCellulose, DestinationName=Humic}, {SourceName=FOMCarbohydrate, DestinationName=Microbial}, {SourceName=FOMCarbohydrate, DestinationName=Humic}, {SourceName=Microbial, DestinationName=Microbial}, {SourceName=Microbial, DestinationName=Humic}, {SourceName=Humic, DestinationName=Microbial}, {SourceName=Urea, DestinationName=NH4}, {SourceName=NO3, DestinationName=Atmosphere}, {SourceName=NH4, DestinationName=NO3}]}
          Report AnnualOutput: EventNames=[Clock].EndOfYear
            VariableNames:
              [Clock].Today
              [OilPalm].Age
              [OilPalm].LAI
              [Calculations].Script.AnnualRain
              [Calculations].Script.AnnualFronds
              [Calculations].Script.AnnualBunches
              [Calculations].Script.AnnualYield
              [Calculations].Script.AnnualBunchSize
              [Calculations].Script.AnnualUnderstoryNPP
              [Calculations].Script.AnnualUnderstoryNFixation
              [Calculations].Script.AnnualUnderstoryNUptake
              [Calculations].Script.AnnualPalmNUptake
              [Calculations].Script.AnnualRootNPP
              [Calculations].Script.AnnualStemNPP
              [Calculations].Script.AnnualFrondNPP
              [Calculations].Script.AnnualBunchNPP
              [Calculations].Script.AnnualTotalVegetativeNPP
              [Calculations].Script.AnnualTotalNInput
              [Calculations].Script.AnnualFertiliserNAdded
              [Calculations].Script.AnnualNRemoved
              [Calculations].Script.AnnualDenitrification
              [Calculations].Script.AnnualN2O
              [Calculations].Script.AnnualLeaching
              [Calculations].Script.AnnualET
              [Calculations].Script.AnnualNPP
          Report MonthlyOutput
            VariableNames:
              [Clock].Today.Year
              [Clock].Today
              [Clock].Today.Month
              [OilPalm].Age
              [SurfaceOM].N
              [SurfaceOM].Wt
              [OilPalm].CumulativeFrondNumber
              [OilPalm].LAI
              [OilPalm].StemMass
              [OilPalm].UnderstoryCoverGreen
              [OilPalm].UnderstoryNFixation
              [Calculations].Script.surfaceom_wt_oilpalmstem
              [Calculations].Script.surfaceom_wt_oilpalmunderstory
              [Calculations].Script.SoilCtpha
              [Calculations].Script.NitTot
            EventNames:
              [Clock].StartOfMonth
          MicroClimate: a_interception=0; b_interception=1; c_interception=0; d_interception=0; soil_albedo=0.23; SoilHeatFluxFraction=0.4; MinimumHeightDiffForNewLayer=0; NightInterceptionFraction=0.5; ReferenceHeight=2
          OilPalm: LAI=0; UnderstoryCoverMax=0.4; UnderstoryLegumeFraction=1; MaximumRootDepth=5000; RootDepth=0; DltDM=0; ReproductiveGrowthFraction=0; UnderstoryCoverGreen=0
          Operations: same as Validation.Sangara.Factors.N.0
          Irrigation
          Manager Palm Management
            sowing_date = 1996-03-01
            population = 135
            cultivar = Dami
            sowing_depth = 200
            Plant_population = 0
```csharp
using System;
using Models.Core;
using Models.PMF;
using Models.PMF.OilPalm;
using Models.Surface;
using APSIM.Shared.Utilities;

namespace Models
{
    [Serializable]
    [System.Xml.Serialization.XmlInclude(typeof(Model))]
    public class Script : Model
    {
        [Link] Clock Clock; 
        [Link] OilPalm oilPalm;
        [Link] Summary Summary;
        [Link] SurfaceOrganicMatter surface;
        
        [Description("Sowing date")]
        public DateTime sowing_date {get; set;}
        
        [Description("Plant population /ha")]
        public double population {get; set;}


        [Description("Cultivar")]
        [Display(Type=DisplayType.CultivarName)]
        public string cultivar {get; set;}

        [Description("Sowing depth (mm)")]
        public double sowing_depth {get; set;}
        
        public double Plant_population {get;set;}
        
        private byte HarvestCounter = 1;

        [EventSubscribe("Commencing")]
        private void OnSimulationCommencing(object sender, EventArgs e)
        {
            Plant_population = 0;
            surface.Add(24000, 270.769, 0, "oilpalm", "oilpalm");
            surface.Add(63000, 191.172, 0, "oilpalmstem", "oilpalmstem");
        }
        
        [EventSubscribe("DoManagement")]
        private void OnDoManagement(object sender, EventArgs e)
        {    
            if (Clock.Today.Date == sowing_date)
            {
                oilPalm.Sow(population: population / 10000, cultivar:cultivar, depth:sowing_depth, rowSpacing:150);
            }
            
            if (HarvestCounter == 14)
            {
                oilPalm.Harvest();
                HarvestCounter = 1;
            }
            
            HarvestCounter++;
        }
    }
}
```
          Manager Calculations
            AnnualRain = 0
            Offset = 6
            AnnualFronds = 0
            AnnualBunches = 0
            AnnualYield = 0
            AnnualBunchSize = 0
            SoilCtpha = -
            surfaceom_wt_oilpalmstem = -
            surfaceom_wt_oilpalmunderstory = 0
            OilPalmYield = 0
            TotalNO3 = -
            NitTot = -
            AnnualUnderstoryNFixation = -
            AnnualUnderstoryNPP = -
            AnnualUnderstoryNUptake = -
            AnnualPalmNUptake = 0
            AnnualTotalVegetativeNPP = 0
            AnnualPalmVegetativeNPP = 0
            AnnualFrondNPP = 0
            AnnualStemNPP = 0
            AnnualRootNPP = 0
            AnnualBunchNPP = 0
            AnnualTotalNInput = 0
            AnnualFertiliserNAdded = 0
            AnnualNRemoved = 0
            AnnualDenitrification = 0
            AnnualN2O = 0
            AnnualLeaching = 0
            AnnualET = 0
            AnnualNPP = 0
```csharp
using Models.Interfaces;
using APSIM.Shared.Utilities;
using Models.Surface;
using Models.Soils;
using Models.Soils.Nutrients;
using Models.PMF.OilPalm;
using Models.PMF;
using Models.Core;
using System;

namespace Models
{ 
    [Serializable]
    [System.Xml.Serialization.XmlInclude(typeof(Model))]
    public class Script : Model
    {
        [Link] private Clock Clock;
        [Link] private OilPalm OilPalm;
        [Link] private Soil Soil;
        [Link] private SurfaceOrganicMatter SurfaceOM;
        [Link] private Summary Summary;
        [Link] private Fertiliser Fertiliser;
        [Link] private Weather Weather;
        [Link(ByName = true)]
        private ISolute NO3;
        [Link(ByName = true)]
        private Nutrient Nutrient;
        
        public double AnnualRain {get; set;}
        public double Offset {get; set;}
        public double AnnualFronds {get; set;}
        public double AnnualBunches {get; set;}
        public double AnnualYield {get; set;}
        public double AnnualBunchSize {get; set;}
        public double SoilCtpha {get; set;}
        public double surfaceom_wt_oilpalmstem {get; set;}
        public double surfaceom_wt_oilpalmunderstory {get; set;}
        public double OilPalmYield {get; set;}
        public double TotalNO3 {get; set;}
        public double NitTot {get;set;}
        public double AnnualUnderstoryNFixation {get; set;}    
        public double AnnualUnderstoryNPP {get; set;}    
        public double AnnualUnderstoryNUptake {get; set;}    
        public double AnnualPalmNUptake {get; set;}
        
        public double AnnualTotalVegetativeNPP {get; set;}
        public double AnnualPalmVegetativeNPP {get; set;}
        public double AnnualFrondNPP {get; set;}
        public double AnnualStemNPP {get; set;}
        public double AnnualRootNPP {get; set;}
        public double AnnualBunchNPP {get; set;}
        public double AnnualTotalNInput {get; set;}
        public double AnnualFertiliserNAdded {get; set;}
        public double AnnualNRemoved {get; set;}
        public double AnnualDenitrification {get; set;}
        public double AnnualN2O {get;set;}
        public double AnnualLeaching {get; set;}
        public double AnnualET {get; set;}
        public double AnnualNPP {get; set;}

        
        [EventSubscribe("Commencing")]
        private void OnSimulationCommencing(object sender, EventArgs e)
        {
            AnnualRain = 0;
            Offset = 0;
            OilPalmYield = 0;
            AnnualFronds = 0;
            AnnualBunches = 0;
            AnnualBunchSize = 0;
            AnnualYield = 0;
            SoilCtpha = 0;
            surfaceom_wt_oilpalmstem = 0;
            surfaceom_wt_oilpalmunderstory = 0;    
            NitTot=0;
            TotalNO3 = 0;
            AnnualUnderstoryNFixation = 0;
            AnnualUnderstoryNPP = 0;
            AnnualUnderstoryNUptake = 0;
            AnnualPalmNUptake = 0;

            AnnualTotalVegetativeNPP = 0;
            AnnualPalmVegetativeNPP = 0;
            AnnualFrondNPP = 0;
            AnnualStemNPP = 0;
            AnnualRootNPP = 0;
            AnnualBunchNPP = 0;
            AnnualTotalNInput = 0;
            AnnualFertiliserNAdded = 0;
            AnnualNRemoved = 0;
            AnnualDenitrification = 0;
            AnnualN2O = 0;
            AnnualLeaching = 0;    
            AnnualET = 0;
            AnnualNPP = 0;
        }
        

       [EventSubscribe("StartOfYear")]
       private void OnStartOfYear(object sender, EventArgs e)
       {
            AnnualRain = 0;
               Offset = OilPalm.CumulativeFrondNumber;
            AnnualYield = 0;
            AnnualBunches = 0;
            AnnualBunchSize = 0;
            AnnualUnderstoryNFixation = 0;
            AnnualUnderstoryNPP = 0;
            AnnualUnderstoryNUptake = 0;
            AnnualPalmNUptake = 0;
            AnnualTotalVegetativeNPP = 0;
            AnnualPalmVegetativeNPP = 0;
            AnnualUnderstoryNPP = 0;
            AnnualFrondNPP = 0;
            AnnualStemNPP = 0;
            AnnualRootNPP = 0;
            AnnualBunchNPP = 0;
            AnnualTotalNInput = 0;
            AnnualFertiliserNAdded = 0;
            AnnualNRemoved = 0;
            AnnualDenitrification = 0;
            AnnualN2O = 0;
            AnnualLeaching = 0;
            AnnualET = 0;
            AnnualNPP = 0;
        }
        
       [EventSubscribe("DoManagementCalculations")]
       private void OnDoManagement(object sender, EventArgs e)
        {
            AnnualRain += Weather.Rain;
            SoilCtpha = MathUtilities.Sum(Nutrient.TotalC) / 1000;
            surfaceom_wt_oilpalmstem = SurfaceOM.GetWeightFromPool("oilpalmstem");
            TotalNO3 = MathUtilities.Sum(NO3.kgha);
            NitTot = MathUtilities.Sum(Nutrient.TotalN);

            AnnualUnderstoryNFixation += OilPalm.UnderstoryNFixation;
            AnnualUnderstoryNPP += (OilPalm.UnderstoryDltDM * 10);
            AnnualUnderstoryNUptake += MathUtilities.Sum(OilPalm.UnderstoryNUptake);
            AnnualPalmNUptake += MathUtilities.Sum(OilPalm.NUptake);
            AnnualFronds = OilPalm.CumulativeFrondNumber - Offset;                            


            AnnualTotalVegetativeNPP += (OilPalm.RootGrowth + OilPalm.StemGrowth + OilPalm.FrondGrowth + OilPalm.UnderstoryDltDM) * 10;
            AnnualPalmVegetativeNPP += (OilPalm.RootGrowth + OilPalm.StemGrowth + OilPalm.FrondGrowth) * 10;
            AnnualFrondNPP += OilPalm.FrondGrowth * 10;
            AnnualRootNPP += OilPalm.RootGrowth * 10;
            AnnualStemNPP += OilPalm.StemGrowth * 10;
            AnnualBunchNPP += OilPalm.BunchGrowth * 10;

            AnnualTotalNInput += OilPalm.UnderstoryNFixation + Fertiliser.NitrogenApplied;
            AnnualFertiliserNAdded +=Fertiliser.NitrogenApplied;
            AnnualDenitrification += MathUtilities.Sum(Nutrient.Natm);
            AnnualN2O += MathUtilities.Sum(Nutrient.N2Oatm);
            AnnualLeaching += Soil.SoilWater.LeachNO3;

            AnnualET += Soil.SoilWater.Es + OilPalm.EP + OilPalm.UnderstoryEP;
            AnnualNPP = AnnualTotalVegetativeNPP + AnnualBunchNPP;

        }
        
        [EventSubscribe("Harvesting")]
        private void OnHarvesting(object sender, EventArgs e)
        {
            AnnualYield += OilPalm.HarvestFFB;
            AnnualBunches += OilPalm.HarvestBunches;
            if (AnnualBunches > 0)
                AnnualBunchSize = AnnualYield * 1000 / AnnualBunches / (OilPalm.Population * 10000);
            AnnualNRemoved += OilPalm.HarvestNRemoved;
        }
    }
}
```
          Report daily: EventNames=[Clock].DoReport
            VariableNames:
              [Clock].Today.Year
              [Clock].Today
              [Clock].Today.Month
              [OilPalm].Age
              [OilPalm].UnderstoryNFixation
              [OilPalm].FW
              [Soil].SoilWater.Es
              [OilPalm].cover_green
    Experiment Hargy
      Factors
        Factor N: Specification=[operations]
          Operations 0
            1998-04-01  [Fertiliser].Apply(36.7, Fertiliser.Types.UreaN, 10);
            1998-06-01  [Fertiliser].Apply(36.7, Fertiliser.Types.UreaN, 10);
            1998-08-01  [Fertiliser].Apply(36.7, Fertiliser.Types.UreaN, 10);
            1999-04-01  [Fertiliser].Apply(36.7, Fertiliser.Types.UreaN, 10);
            1999-06-01  [Fertiliser].Apply(36.7, Fertiliser.Types.UreaN, 10);
            1999-08-01  [Fertiliser].Apply(36.7, Fertiliser.Types.UreaN, 10);
            2000-04-01  [Fertiliser].Apply(36.7, Fertiliser.Types.UreaN, 10);
            2000-06-01  [Fertiliser].Apply(36.7, Fertiliser.Types.UreaN, 10);
            2000-08-01  [Fertiliser].Apply(36.7, Fertiliser.Types.UreaN, 10);
            2001-04-01  [Fertiliser].Apply(36.7, Fertiliser.Types.UreaN, 10);
            2001-06-01  [Fertiliser].Apply(36.7, Fertiliser.Types.UreaN, 10);
            2001-08-01  [Fertiliser].Apply(36.7, Fertiliser.Types.UreaN, 10);
          Operations 1
            1998-04-01  [Fertiliser].Apply(36.7, Fertiliser.Types.UreaN, 10);
            1998-06-01  [Fertiliser].Apply(36.7, Fertiliser.Types.UreaN, 10);
            1998-08-01  [Fertiliser].Apply(36.7, Fertiliser.Types.UreaN, 10);
            1999-04-01  [Fertiliser].Apply(36.7, Fertiliser.Types.UreaN, 10);
            1999-06-01  [Fertiliser].Apply(36.7, Fertiliser.Types.UreaN, 10);
            1999-08-01  [Fertiliser].Apply(36.7, Fertiliser.Types.UreaN, 10);
            2000-04-01  [Fertiliser].Apply(36.7, Fertiliser.Types.UreaN, 10);
            2000-06-01  [Fertiliser].Apply(36.7, Fertiliser.Types.UreaN, 10);
            2000-08-01  [Fertiliser].Apply(36.7, Fertiliser.Types.UreaN, 10);
            2001-04-01  [Fertiliser].Apply(36.7, Fertiliser.Types.UreaN, 10);
            2001-06-01  [Fertiliser].Apply(36.7, Fertiliser.Types.UreaN, 10);
            2001-08-01  [Fertiliser].Apply(36.7, Fertiliser.Types.UreaN, 10);
            2000-06-01  [Fertiliser].Apply(70, Fertiliser.Types.NH4NO3N, 10);
            2000-12-01  [Fertiliser].Apply(70, Fertiliser.Types.NH4NO3N, 10);
            2001-06-01  [Fertiliser].Apply(70, Fertiliser.Types.NH4NO3N, 10);
            2001-12-01  [Fertiliser].Apply(70, Fertiliser.Types.NH4NO3N, 10);
            2002-06-01  [Fertiliser].Apply(70, Fertiliser.Types.NH4NO3N, 10);
            2002-12-01  [Fertiliser].Apply(70, Fertiliser.Types.NH4NO3N, 10);
            2003-06-01  [Fertiliser].Apply(70, Fertiliser.Types.NH4NO3N, 10);
            2003-12-01  [Fertiliser].Apply(70, Fertiliser.Types.NH4NO3N, 10);
            2004-06-01  [Fertiliser].Apply(70, Fertiliser.Types.NH4NO3N, 10);
            2004-12-01  [Fertiliser].Apply(70, Fertiliser.Types.NH4NO3N, 10);
            2005-06-01  [Fertiliser].Apply(70, Fertiliser.Types.NH4NO3N, 10);
            2005-12-01  [Fertiliser].Apply(70, Fertiliser.Types.NH4NO3N, 10);
            2006-06-01  [Fertiliser].Apply(70, Fertiliser.Types.NH4NO3N, 10);
            2006-12-01  [Fertiliser].Apply(70, Fertiliser.Types.NH4NO3N, 10);
            2007-06-01  [Fertiliser].Apply(70, Fertiliser.Types.NH4NO3N, 10);
            2007-12-01  [Fertiliser].Apply(70, Fertiliser.Types.NH4NO3N, 10);
            2008-06-01  [Fertiliser].Apply(70, Fertiliser.Types.NH4NO3N, 10);
            2008-12-01  [Fertiliser].Apply(70, Fertiliser.Types.NH4NO3N, 10);
            2009-06-01  [Fertiliser].Apply(70, Fertiliser.Types.NH4NO3N, 10);
            2009-12-01  [Fertiliser].Apply(70, Fertiliser.Types.NH4NO3N, 10);
          Operations 2
            1998-04-01  [Fertiliser].Apply(36.7, Fertiliser.Types.UreaN, 10);
            1998-06-01  [Fertiliser].Apply(36.7, Fertiliser.Types.UreaN, 10);
            1998-08-01  [Fertiliser].Apply(36.7, Fertiliser.Types.UreaN, 10);
            1999-04-01  [Fertiliser].Apply(36.7, Fertiliser.Types.UreaN, 10);
            1999-06-01  [Fertiliser].Apply(36.7, Fertiliser.Types.UreaN, 10);
            1999-08-01  [Fertiliser].Apply(36.7, Fertiliser.Types.UreaN, 10);
            2000-04-01  [Fertiliser].Apply(36.7, Fertiliser.Types.UreaN, 10);
            2000-06-01  [Fertiliser].Apply(36.7, Fertiliser.Types.UreaN, 10);
            2000-08-01  [Fertiliser].Apply(36.7, Fertiliser.Types.UreaN, 10);
            2001-04-01  [Fertiliser].Apply(36.7, Fertiliser.Types.UreaN, 10);
            2001-06-01  [Fertiliser].Apply(36.7, Fertiliser.Types.UreaN, 10);
            2001-08-01  [Fertiliser].Apply(36.7, Fertiliser.Types.UreaN, 10);
            2000-06-01  [Fertiliser].Apply(140, Fertiliser.Types.NH4NO3N, 10);
            2000-12-01  [Fertiliser].Apply(140, Fertiliser.Types.NH4NO3N, 10);
            2001-06-01  [Fertiliser].Apply(140, Fertiliser.Types.NH4NO3N, 10);
            2001-12-01  [Fertiliser].Apply(140, Fertiliser.Types.NH4NO3N, 10);
            2002-06-01  [Fertiliser].Apply(140, Fertiliser.Types.NH4NO3N, 10);
            2002-12-01  [Fertiliser].Apply(140, Fertiliser.Types.NH4NO3N, 10);
            2003-06-01  [Fertiliser].Apply(140, Fertiliser.Types.NH4NO3N, 10);
            2003-12-01  [Fertiliser].Apply(140, Fertiliser.Types.NH4NO3N, 10);
            2004-06-01  [Fertiliser].Apply(140, Fertiliser.Types.NH4NO3N, 10);
            2004-12-01  [Fertiliser].Apply(140, Fertiliser.Types.NH4NO3N, 10);
            2005-06-01  [Fertiliser].Apply(140, Fertiliser.Types.NH4NO3N, 10);
            2005-12-01  [Fertiliser].Apply(140, Fertiliser.Types.NH4NO3N, 10);
            2006-06-01  [Fertiliser].Apply(140, Fertiliser.Types.NH4NO3N, 10);
            2006-12-01  [Fertiliser].Apply(140, Fertiliser.Types.NH4NO3N, 10);
            2007-06-01  [Fertiliser].Apply(140, Fertiliser.Types.NH4NO3N, 10);
            2007-12-01  [Fertiliser].Apply(140, Fertiliser.Types.NH4NO3N, 10);
            2008-06-01  [Fertiliser].Apply(140, Fertiliser.Types.NH4NO3N, 10);
            2008-12-01  [Fertiliser].Apply(140, Fertiliser.Types.NH4NO3N, 10);
            2009-06-01  [Fertiliser].Apply(140, Fertiliser.Types.NH4NO3N, 10);
            2009-12-01  [Fertiliser].Apply(140, Fertiliser.Types.NH4NO3N, 10);
      Simulation Base212
        Weather: FileName=..\..\WeatherFiles\Hargy.met
        Clock: Start=1996-02-01; End=2009-12-31
        Summary
        Zone Field: Area=1; Slope=0; AspectAngle=0; Altitude=50
          Fertiliser
          SurfaceOrganicMatter SurfaceOM: InitialResidueName=oilpalm; InitialResidueType=oilpalm; InitialResidueMass=0; InitialStandingFraction=0; InitialCPR=0; InitialCNR=0; FractionFaecesAdded=1
          Soil: SoilType=Volcanic Ash; Site=Hargy Estate; NearestTown=Bialla; Region=West New Britain Province; Latitude=0; Longitude=0
            Physical
              Thickness  BD    AirDry  LL15  DUL   SAT
              100        0.7   0.05    0.3   0.54  0.68
              200        0.75  0.05    0.4   0.61  0.68
              300        1.2   0.05    0.23  0.43  0.51
              300        1.2   0.05    0.23  0.43  0.51
              300        1.2   0.05    0.23  0.43  0.51
              800        1.2   0.05    0.23  0.43  0.51
              500        1.2   0.05    0.23  0.43  0.51
              500        1.2   0.05    0.23  0.43  0.51
              500        1.2   0.05    0.23  0.43  0.51
              500        1.2   0.05    0.23  0.43  0.51
              SoilCrop OilPalmSoil
                LL=[0.3, 0.4, 0.23, 0.23, 0.23, 0.23, 0.23, 0.23, 0.23, 0.23]
                KL=[0.04, 0.04, 0.02, 0.02, 0.01, 0.01, 0.01, 0.01, 0.01, 0.01]
                XF=[1, 1, 1, 1, 1, 1, 1, 1, 1, 1]
            SoilWater: SummerDate=1-Nov; SummerU=5; SummerCona=5; WinterDate=1-Apr; WinterU=5; WinterCona=5; DiffusConst=88; DiffusSlope=35.4; Salb=0.18; CN2Bare=68; CNRed=20; CNCov=0.8; slope=0; discharge_width=0; catchment_area=0; max_pond=0; PrecipitationInterception=0
              Thickness  SWCON  KLAT
              100        0.8    0
              200        0.8    0
              300        0.8    0
              300        0.8    0
              300        0.8    0
              300        0.8    0
            Organic: FOMCNRatio=30
              Thickness  Carbon  SoilCNRatio  FBiom  FInert  FOM
              200        5.3     10           0.08   0.4     1173.63
              200        3       10           0.03   0.75    1010.15
              400        2.4     10           0.015  0.95    748.337
              3200       2.2     10           0.01   0.99    67.8876
            Chemical
              Thickness  NO3N     NH4N  PH
              100        310      0     6.3
              100        20       0     6.4
              100        20       0     6.7
              300        1.38889  0     6.8
              300        1.38889  0     6.8
              600        0        0     6.8
            InitialWater Initial water: PercentMethod=1; FractionFull=1
            Sample Initial nitrogen: Thickness=[100, 200, 300, 300, 300, 300]; SWUnits=Volumetric; OCUnits=Total; PHUnits=Water
            CERESSoilTemperature
            Nutrient: same as Validation.Sangara.Base324.Field.Soil.Nutrient
          Report AnnualOutput: same as Validation.Sangara.Base324.Field.AnnualOutput
          Report MonthlyOutput: same as Validation.Sangara.Base324.Field.MonthlyOutput
          MicroClimate: a_interception=0; b_interception=1; c_interception=0; d_interception=0; soil_albedo=0.23; SoilHeatFluxFraction=0.4; MinimumHeightDiffForNewLayer=0; NightInterceptionFraction=0.5; ReferenceHeight=2
          Irrigation
          Operations: same as Validation.Hargy.Factors.N.0
          OilPalm: LAI=0; UnderstoryCoverMax=0.4; UnderstoryLegumeFraction=1; MaximumRootDepth=5000; RootDepth=0; DltDM=0; ReproductiveGrowthFraction=0; UnderstoryCoverGreen=0
          Manager Palm Management: same as Validation.Sangara.Base324.Field.Palm Management
          Manager Calculations: same as Validation.Sangara.Base324.Field.Calculations
    Experiment Sagarai
      Factors
        Factor N: Specification=[operations]
          Operations 0
            1991-03-01  [Fertiliser].Apply(42, Fertiliser.Types.UreaN, 10);
            1991-09-01  [Fertiliser].Apply(42, Fertiliser.Types.UreaN, 10);
            1992-03-01  [Fertiliser].Apply(42, Fertiliser.Types.UreaN, 10);
            1992-09-01  [Fertiliser].Apply(42, Fertiliser.Types.UreaN, 10);
            1993-03-01  [Fertiliser].Apply(42, Fertiliser.Types.UreaN, 10);
            1993-09-01  [Fertiliser].Apply(42, Fertiliser.Types.UreaN, 10);
          Operations 1
            1991-02-01  [Fertiliser].Apply(17.8, Fertiliser.Types.NH4N, 10);
            1991-06-01  [Fertiliser].Apply(17.8, Fertiliser.Types.NH4N, 10);
            1991-10-01  [Fertiliser].Apply(17.8, Fertiliser.Types.NH4N, 10);
            1992-02-01  [Fertiliser].Apply(17.8, Fertiliser.Types.NH4N, 10);
            1992-06-01  [Fertiliser].Apply(17.8, Fertiliser.Types.NH4N, 10);
            1992-10-01  [Fertiliser].Apply(17.8, Fertiliser.Types.NH4N, 10);
            1993-02-01  [Fertiliser].Apply(17.8, Fertiliser.Types.NH4N, 10);
            1993-06-01  [Fertiliser].Apply(17.8, Fertiliser.Types.NH4N, 10);
            1993-10-01  [Fertiliser].Apply(17.8, Fertiliser.Types.NH4N, 10);
            1994-02-01  [Fertiliser].Apply(17.8, Fertiliser.Types.NH4N, 10);
            1994-06-01  [Fertiliser].Apply(17.8, Fertiliser.Types.NH4N, 10);
            1994-10-01  [Fertiliser].Apply(17.8, Fertiliser.Types.NH4N, 10);
            1995-02-01  [Fertiliser].Apply(17.8, Fertiliser.Types.NH4N, 10);
            1995-06-01  [Fertiliser].Apply(17.8, Fertiliser.Types.NH4N, 10);
            1995-10-01  [Fertiliser].Apply(17.8, Fertiliser.Types.NH4N, 10);
            1996-02-01  [Fertiliser].Apply(17.8, Fertiliser.Types.NH4N, 10);
            1996-06-01  [Fertiliser].Apply(17.8, Fertiliser.Types.NH4N, 10);
            1996-10-01  [Fertiliser].Apply(17.8, Fertiliser.Types.NH4N, 10);
            1997-02-01  [Fertiliser].Apply(17.8, Fertiliser.Types.NH4N, 10);
            1997-06-01  [Fertiliser].Apply(17.8, Fertiliser.Types.NH4N, 10);
            1997-10-01  [Fertiliser].Apply(17.8, Fertiliser.Types.NH4N, 10);
            1998-02-01  [Fertiliser].Apply(17.8, Fertiliser.Types.NH4N, 10);
            1998-06-01  [Fertiliser].Apply(17.8, Fertiliser.Types.NH4N, 10);
            1998-10-01  [Fertiliser].Apply(17.8, Fertiliser.Types.NH4N, 10);
            1999-02-01  [Fertiliser].Apply(17.8, Fertiliser.Types.NH4N, 10);
            1999-06-01  [Fertiliser].Apply(17.8, Fertiliser.Types.NH4N, 10);
            1999-10-01  [Fertiliser].Apply(17.8, Fertiliser.Types.NH4N, 10);
            2000-02-01  [Fertiliser].Apply(17.8, Fertiliser.Types.NH4N, 10);
            2000-06-01  [Fertiliser].Apply(17.8, Fertiliser.Types.NH4N, 10);
            2000-10-01  [Fertiliser].Apply(17.8, Fertiliser.Types.NH4N, 10);
            2001-02-01  [Fertiliser].Apply(17.8, Fertiliser.Types.NH4N, 10);
            2001-06-01  [Fertiliser].Apply(17.8, Fertiliser.Types.NH4N, 10);
            2001-10-01  [Fertiliser].Apply(17.8, Fertiliser.Types.NH4N, 10);
            2002-02-01  [Fertiliser].Apply(17.8, Fertiliser.Types.NH4N, 10);
            2002-06-01  [Fertiliser].Apply(17.8, Fertiliser.Types.NH4N, 10);
            2002-10-01  [Fertiliser].Apply(17.8, Fertiliser.Types.NH4N, 10);
            2003-02-01  [Fertiliser].Apply(17.8, Fertiliser.Types.NH4N, 10);
            2003-06-01  [Fertiliser].Apply(17.8, Fertiliser.Types.NH4N, 10);
            2003-10-01  [Fertiliser].Apply(17.8, Fertiliser.Types.NH4N, 10);
            2004-02-01  [Fertiliser].Apply(17.8, Fertiliser.Types.NH4N, 10);
            2004-06-01  [Fertiliser].Apply(17.8, Fertiliser.Types.NH4N, 10);
            2004-10-01  [Fertiliser].Apply(17.8, Fertiliser.Types.NH4N, 10);
            2005-02-01  [Fertiliser].Apply(17.8, Fertiliser.Types.NH4N, 10);
            2005-06-01  [Fertiliser].Apply(17.8, Fertiliser.Types.NH4N, 10);
            2005-10-01  [Fertiliser].Apply(17.8, Fertiliser.Types.NH4N, 10);
            2006-02-01  [Fertiliser].Apply(17.8, Fertiliser.Types.NH4N, 10);
            2006-06-01  [Fertiliser].Apply(17.8, Fertiliser.Types.NH4N, 10);
            2006-10-01  [Fertiliser].Apply(17.8, Fertiliser.Types.NH4N, 10);
            2007-02-01  [Fertiliser].Apply(17.8, Fertiliser.Types.NH4N, 10);
            2007-06-01  [Fertiliser].Apply(17.8, Fertiliser.Types.NH4N, 10);
            2007-10-01  [Fertiliser].Apply(17.8, Fertiliser.Types.NH4N, 10);
            2008-02-01  [Fertiliser].Apply(17.8, Fertiliser.Types.NH4N, 10);
            2008-06-01  [Fertiliser].Apply(17.8, Fertiliser.Types.NH4N, 10);
            2008-10-01  [Fertiliser].Apply(17.8, Fertiliser.Types.NH4N, 10);
          Operations 2
            1991-02-01  [Fertiliser].Apply(53.3, Fertiliser.Types.NH4N, 10);
            1991-06-01  [Fertiliser].Apply(53.3, Fertiliser.Types.NH4N, 10);
            1991-10-01  [Fertiliser].Apply(53.3, Fertiliser.Types.NH4N, 10);
            1992-02-01  [Fertiliser].Apply(53.3, Fertiliser.Types.NH4N, 10);
            1992-06-01  [Fertiliser].Apply(53.3, Fertiliser.Types.NH4N, 10);
            1992-10-01  [Fertiliser].Apply(53.3, Fertiliser.Types.NH4N, 10);
            1993-02-01  [Fertiliser].Apply(53.3, Fertiliser.Types.NH4N, 10);
            1993-06-01  [Fertiliser].Apply(53.3, Fertiliser.Types.NH4N, 10);
            1993-10-01  [Fertiliser].Apply(53.3, Fertiliser.Types.NH4N, 10);
            1994-02-01  [Fertiliser].Apply(53.3, Fertiliser.Types.NH4N, 10);
            1994-06-01  [Fertiliser].Apply(53.3, Fertiliser.Types.NH4N, 10);
            1994-10-01  [Fertiliser].Apply(53.3, Fertiliser.Types.NH4N, 10);
            1995-02-01  [Fertiliser].Apply(53.3, Fertiliser.Types.NH4N, 10);
            1995-06-01  [Fertiliser].Apply(53.3, Fertiliser.Types.NH4N, 10);
            1995-10-01  [Fertiliser].Apply(53.3, Fertiliser.Types.NH4N, 10);
            1996-02-01  [Fertiliser].Apply(53.3, Fertiliser.Types.NH4N, 10);
            1996-06-01  [Fertiliser].Apply(53.3, Fertiliser.Types.NH4N, 10);
            1996-10-01  [Fertiliser].Apply(53.3, Fertiliser.Types.NH4N, 10);
            1997-02-01  [Fertiliser].Apply(53.3, Fertiliser.Types.NH4N, 10);
            1997-06-01  [Fertiliser].Apply(53.3, Fertiliser.Types.NH4N, 10);
            1997-10-01  [Fertiliser].Apply(53.3, Fertiliser.Types.NH4N, 10);
            1998-02-01  [Fertiliser].Apply(53.3, Fertiliser.Types.NH4N, 10);
            1998-06-01  [Fertiliser].Apply(53.3, Fertiliser.Types.NH4N, 10);
            1998-10-01  [Fertiliser].Apply(53.3, Fertiliser.Types.NH4N, 10);
            1999-02-01  [Fertiliser].Apply(53.3, Fertiliser.Types.NH4N, 10);
            1999-06-01  [Fertiliser].Apply(53.3, Fertiliser.Types.NH4N, 10);
            1999-10-01  [Fertiliser].Apply(53.3, Fertiliser.Types.NH4N, 10);
            2000-02-01  [Fertiliser].Apply(53.3, Fertiliser.Types.NH4N, 10);
            2000-06-01  [Fertiliser].Apply(53.3, Fertiliser.Types.NH4N, 10);
            2000-10-01  [Fertiliser].Apply(53.3, Fertiliser.Types.NH4N, 10);
            2001-02-01  [Fertiliser].Apply(53.3, Fertiliser.Types.NH4N, 10);
            2001-06-01  [Fertiliser].Apply(53.3, Fertiliser.Types.NH4N, 10);
            2001-10-01  [Fertiliser].Apply(53.3, Fertiliser.Types.NH4N, 10);
            2002-02-01  [Fertiliser].Apply(53.3, Fertiliser.Types.NH4N, 10);
            2002-06-01  [Fertiliser].Apply(53.3, Fertiliser.Types.NH4N, 10);
            2002-10-01  [Fertiliser].Apply(53.3, Fertiliser.Types.NH4N, 10);
            2003-02-01  [Fertiliser].Apply(53.3, Fertiliser.Types.NH4N, 10);
            2003-06-01  [Fertiliser].Apply(53.3, Fertiliser.Types.NH4N, 10);
            2003-10-01  [Fertiliser].Apply(53.3, Fertiliser.Types.NH4N, 10);
            2004-02-01  [Fertiliser].Apply(53.3, Fertiliser.Types.NH4N, 10);
            2004-06-01  [Fertiliser].Apply(53.3, Fertiliser.Types.NH4N, 10);
            2004-10-01  [Fertiliser].Apply(53.3, Fertiliser.Types.NH4N, 10);
            2005-02-01  [Fertiliser].Apply(53.3, Fertiliser.Types.NH4N, 10);
            2005-06-01  [Fertiliser].Apply(53.3, Fertiliser.Types.NH4N, 10);
            2005-10-01  [Fertiliser].Apply(53.3, Fertiliser.Types.NH4N, 10);
            2006-02-01  [Fertiliser].Apply(53.3, Fertiliser.Types.NH4N, 10);
            2006-06-01  [Fertiliser].Apply(53.3, Fertiliser.Types.NH4N, 10);
            2006-10-01  [Fertiliser].Apply(53.3, Fertiliser.Types.NH4N, 10);
            2007-02-01  [Fertiliser].Apply(53.3, Fertiliser.Types.NH4N, 10);
            2007-06-01  [Fertiliser].Apply(53.3, Fertiliser.Types.NH4N, 10);
            2007-10-01  [Fertiliser].Apply(53.3, Fertiliser.Types.NH4N, 10);
            2008-02-01  [Fertiliser].Apply(53.3, Fertiliser.Types.NH4N, 10);
            2008-06-01  [Fertiliser].Apply(53.3, Fertiliser.Types.NH4N, 10);
            2008-10-01  [Fertiliser].Apply(53.3, Fertiliser.Types.NH4N, 10);
      Simulation Base504
        Weather: FileName=..\..\WeatherFiles\Sagarai.met
        Clock: Start=1991-03-01; End=2008-12-31
        Summary
        Zone Field: Area=1; Slope=0; AspectAngle=0; Altitude=50
          Fertiliser
          SurfaceOrganicMatter SurfaceOM: InitialResidueName=oilpalm; InitialResidueType=oilpalm; InitialResidueMass=0; InitialStandingFraction=0; InitialCPR=0; InitialCNR=0; FractionFaecesAdded=1
          Soil: SoilType=Alluvial Clay; Site=Sagarai Estate; NearestTown=Alotau; Region=Milne Bay Province; Latitude=0; Longitude=0
            Physical
              Thickness  BD    AirDry  LL15  DUL   SAT
              100        0.89  0.13    0.43  0.63  0.66
              200        0.99  0.13    0.43  0.58  0.62
              300        0.99  0.13    0.42  0.58  0.62
              300        1.13  0.13    0.44  0.54  0.57
              300        1.13  0.13    0.44  0.54  0.57
              300        1.13  0.13    0.44  0.54  0.57
              500        1.13  0.13    0.44  0.54  0.57
              500        1.13  0.13    0.44  0.54  0.57
              500        1.13  0.13    0.44  0.54  0.57
              SoilCrop OilPalmSoil: LL=[0.43, 0.43, 0.42, 0.44, 0.44, 0.44, 0.44, 0.44, 0.44]; KL=[0.03, 0.02, 0.015, 0.01, 0.01, 0.01, 0.01, 0.01, 0.01]; XF=[1, 1, 1, 1, 1, 1, 1, 1, 0]
            SoilWater: SummerDate=1-Nov; SummerU=5; SummerCona=5; WinterDate=1-Apr; WinterU=5; WinterCona=5; DiffusConst=40; DiffusSlope=16; Salb=0.18; CN2Bare=75; CNRed=20; CNCov=0.8; slope=0; discharge_width=0; catchment_area=0; max_pond=0; PrecipitationInterception=0
              Thickness  SWCON  KLAT
              100        0.55   0
              200        0.55   0
              300        0.55   0
              300        0.55   0
              300        0.55   0
              3800       0.55   0
            Organic: FOMCNRatio=30
              Thickness  Carbon     SoilCNRatio  FBiom  FInert  FOM
              200        4.12501    12           0.08   0.32    621.006
              200        2.94865    12           0.06   0.44    508.437
              200        1.43929    12           0.04   0.9     416.273
              200        0.999028   12           0.02   0.99    340.816
              200        0.835933   12           0.02   0.99    279.036
              200        0.900267   12           0.02   0.99    228.456
              200        0.738828   12           0.02   0.99    187.044
              200        0.7157782  12           0.02   0.99    153.138
              200        0.5792     12           0.02   0.99    125.379
              200        0.484944   12           0.02   0.99    102.652
              1000       0.485      12           0.02   0.99    37.7634
            Chemical
              Thickness  NO3N      NH4N  PH
              200        129.486   0     6.61912
              200        8.41751   0     6.905
              200        1.6835    0     6.05353
              200        1.47493   0     6.75754
              200        0.737463  0     6.37397
              200        0         0     6.90088
              200        0         0     6.90139
              200        0.5       0.1   6.87045
              200        1         0.2   7.00166
              200        1         0.2   7.08576
              1000       1         0.2   7.08576
            InitialWater Initial water: PercentMethod=1; FractionFull=1
            Sample Initial nitrogen: Thickness=[100, 200, 300, 300, 300, 300]; SWUnits=Volumetric; OCUnits=Total; PHUnits=Water
            CERESSoilTemperature
            Nutrient: same as Validation.Sangara.Base324.Field.Soil.Nutrient
          Report AnnualOutput: same as Validation.Sangara.Base324.Field.AnnualOutput
          Report MonthlyOutput: same as Validation.Sangara.Base324.Field.MonthlyOutput
          MicroClimate: a_interception=0; b_interception=1; c_interception=0; d_interception=0; soil_albedo=0.23; SoilHeatFluxFraction=0.4; MinimumHeightDiffForNewLayer=0; NightInterceptionFraction=0.5; ReferenceHeight=2
          Operations: same as Validation.Sagarai.Factors.N.0
          OilPalm: LAI=0; UnderstoryCoverMax=0.4; UnderstoryLegumeFraction=1; MaximumRootDepth=5000; RootDepth=0; DltDM=0; ReproductiveGrowthFraction=0; UnderstoryCoverGreen=0
          Irrigation
          Manager Palm Management
            sowing_date = 1991-03-01
            population = 127
            cultivar = Dami
            sowing_depth = 200
            Plant_population = 0
            script: same as in Validation.Sangara.Base324.Field.Palm Management
          Manager Calculations: same as Validation.Sangara.Base324.Field.Calculations
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