Simulations: Version=163
  Folder Replacements
    Report: EventNames=[Clock].DoReport
      VariableNames:
        [Clock].Today
        [Potato].AboveGround.N
        [Potato].BelowGround.N
        [Potato].Leaf.AppearedCohortNo
        [Potato].Leaf.CoverDead
        [Potato].Leaf.CoverGreen
        [Potato].Leaf.CoverTotal
        [Potato].Leaf.Dead.N
        [Potato].Leaf.Dead.NConc
        [Potato].Leaf.DeadCohortNo
        [Potato].Leaf.ExpandedCohortNo
        [Potato].Leaf.ExpandingCohortNo
        [Potato].Leaf.Fn
        [Potato].Leaf.Fw
        [Potato].Leaf.LAI
        [Potato].Leaf.LAIDead
        [Potato].Leaf.Live.N
        [Potato].Leaf.Live.Wt
        [Potato].Leaf.Live.NConc
        [Potato].Leaf.PlantAppearedGreenLeafNo
        [Potato].Leaf.SenescingCohortNo
        [Potato].Leaf.SpecificArea
        [Potato].Phenology.CurrentPhase.Name
        [Potato].Phenology.Stage
        [Potato].Root.Dead.N
        [Potato].Root.Dead.NConc
        [Potato].Root.Dead.Wt
        [Potato].Root.Depth
        [Potato].Root.Live.N
        [Potato].Root.Live.NConc
        [Potato].Root.Live.Wt
        [Potato].Stem.Dead.N
        [Potato].Stem.Dead.NConc
        [Potato].Stem.Live.N
        [Potato].Stem.Live.NConc
        [Potato].Stem.Live.StorageWt
        [Potato].Stem.Live.StructuralWt
        [Potato].Stem.Live.Wt
        [Potato].Structure.Height
        [Potato].Structure.LeafTipsAppeared
        [Potato].Structure.PlantTotalNodeNo
        [Potato].Structure.PrimaryBudTotalNodeNo
        [Potato].Structure.TotalStemPopn
        [Potato].Total.N
        [Potato].TotalDead.N
        [Potato].TotalLive.N
        [Potato].TotalLive.Wt
        [Potato].Tuber.Dead.N
        [Potato].Tuber.Dead.NConc
        [Potato].Tuber.Dead.Wt
        [Potato].Tuber.LiveFWt.DryMatterContent
        [Potato].Tuber.Live.N
        [Potato].Tuber.Live.NConc
        [Potato].Tuber.Live.Wt
        [Potato].Tuber.LiveFWt
        [PlantandHarvest].Script.FinalTag
  DataStore
    ExcelInput Observed: FileNames=[Observed.xlsx]; SheetNames=[Observed]
    PredictedObserved TimeSeriesData: PredictedTableName=Report; ObservedTableName=Observed; FieldNameUsedForMatch=SimulationName; FieldName2UsedForMatch=Clock.Today; AllColumns=false
    PredictedObserved FinalYieldData: PredictedTableName=Report; ObservedTableName=Observed; FieldNameUsedForMatch=SimulationName; FieldName2UsedForMatch=PlantandHarvest.Script.FinalTag; AllColumns=false
  Folder Validation
    Memo
      A test dataset has been developed to test the APSIM Potato model for a range of environmental (soil and climate) conditions, management options (sowing dates, populations, nitrogen rates) and genetic backgrounds (different regions, cultivar types).  These tests have been grouped into various geographical regions to allow users to evaluate the suitability of the model for their particular region of interest.  Graphs of model performance are provided for yield, biomass production, canopy development and nitrogen uptake.
    Folder Combined Results
      Memo Combined Results
        Simulation results for the combined datasets from the various countries are shown in the following graphs.  The model is able to adequately capture the influence of growing conditions (soil, climate) and management (population, nitrogen,  sowing date).
    Folder New Zealand
      Memo
        **Model development**

        A range of experimental data has been collected by Plant and Food Research over a long period and was available for fitting thet growth and development parameters for the potato model.

        * **ABlock** experiment was used for fitting leaf appearance and size parameters and biomass production and partitioning
        * **Baxters** experiment was used for fitting branching parameters
        * **FUE** experiment was used for fitting nitrogen responses
        * **FUE_NI** experiment was used for fitting nitrogen response in winter grown potato
        * **FSP** experiment was used for fitting growth and development parameters in cooler situations
      Experiment ABlock
        Memo
          This trial was run in A Block of the Plant and Food Research farm on a templeton silt loam, which is a deep, stone free soil of high plant available water capacity (160 mm/m).  8 cultivars of potato were planted representing a range of commercially important varieties in New Zealand:

          * Russet Burbank is a main crop variety grown for processing into fries
          * Jersey is a short variety grown for early table potato production
          * Red Rascal is a main crop table potato variety
          * Horizon is a main crop tabel variety
          * Ilam hardy is commonly grown as an early table variety
          * Karaka is a crisping variety
          * Nooksac  is a main crop variety grown for processing into fries
          * Rua is a main crop table potato variety

          All potatoes were planted on 20/10/2003 and irrigated, fertiliser and pesticide were applied to ensure the crop remaind unstressed and healthy.  Each variety was intensively sampled throughout the growth period to provide data for developing cultivar parameters for different varieties.
        Factors
          Factor Cultivar
            CompositeFactor Burbank
              Specifications:
                [PlantandHarvest].Script.CultivarName=RussetBurbank
                [PlantandHarvest].Script.StemNumberPerSeedTuber=2.2
                [PlantandHarvest].Script.PlantingDepth=120
            CompositeFactor Horizon
              Specifications:
                [PlantandHarvest].Script.CultivarName=Horizon
                [PlantandHarvest].Script.StemNumberPerSeedTuber=3.2
                [PlantandHarvest].Script.PlantingDepth=135
            CompositeFactor IlamHardy
              Specifications:
                [PlantandHarvest].Script.CultivarName=IlamHardy
                [PlantandHarvest].Script.StemNumberPerSeedTuber=4.63
                [PlantandHarvest].Script.PlantingDepth=135
            CompositeFactor JerseyBenny
              Specifications:
                [PlantandHarvest].Script.CultivarName=JerseyBenny
                [PlantandHarvest].Script.StemNumberPerSeedTuber=3.6
                [PlantandHarvest].Script.PlantingDepth=160
            CompositeFactor Karaka
              Specifications:
                [PlantandHarvest].Script.CultivarName=Karaka
                [PlantandHarvest].Script.StemNumberPerSeedTuber=3
                [PlantandHarvest].Script.PlantingDepth=135
            CompositeFactor Nooksac
              Specifications:
                [PlantandHarvest].Script.CultivarName=Nooksac
                [PlantandHarvest].Script.StemNumberPerSeedTuber=2.3
                [PlantandHarvest].Script.PlantingDepth=165
            CompositeFactor RedRascal
              Specifications:
                [PlantandHarvest].Script.CultivarName=RedRascal
                [PlantandHarvest].Script.StemNumberPerSeedTuber=4.87
                [PlantandHarvest].Script.PlantingDepth=140
            CompositeFactor Rua
              Specifications:
                [PlantandHarvest].Script.CultivarName=Rua
                [PlantandHarvest].Script.StemNumberPerSeedTuber=2.55
                [PlantandHarvest].Script.PlantingDepth=140
        Simulation RussetBurbank
          Weather: FileName=lincoln.met
          Clock: Start=2003-10-20; End=2004-06-05
          Summary
          SoilArbitrator Soil Arbitrator
          Zone Field: Area=1; Slope=0; AspectAngle=0; Altitude=50
            Soil: SoilType=Sedementary; LocalName=Lincoln; Latitude=0; Longitude=0
              Physical
                Thickness  BD   AirDry  LL15  DUL   SAT
                100        1.2  0.08    0.16  0.33  0.5
                200        1.2  0.01    0.16  0.33  0.5
                300        1.2  0.01    0.15  0.31  0.44
                300        1.2  0.01    0.13  0.27  0.46
                300        1.2  0.01    0.15  0.3   0.44
                300        1.2  0.01    0.15  0.3   0.44
                SoilCrop PotatoSoil: LL=[0.13, 0.13, 0.1, 0.15, 0.3, 0.3]; KL=[0.1, 0.06, 0.04, 0.01, 0, 0]; XF=[1, 1, 1, 1, 0, 0]
              WaterBalance SoilWater: SummerDate=1-Nov; SummerU=9; SummerCona=4.4; WinterDate=1-Apr; WinterU=9; WinterCona=4.4; DiffusConst=88; DiffusSlope=35.4; Salb=0.18; CN2Bare=0; CNRed=-9e-05; CNCov=0; DischargeWidth=0; CatchmentArea=0; PSIDul=-100
                Thickness  SWCON  KLAT
                100        0.55   0
                200        0.55   0
                300        0.55   0
                300        0.55   0
                300        0.55   0
                300        0.55   0
              Organic: FOMCNRatio=30; CarbonUnits=Total
                Thickness  Carbon  SoilCNRatio  FBiom  FInert  FOM
                100        3.5     11.5         0.025  0.3     1243.93
                200        2.5     11.5         0.025  0.4     833.832
                300        1.2     11.5         0.015  0.75    457.617
                300        1.03    11.5         0.01   0.9     251.145
                300        0.47    11.5         0.01   0.96    137.831
                300        0.47    11.5         0.01   0.96    75.6435
              Chemical: Thickness=[100, 200, 300, 300, 300, 300]; PH=[6.6, 6.2, 5.7, 5.5, 5.5, 5.5]; PHUnits=Water
              Water: Thickness=[100, 200, 300, 300, 300, 300]; InitialValues=[0.33, 0.33, 0.31, 0.27, 0.3, 0.3]; InitialPAWmm=231; RelativeTo=LL15; FilledFromTop=true
              CERESSoilTemperature Temperature
              Nutrient
              Solute NO3: Thickness=[100, 200, 300, 300, 300, 300]; InitialValues=[33.3333, 12.5, 3.88889, 3.88889, 0.383333, 0.383333]; InitialValuesUnits=ppm; WaterTableConcentration=0; D0=0; DepthConstant=0; MaxDepthSoluteAccessible=0; RunoffEffectivenessAtMovingSolute=0; MaxEffectiveRunoff=0
              Solute NH4: Thickness=[100, 200, 300, 300, 300, 300]; InitialValuesUnits=ppm; WaterTableConcentration=0; D0=0; DepthConstant=0; MaxDepthSoluteAccessible=0; RunoffEffectivenessAtMovingSolute=0; MaxEffectiveRunoff=0
                InitialValues=[0.0833333, 0.0416667, 0.0277778, 0.0277778, 0.0277778, 0.0277778]
              Solute Urea: Thickness=[100, 200, 300, 300, 300, 300]; InitialValues=[0, 0, 0, 0, 0, 0]; InitialValuesUnits=kg/ha; WaterTableConcentration=0; D0=0; DepthConstant=0; MaxDepthSoluteAccessible=0; RunoffEffectivenessAtMovingSolute=0; MaxEffectiveRunoff=0
            SurfaceOrganicMatter: InitialResidueName=Wheat; InitialResidueType=Wheat; InitialResidueMass=2000; InitialStandingFraction=0; InitialCPR=0; InitialCNR=80
            Irrigation
            Fertiliser
            MicroClimate: a_interception=0; b_interception=1; c_interception=0; d_interception=0; SoilHeatFluxFraction=0.4; MinimumHeightDiffForNewLayer=0; NightInterceptionFraction=0.5; ReferenceHeight=2
            Plant Potato
            Folder Management
              Operations
                2003-10-20  [Fertiliser].Apply(100, Fertiliser.Types.UreaN, 0);
                2003-11-25  [Fertiliser].Apply(69, Fertiliser.Types.UreaN,0);
                2003-11-26  [Irrigation].Apply(15);
                2003-12-04  [Irrigation].Apply(50);
                2003-12-16  [Irrigation].Apply(15);
                2003-12-22  [Irrigation].Apply(50);
                2003-12-30  [Irrigation].Apply(50);
                2004-01-08  [Irrigation].Apply(50);
                2004-01-21  [Irrigation].Apply(50);
                2004-01-31  [Irrigation].Apply(50);
                2004-02-27  [Irrigation].Apply(25);
              Manager PlantandHarvest
                PlantingDate = 10/20/2003 00:00:00
                CultivarName = RussetBurbank
                RowSpace = 280
                RowWidth = 770
                PlantingDepth = 120
                StemNumberPerSeedTuber = 2.2
                SetFinalLeafNumber = 0
                HarvestDate = 06/01/2004 00:00:00
```csharp
using Models.Soils;
using Models.PMF.Phen;
using System.Xml.Serialization;
using APSIM.Shared.Utilities;
using Models.PMF;
using Models.Core;
using System;
using Models.PMF.Struct;
using Newtonsoft.Json;
        
namespace Models
{
    [Serializable] 
    [System.Xml.Serialization.XmlInclude(typeof(Model))]
    public class Script : Model
    {
        [Link] private Plant Potato;
        [Link] private Clock Clock;
        [Link] private Zone zone;
        [Link] private Summary Summary;
        [Link(Type = LinkType.Path, Path = "[Potato].Structure")]
        private Structure structure;
        [Link(Type = LinkType.Path, Path = "[Potato].Phenology")]
        private Phenology phenology;
        
        [Description("Planting Date")]
        public DateTime PlantingDate { get; set; }
        [Description("Cultivar")]
        [Display(Type=DisplayType.CultivarName)]
        public string CultivarName { get; set; }
        [Description("Spacing (mm) between plants within rows")]
        public double RowSpace { get; set; }
        [Description("Spacing (mm) between rows")]
        public double RowWidth { get; set; }
        [Description("Depth (mm) tubers are planted")]
        public double PlantingDepth { get; set; }
        [Description("Number of stems per seed tuber")]
        public double StemNumberPerSeedTuber { get; set; }
        [Description("Final leaf number.  Leave at 0 if not known")]
        public double SetFinalLeafNumber { get; set; }
        [Description("HarvestDate Date")]
        public DateTime HarvestDate { get; set; }
        
        [JsonIgnore] public string FinalTag { get; set; }
        [JsonIgnore] public bool Harvested { get; set; }
        [JsonIgnore] public bool ReadyForHarvest { get; set; }
        
        
        [EventSubscribe("StartOfSimulation")]
        private void OnSimulationCommencing(object sender, EventArgs e)
        {
            FinalTag = "";
            Harvested = false;
            ReadyForHarvest = false;
        }
        
        [EventSubscribe("DoManagement")]
        private void OnDoManagement(object sender, EventArgs e)
        {
            double PlantPopulation = 1 / ((RowWidth / 1000) * (RowSpace / 1000));

            if (Clock.Today.Date == PlantingDate)
                Potato.Sow(population: PlantPopulation, cultivar: CultivarName, depth: PlantingDepth, rowSpacing: 150, budNumber: StemNumberPerSeedTuber);
            
            if (ReadyForHarvest == true)
            {
                Potato.Harvest();
                Potato.EndCrop();
                ReadyForHarvest = false;
                Harvested = true;
                Summary.WriteMessage(this, "is working", MessageType.Diagnostic);
            }
            FinalTag = "";   
            
            if (SetFinalLeafNumber > 0)
                zone.Set("Potato.Structure.FinalLeafNumber.FixedValue", SetFinalLeafNumber);
            if (SetFinalLeafNumber > 80)
                Summary.WriteMessage(this, "Model is producing > 80 leaves which is guite alot.  Is this expected?  If not check you haven't set a invalid number in the Final Leaf Number box in" + this.Name, MessageType.Warning);
        }
        
        [EventSubscribe("DoManagementCalculations")]
        private void OnDoManagementCalculations(object sender, EventArgs e)
        {
            if ((Clock.Today == HarvestDate) && (Harvested == false))
            {
                FinalTag = "yield";
                ReadyForHarvest = true;
            }
            //if ((phenology.Stage >= 7) && (Harvested == false))
            //{
            //    FinalTag = "yield";
            //    ReadyForHarvest = true;
            //}
        }
    }
}
```
            Report: EventNames=[Clock].DoReport
      Experiment Baxters
        Memo
          **Sowing date and Sowing Density Experiment**

          This trial was run in Baxters block of the Plant and Food Research farm on a shallow templeton silt loam, which had a compacted layer from 30-60 cm above a stony sub soil below 60cm.  Russet Burbank potatoes were planted on 3 dates:

          * 14 October 1999
          * 2 November 1999
          * 23 November 1999

          Two populations were established at each planting:

          * 2 Plants/m^2^
          * 4 Plants/m^2^

          Fertiliser and pesticide were applied to ensure the crop remaind unstressed and healthy but irrigation was somewhat limited and did constrain growth at times.  Each treatment intensively sampled throughout the growth period to provide data for developing cultivar parameters for different varieties.  The same seed line was used for each sowing date so seed was becoming progressively more mature with leater plantings.  As such the stem number per plant increaesed from 3 - 5.7 from the early to the late sowing and and the final leaf number decreased.  The differences in canopy and production between the population treatments were very small becasue the low population treatment branched extensively.  This combination of different stem numbers and populations provided an excelent data set for parameterising branching.
        Factors
          Permutation
            Factor PlantingDate
              CompositeFactor 14Oct
                Specifications:
                  [PlantandHarvest].Script.PlantingDate=1998-10-14
                  [PlantandHarvest].Script.PlantingDepth=200
                  [PlantandHarvest].Script.StemNumberPerSeedTuber=3.0
                  [PlantandHarvest].Script.SetFinalLeafNumber=40
              CompositeFactor 2Nov
                Specifications:
                  [PlantandHarvest].Script.PlantingDate=1998-11-02
                  [PlantandHarvest].Script.PlantingDepth=160
                  [PlantandHarvest].Script.StemNumberPerSeedTuber=3.8
                  [PlantandHarvest].Script.SetFinalLeafNumber=34
              CompositeFactor 23Nov
                Specifications:
                  [PlantandHarvest].Script.PlantingDate=1998-11-23
                  [PlantandHarvest].Script.PlantingDepth=120
                  [PlantandHarvest].Script.StemNumberPerSeedTuber=5.7
                  [PlantandHarvest].Script.SetFinalLeafNumber=28
            Factor PlantDensity
              CompositeFactor 4: Specifications=[PlantandHarvest].Script.RowSpace=300
              CompositeFactor 2: Specifications=[PlantandHarvest].Script.RowSpace=600
        Simulation BaxtersBase
          Weather: FileName=lincoln.met
          Clock: Start=1998-10-14; End=1999-05-01
          Summary
          SoilArbitrator Soil Arbitrator
          Zone Field: Area=1; Slope=0; AspectAngle=0; Altitude=50
            Soil: Latitude=0; Longitude=0
              Chemical: Thickness=[100, 200, 300, 300, 300, 300]; PH=[6.6, 6.2, 5.7, 5.5, 5.5, 5.5]; PHUnits=Water
              Water: Thickness=[100, 200, 300, 300, 300, 300]; InitialValues=[0.33, 0.33, 0.31, 0.3, 0.3, 0.3]; InitialPAWmm=357; RelativeTo=LL15; FilledFromTop=false
              Physical
                Thickness  BD   AirDry  LL15  DUL   SAT
                100        1.2  0.08    0.13  0.33  0.5
                200        1.2  0.13    0.13  0.33  0.5
                300        1.2  0.1     0.1   0.31  0.44
                300        1.2  0.06    0.06  0.3   0.46
                300        1.2  0.04    0.04  0.3   0.44
                300        1.2  0.02    0.02  0.3   0.44
                SoilCrop WheatSoil: LL=[0.13, 0.13, 0.1, 0.08, 0.11, 0.11]; KL=[0.06, 0.06, 0.06, 0.06, 0.06, 0.06]; XF=[1, 1, 1, 1, 1, 1]
                SoilCrop PotatoSoil: LL=[0.13, 0.13, 0.27, 0.27, 0.3, 0.3]; KL=[0.1, 0.06, 0.03, 0.01, 0, 0]; XF=[1, 1, 0.1, 0, 0, 0]
              WaterBalance SoilWater: SummerDate=1-Nov; SummerU=9; SummerCona=4.4; WinterDate=1-Apr; WinterU=9; WinterCona=4.4; DiffusConst=88; DiffusSlope=35.4; Salb=0.18; CN2Bare=68; CNRed=20; CNCov=0.8; DischargeWidth=0; CatchmentArea=0; PSIDul=-100
                Thickness  SWCON  KLAT
                100        0.55   0
                200        0.55   0
                300        0.55   0
                300        0.55   0
                300        0.55   0
                300        0.55   0
              Organic: FOMCNRatio=30; CarbonUnits=Total
                Thickness  Carbon  SoilCNRatio  FBiom  FInert  FOM
                100        1.82    11.5         0.025  0.3     1243.93
                200        1.47    11.5         0.025  0.4     833.832
                300        1.2     11.5         0.015  0.75    457.617
                300        1.03    11.5         0.01   0.9     251.145
                300        0.47    11.5         0.01   0.96    137.831
                300        0.47    11.5         0.01   0.96    75.6435
              CERESSoilTemperature Temperature
              Nutrient
              Solute NO3: Thickness=[100, 200, 300, 300, 300, 300]; InitialValues=[180.833, 12.5, 1.38889, 1.38889, 0, 0]; InitialValuesUnits=ppm; WaterTableConcentration=0; D0=0; DepthConstant=0; MaxDepthSoluteAccessible=0; RunoffEffectivenessAtMovingSolute=0; MaxEffectiveRunoff=0
              Solute NH4: Thickness=[100, 200, 300, 300, 300, 300]; InitialValues=[0, 0, 0, 0, 0, 0]; InitialValuesUnits=ppm; WaterTableConcentration=0; D0=0; DepthConstant=0; MaxDepthSoluteAccessible=0; RunoffEffectivenessAtMovingSolute=0; MaxEffectiveRunoff=0
              Solute Urea: same as Validation.New Zealand.ABlock.RussetBurbank.Field.Soil.Urea
            Irrigation
            Fertiliser
            MicroClimate: a_interception=0; b_interception=1; c_interception=0; d_interception=0; SoilHeatFluxFraction=0.4; MinimumHeightDiffForNewLayer=0; NightInterceptionFraction=0.5; ReferenceHeight=2
            Plant Potato
            Report: EventNames=[Clock].DoReport
            SurfaceOrganicMatter surface organic matter: InitialResidueName=wheat; InitialResidueType=wheat; InitialResidueMass=2000; InitialStandingFraction=0; InitialCPR=0; InitialCNR=80
            Folder Management
              Operations
                1998-10-02  [Irrigation].Apply(40);
                1998-10-26  [Irrigation].Apply(70);
                1998-12-15  [Irrigation].Apply(70);
                1998-12-29  [Irrigation].Apply(10);
                1998-12-30  [Irrigation].Apply(55);
                1999-01-07  [Irrigation].Apply(50);
                1999-01-21  [Irrigation].Apply(40);
                1999-02-10  [Irrigation].Apply(28);
                1999-02-19  [Irrigation].Apply(15);
                1999-03-09  [Irrigation].Apply(25);
                1998-12-29  [Fertiliser].Apply(150, Fertiliser.Types.UreaN, 10);
              Manager PlantandHarvest
                PlantingDate = 1998-10-14
                CultivarName = RussetBurbank
                RowSpace = 300
                RowWidth = 770
                PlantingDepth = 200
                StemNumberPerSeedTuber = 3
                SetFinalLeafNumber = 34
                HarvestDate = 1999-04-27
```csharp
using Models.Soils;
using Models.PMF.Phen;
using System.Xml.Serialization;
using APSIM.Shared.Utilities;
using Models.PMF;
using Models.Core;
using System;
using Models.PMF.Struct;
using Newtonsoft.Json;
        
namespace Models
{
    [Serializable] 
    [System.Xml.Serialization.XmlInclude(typeof(Model))]
    public class Script : Model
    {
        [Link] private Plant Potato;
        [Link] private Clock Clock;
        [Link] private Zone zone;
        [Link] private Summary Summary;
        [Link(Type = LinkType.Path, Path = "[Potato].Structure")]
        private Structure structure;
        [Link(Type = LinkType.Path, Path = "[Potato].Phenology")]
        private Phenology phenology;
        
        [Description("Planting Date")]
        public DateTime PlantingDate { get; set; }
        [Description("Cultivar")]
        [Display(Type=DisplayType.CultivarName)]
        public string CultivarName { get; set; }
        [Description("Spacing (mm) between plants within rows")]
        public double RowSpace { get; set; }
        [Description("Spacing (mm) between rows")]
        public double RowWidth { get; set; }
        [Description("Depth (mm) tubers are planted")]
        public double PlantingDepth { get; set; }
        [Description("Number of stems per seed tuber")]
        public double StemNumberPerSeedTuber { get; set; }
        [Description("Final leaf number.  Leave at 0 if not known")]
        public int SetFinalLeafNumber { get; set; }
        [Description("HarvestDate Date")]
        public DateTime HarvestDate { get; set; }
        
        [JsonIgnore] public string FinalTag { get; set; }
        [JsonIgnore] public bool Harvested { get; set; }
        [JsonIgnore] public bool ReadyForHarvest { get; set; }
        
        [EventSubscribe("StartOfSimulation")]
        private void OnSimulationCommencing(object sender, EventArgs e)
        {
            FinalTag = "";
            Harvested = false;
            ReadyForHarvest = false;
        }
        
        [EventSubscribe("DoManagement")]
        private void OnDoManagement(object sender, EventArgs e)
        {
            double PlantPopulation = 1 / ((RowWidth / 1000) * (RowSpace / 1000));

            if (Clock.Today.Date == PlantingDate)
                Potato.Sow(population: PlantPopulation, cultivar: CultivarName, depth: PlantingDepth, rowSpacing: 150, budNumber: StemNumberPerSeedTuber);
            
            if (ReadyForHarvest == true)
            {
                Potato.Harvest();
                Potato.EndCrop();
                ReadyForHarvest = false;
                Harvested = true;
                Summary.WriteMessage(this, "is working", MessageType.Diagnostic);
            }
            FinalTag = "";   
            
            if (SetFinalLeafNumber > 0)
                zone.Set("Potato.Structure.FinalLeafNumber.FixedValue", SetFinalLeafNumber);
            if (SetFinalLeafNumber > 80)
                Summary.WriteMessage(this, "Model is producing > 80 leaves which is guite alot.  Is this expected?  If not check you haven't set a invalid number in the Final Leaf Number box in" + this.Name, MessageType.Warning);
        }
        
        [EventSubscribe("DoManagementCalculations")]
        private void OnDoManagementCalculations(object sender, EventArgs e)
        {
            if ((Clock.Today == HarvestDate) && (Harvested == false))
            {
                FinalTag = "yield";
                ReadyForHarvest = true;
            }
            if ((phenology.Stage >= 7) && (Harvested == false))
            {
                FinalTag = "yield";
                ReadyForHarvest = true;
            }
        }
    }
}
```
      Experiment FUE
        Memo
          **Fertiliser Use Efficiency experiment (FUE)**

          This trial was run in A Block of the Plant and Food Research farm on a templeton silt loam, which is a deep, stone free soil of high plant available water capacity (160 mm/m).  Russet burbank potatos were planted on the 21st of October 1999 and irrigation and pesticide were applied to avoid stresses.  Different nitrogen fertiliser treatments were applied:

          * Nil
          * 150 kg/ha applied at planting
          * 300 kg/ha applied at planting
          * 275 kg/ha in split application of 25kg/ha weekly
        Factors
          Factor Nitrogen: Specification=[FertiliserApplications]
            Operations 300early
              1999-10-19  [Fertiliser].Apply(150, Fertiliser.Types.UreaN, 10);
              1999-12-01  [Fertiliser].Apply(150, Fertiliser.Types.UreaN, 10);
            Operations 150early
              1999-10-19  [Fertiliser].Apply(150, Fertiliser.Types.UreaN, 10);
            Operations 275split
              1999-10-19  [Fertiliser].Apply(100, Fertiliser.Types.UreaN, 10);
              1999-12-01  [Fertiliser].Apply(25, Fertiliser.Types.UreaN, 10);
              1999-12-13  [Fertiliser].Apply(25, Fertiliser.Types.UreaN, 10);
              2000-01-17  [Fertiliser].Apply(13, Fertiliser.Types.UreaN, 10);
              2000-01-21  [Fertiliser].Apply(13, Fertiliser.Types.UreaN, 10);
              2000-01-24  [Fertiliser].Apply(13, Fertiliser.Types.UreaN, 10);
              2000-01-31  [Fertiliser].Apply(13, Fertiliser.Types.UreaN, 10);
              2000-02-07  [Fertiliser].Apply(13, Fertiliser.Types.UreaN, 10);
              2000-02-14  [Fertiliser].Apply(13, Fertiliser.Types.UreaN, 10);
              2000-02-21  [Fertiliser].Apply(13, Fertiliser.Types.UreaN, 10);
              2000-02-28  [Fertiliser].Apply(13, Fertiliser.Types.UreaN, 10);
              2000-03-06  [Fertiliser].Apply(13, Fertiliser.Types.UreaN, 10);
              2000-03-13  [Fertiliser].Apply(13, Fertiliser.Types.UreaN, 10);
              2000-03-20  [Fertiliser].Apply(13, Fertiliser.Types.UreaN, 10);
              2000-03-27  [Fertiliser].Apply(13, Fertiliser.Types.UreaN, 10);
            Operations Nil
        Simulation FUE_base
          Weather: FileName=lincoln.met
          Clock: Start=1999-10-19; End=2000-06-30
          Summary
          SoilArbitrator Soil Arbitrator
          Zone paddock: Area=1; Slope=0; AspectAngle=0; Altitude=50
            Soil: Latitude=0; Longitude=0
              Chemical: Thickness=[100, 200, 300, 300, 300, 300]; PH=[6.6, 6.2, 5.7, 5.5, 5.5, 5.5]; PHUnits=Water
              Water: Thickness=[100, 200, 300, 300, 300, 300]; InitialValues=[0.33, 0.33, 0.31, 0.27, 0.3, 0.3]; InitialPAWmm=237; RelativeTo=LL15; FilledFromTop=false
              Physical
                Thickness  BD   AirDry  LL15  DUL   SAT
                100        1.2  0.08    0.16  0.33  0.5
                200        1.2  0.01    0.16  0.33  0.5
                300        1.2  0.01    0.14  0.31  0.44
                300        1.2  0.01    0.11  0.27  0.46
                300        1.2  0.01    0.16  0.3   0.44
                300        1.2  0.01    0.15  0.3   0.44
                SoilCrop WheatSoil: LL=[0.13, 0.13, 0.1, 0.08, 0.11, 0.11]; KL=[0.06, 0.06, 0.06, 0.06, 0.06, 0.06]; XF=[1, 1, 1, 1, 1, 1]
                SoilCrop PotatoSoil: LL=[0.13, 0.13, 0.1, 0.15, 0.3, 0.3]; KL=[0.1, 0.06, 0.04, 0.01, 0, 0]; XF=[1, 1, 1, 1, 0, 0]
              WaterBalance SoilWater: same as Validation.New Zealand.Baxters.BaxtersBase.Field.Soil.SoilWater
              Organic: FOMCNRatio=30; CarbonUnits=Total
                Thickness  Carbon  SoilCNRatio  FBiom  FInert  FOM
                100        4.5     11.5         0.025  0.3     1243.93
                200        3.5     11.5         0.025  0.3     833.832
                300        1.2     11.5         0.015  0.75    457.617
                300        1.03    11.5         0.01   0.9     251.145
                300        0.47    11.5         0.01   0.96    137.831
                300        0.47    11.5         0.01   0.96    75.6435
              CERESSoilTemperature Temperature
              Nutrient
              Solute NO3: Thickness=[100, 200, 300, 300, 300, 300]; InitialValues=[12.5, 14.7917, 8.47222, 11.3095, 0.595238, 0.595238]; InitialValuesUnits=ppm; WaterTableConcentration=0; D0=0; DepthConstant=0; MaxDepthSoluteAccessible=0; RunoffEffectivenessAtMovingSolute=0; MaxEffectiveRunoff=0
              Solute NH4: Thickness=[100, 200, 300, 300, 300, 300]; InitialValues=[0.1, 0.175, 0.15, 0.114286, 0.0428571, 0.0428571]; InitialValuesUnits=ppm; WaterTableConcentration=0; D0=0; DepthConstant=0; MaxDepthSoluteAccessible=0; RunoffEffectivenessAtMovingSolute=0; MaxEffectiveRunoff=0
              Solute Urea: same as Validation.New Zealand.ABlock.RussetBurbank.Field.Soil.Urea
            Fertiliser
            Irrigation
            SurfaceOrganicMatter surface organic matter: InitialResidueName=wheat; InitialResidueType=wheat; InitialResidueMass=0; InitialStandingFraction=0; InitialCPR=0; InitialCNR=60
            MicroClimate: a_interception=0; b_interception=0; c_interception=0; d_interception=0; SoilHeatFluxFraction=0.4; MinimumHeightDiffForNewLayer=0; NightInterceptionFraction=0.5; ReferenceHeight=2
            Plant Potato
            Folder Manager folder
              Operations IrrigationApplications
                1999-12-09  [Irrigation].Apply(55);
                1999-12-23  [Irrigation].Apply(25);
                1999-12-30  [Irrigation].Apply(25);
                2000-01-21  [Irrigation].Apply(38);
                2000-02-10  [Irrigation].Apply(50);
                2000-02-16  [Irrigation].Apply(25);
                2000-03-01  [Irrigation].Apply(38);
              Operations FertiliserApplications: same as Validation.New Zealand.FUE.Factors.Nitrogen.275split
              Manager PlantandHarvest
                PlantingDate = 1999-10-21
                CultivarName = RussetBurbank
                RowSpace = 280
                RowWidth = 770
                PlantingDepth = 170
                StemNumberPerSeedTuber = 5
                SetFinalLeafNumber = 28
                HarvestDate = 2000-04-03
```csharp
using Models.Soils;
using Models.PMF.Phen;
using System.Xml.Serialization;
using APSIM.Shared.Utilities;
using Models.PMF;
using Models.Core;
using System;
using Models.PMF.Struct;
using Newtonsoft.Json;
        
namespace Models
{
    [Serializable] 
    [System.Xml.Serialization.XmlInclude(typeof(Model))]
    public class Script : Model
    {
        [Link] private Plant Potato;
        [Link] private Clock Clock;
        [Link] private Zone zone;
        [Link] private Summary Summary;
        [Link(Type = LinkType.Path, Path = "[Potato].Structure")]
        private Structure structure;
        [Link(Type = LinkType.Path, Path = "[Potato].Phenology")]
        private Phenology phenology;
        
        [Description("Planting Date")]
        public DateTime PlantingDate { get; set; }
        [Description("Cultivar")]
        [Display(Type=DisplayType.CultivarName)]
        public string CultivarName { get; set; }
        [Description("Spacing (mm) between plants within rows")]
        public double RowSpace { get; set; }
        [Description("Spacing (mm) between rows")]
        public double RowWidth { get; set; }
        [Description("Depth (mm) tubers are planted")]
        public double PlantingDepth { get; set; }
        [Description("Number of stems per seed tuber")]
        public double StemNumberPerSeedTuber { get; set; }
        [Description("Final leaf number.  Leave at 0 if not known")]
        public double SetFinalLeafNumber { get; set; }
        [Description("HarvestDate Date")]
        public DateTime HarvestDate { get; set; }
        
        [JsonIgnore] public string FinalTag { get; set; }
        [JsonIgnore] public bool Harvested { get; set; }
        [JsonIgnore] public bool ReadyForHarvest { get; set; }
        
        
        [EventSubscribe("StartOfSimulation")]
        private void OnSimulationCommencing(object sender, EventArgs e)
        {
            FinalTag = "";
            Harvested = false;
            ReadyForHarvest = false;
        }
        
        [EventSubscribe("DoManagement")]
        private void OnDoManagement(object sender, EventArgs e)
        {
            double PlantPopulation = 1 / ((RowWidth / 1000) * (RowSpace / 1000));

            if (Clock.Today.Date == PlantingDate)
                Potato.Sow(population: PlantPopulation, cultivar: CultivarName, depth: PlantingDepth, rowSpacing: 150, budNumber: StemNumberPerSeedTuber);
            
            if (ReadyForHarvest == true)
            {
                Potato.Harvest();
                Potato.EndCrop();
                ReadyForHarvest = false;
                Harvested = true;
                Summary.WriteMessage(this, "is working", MessageType.Diagnostic);
            }
            FinalTag = "";   
            
            if (SetFinalLeafNumber > 0)
                zone.Set("Potato.Structure.FinalLeafNumber.FixedValue", SetFinalLeafNumber);
            if (SetFinalLeafNumber > 80)
                Summary.WriteMessage(this, "Model is producing > 80 leaves which is guite alot.  Is this expected?  If not check you haven't set a invalid number in the Final Leaf Number box in" + this.Name, MessageType.Warning);
        }
        
        [EventSubscribe("DoManagementCalculations")]
        private void OnDoManagementCalculations(object sender, EventArgs e)
        {
            if ((Clock.Today == HarvestDate) && (Harvested == false))
            {
                FinalTag = "yield";
                ReadyForHarvest = true;
            }
            if ((phenology.Stage >= 7) && (Harvested == false))
            {
                FinalTag = "yield";
                ReadyForHarvest = true;
            }
        }
    }
}
```
            Report: EventNames=[Clock].DoReport
      Experiment FSP
        Memo: same as Validation.New Zealand.FUE.Memo
        Factors
          Factor Nitrogen: Specification=[operations]
            Operations 472
              2000-05-02  [Fertiliser].Apply(300, Fertiliser.Types.UreaN, 10);
              2000-06-14  [Fertiliser].Apply(170, Fertiliser.Types.UreaN, 10);
            Operations 350
              2000-05-02  [Fertiliser].Apply(180, Fertiliser.Types.UreaN, 10);
              2000-06-14  [Fertiliser].Apply(57, Fertiliser.Types.UreaN, 10);
              2000-07-10  [Fertiliser].Apply(57, Fertiliser.Types.UreaN, 10);
              2000-08-03  [Fertiliser].Apply(57, Fertiliser.Types.UreaN, 10);
            Operations 242
              2000-05-02  [Fertiliser].Apply(180, Fertiliser.Types.UreaN, 10);
              2000-06-14  [Fertiliser].Apply(46, Fertiliser.Types.UreaN, 10);
              2000-07-10  [Fertiliser].Apply(46, Fertiliser.Types.UreaN, 10);
            Operations 0
              2000-05-02  [Fertiliser].Apply(0, Fertiliser.Types.UreaN, 10);
              2000-06-14  [Fertiliser].Apply(0, Fertiliser.Types.UreaN, 10);
        Simulation FSPBase
          Weather: FileName=Pukehohe.met
          Clock: Start=2000-05-01; End=2000-12-01
          Summary
          SoilArbitrator Soil Arbitrator
          Zone Field: Area=1; Slope=0; AspectAngle=0; Altitude=50
            Soil: Latitude=0; Longitude=0
              Chemical: Thickness=[100, 200, 300, 300, 300, 300]; PH=[6.6, 6.2, 5.7, 5.5, 5.5, 5.5]; PHUnits=Water
              Water: Thickness=[100, 200, 300, 300, 300, 300]; InitialValues=[0.33, 0.33, 0.31, 0.27, 0.3, 0.3]; InitialPAWmm=294; RelativeTo=LL15; FilledFromTop=false
              Physical
                Thickness  BD   AirDry  LL15  DUL   SAT
                100        1.2  0.08    0.13  0.33  0.5
                200        1.2  0.08    0.13  0.33  0.5
                300        1.2  0.05    0.1   0.31  0.44
                300        1.2  0.04    0.08  0.27  0.46
                300        1.2  0.06    0.11  0.3   0.44
                300        1.2  0.06    0.11  0.3   0.44
                SoilCrop WheatSoil: LL=[0.13, 0.13, 0.1, 0.08, 0.11, 0.11]; KL=[0.06, 0.06, 0.06, 0.06, 0.06, 0.06]; XF=[1, 1, 1, 1, 1, 1]
                SoilCrop PotatoSoil: LL=[0.13, 0.13, 0.1, 0.08, 0.11, 0.11]; KL=[0.1, 0.1, 0.07, 0.05, 0.05, 0.05]; XF=[1, 1, 1, 1, 1, 1]
              WaterBalance SoilWater: same as Validation.New Zealand.Baxters.BaxtersBase.Field.Soil.SoilWater
              Organic: FOMCNRatio=30; CarbonUnits=Total
                Thickness  Carbon  SoilCNRatio  FBiom  FInert  FOM
                100        1.82    11.5         0.025  0.6     1243.93
                200        1.47    11.5         0.025  0.7     833.832
                300        1.2     11.5         0.015  0.75    457.617
                300        1.03    11.5         0.01   0.9     251.145
                300        0.47    11.5         0.01   0.96    137.831
                300        0.47    11.5         0.01   0.96    75.6435
              CERESSoilTemperature Temperature
              Nutrient
              Solute NO3: Thickness=[100, 200, 300, 300, 300, 300]; InitialValues=[15, 7, 7, 1, 1, 1]; InitialValuesUnits=ppm; WaterTableConcentration=0; D0=0; DepthConstant=0; MaxDepthSoluteAccessible=0; RunoffEffectivenessAtMovingSolute=0; MaxEffectiveRunoff=0
              Solute NH4: Thickness=[100, 200, 300, 300, 300, 300]; InitialValues=[0.1, 0.1, 0.1, 0.1, 0.1, 0.1]; InitialValuesUnits=ppm; WaterTableConcentration=0; D0=0; DepthConstant=0; MaxDepthSoluteAccessible=0; RunoffEffectivenessAtMovingSolute=0; MaxEffectiveRunoff=0
              Solute Urea: same as Validation.New Zealand.ABlock.RussetBurbank.Field.Soil.Urea
            Irrigation
            Fertiliser
            MicroClimate: a_interception=0; b_interception=1; c_interception=0; d_interception=0; SoilHeatFluxFraction=0.4; MinimumHeightDiffForNewLayer=0; NightInterceptionFraction=0.5; ReferenceHeight=2
            Plant Potato
            Folder Manager Folder
              Manager PlantandHarvest
                PlantingDate = 2000-05-02
                CultivarName = IlamHardy
                RowSpace = 280
                RowWidth = 770
                PlantingDepth = 170
                StemNumberPerSeedTuber = 3
                SetFinalLeafNumber = 34
                HarvestDate = 2000-10-16
                script: same as in Validation.New Zealand.FUE.FUE_base.paddock.Manager folder.PlantandHarvest
              Operations
                2000-05-02  [Fertiliser].Apply(300, Fertiliser.Types.UreaN, 10);
                2000-06-14  [Fertiliser].Apply(170, Fertiliser.Types.UreaN, 10);
            Report: EventNames=[Clock].DoReport
            SurfaceOrganicMatter surface organic matter: InitialResidueName=wheat; InitialResidueType=wheat; InitialResidueMass=2000; InitialStandingFraction=0; InitialCPR=0; InitialCNR=80
      Experiment FUE_NI
        Factors
          Factor Nitrogen: Specification=[operations]
            Operations 368
              2004-05-10  [Fertiliser].Apply(230, Fertiliser.Types.UreaN, 10);
              2004-07-17  [Fertiliser].Apply(69, Fertiliser.Types.UreaN, 10);
              2004-08-26  [Fertiliser].Apply(69, Fertiliser.Types.UreaN, 10);
            Operations 253
              2004-05-10  [Fertiliser].Apply(115, Fertiliser.Types.UreaN, 10);
              2004-07-17  [Fertiliser].Apply(69, Fertiliser.Types.UreaN, 10);
              2004-08-26  [Fertiliser].Apply(69, Fertiliser.Types.UreaN, 10);
            Operations 0
              2004-05-10  [Fertiliser].Apply(0, Fertiliser.Types.UreaN, 10);
              2004-07-17  [Fertiliser].Apply(0, Fertiliser.Types.UreaN, 10);
              2004-08-26  [Fertiliser].Apply(0, Fertiliser.Types.UreaN, 10);
        Simulation FUE_NI_base
          Weather: FileName=Pukehohe.met
          Clock: Start=2004-05-10; End=2004-12-31
          Summary
          SoilArbitrator Soil Arbitrator
          Zone paddock: Area=1; Slope=0; AspectAngle=0; Altitude=50
            Soil: Latitude=0; Longitude=0
              Chemical: Thickness=[100, 200, 300, 300, 300, 300]; PH=[6.6, 6.2, 5.7, 5.5, 5.5, 5.5]; PHUnits=Water
              Water: Thickness=[100, 200, 300, 300, 300, 300]; InitialValues=[0.33, 0.33, 0.31, 0.27, 0.3, 0.3]; InitialPAWmm=294; RelativeTo=LL15; FilledFromTop=false
              Physical
                Thickness  BD   AirDry  LL15  DUL   SAT
                100        1.2  0.08    0.13  0.33  0.5
                200        1.2  0.08    0.13  0.33  0.5
                300        1.2  0.05    0.1   0.31  0.44
                300        1.2  0.04    0.08  0.27  0.46
                300        1.2  0.06    0.11  0.3   0.44
                300        1.2  0.06    0.11  0.3   0.44
                SoilCrop WheatSoil: LL=[0.13, 0.13, 0.1, 0.08, 0.11, 0.11]; KL=[0.06, 0.06, 0.06, 0.06, 0.06, 0.06]; XF=[1, 1, 1, 1, 1, 1]
                SoilCrop Potato2Soil: LL=[0.13, 0.13, 0.1, 0.15, 0.3, 0.3]; KL=[0.1, 0.1, 0.07, 0.05, 0.05, 0.05]; XF=[1, 1, 1, 1, 0, 0]
                SoilCrop PotatoSoil: LL=[0.13, 0.13, 0.1, 0.15, 0.3, 0.3]; KL=[0.1, 0.1, 0.07, 0.05, 0.05, 0.05]; XF=[1, 1, 1, 1, 0, 0]
              WaterBalance SoilWater: same as Validation.New Zealand.Baxters.BaxtersBase.Field.Soil.SoilWater
              Organic: same as Validation.New Zealand.Baxters.BaxtersBase.Field.Soil.Organic
              CERESSoilTemperature Temperature
              Nutrient
              Solute NO3: Thickness=[100, 200, 300, 300, 300, 300]; InitialValues=[5, 3, 8, 7, 1.38889, 1.38889]; InitialValuesUnits=ppm; WaterTableConcentration=0; D0=0; DepthConstant=0; MaxDepthSoluteAccessible=0; RunoffEffectivenessAtMovingSolute=0; MaxEffectiveRunoff=0
              Solute NH4: same as Validation.New Zealand.FSP.FSPBase.Field.Soil.NH4
              Solute Urea: same as Validation.New Zealand.ABlock.RussetBurbank.Field.Soil.Urea
            Fertiliser
            Irrigation
            SurfaceOrganicMatter surface organic matter: InitialResidueName=wheat; InitialResidueType=wheat; InitialResidueMass=2000; InitialStandingFraction=0; InitialCPR=0; InitialCNR=80
            MicroClimate: a_interception=0; b_interception=0; c_interception=0; d_interception=0; SoilHeatFluxFraction=0.4; MinimumHeightDiffForNewLayer=0; NightInterceptionFraction=0.5; ReferenceHeight=2
            Plant Potato
            Folder Manager folder
              Operations: same as Validation.New Zealand.FUE_NI.Factors.Nitrogen.0
              Manager PlantandHarvest
                PlantingDate = 2004-05-10
                CultivarName = Nadine
                RowSpace = 300
                RowWidth = 810
                PlantingDepth = 170
                StemNumberPerSeedTuber = 2.4
                SetFinalLeafNumber = 40
                HarvestDate = 2004-11-09
                script: same as in Validation.New Zealand.FUE.FUE_base.paddock.Manager folder.PlantandHarvest
            Report: EventNames=[Clock].DoReport
    Folder Australia
      Memo
        **Model development**

        A range of experimental data has been collected by SARDI at Parilla, Penola and Glenroy in South Australia.
      Experiment Parilla
        Memo
          This experiment was conducted within a commercial potato field in the South Australia Murrylands region.  The fresh potato variety 'Coliban' was planted on three different dates (23/11, 3/12, 17/12) in 2007 on a free draining sandy soil.  Treatments recieved 10 mm of irrigation daily and 260 kg/ha of N as fertigation throughout the experiment.  In addition three rates of side dressed N (0, 100 and 200 kg) were applied during the season.
        Factors
          Permutation
            Factor PlantingDate
              CompositeFactor 23Nov
                Specifications:
                  [PlantandHarvest].Script.PlantingDate=2007-11-23
                  [FertigationEvents]
                  [FertiliserRule].Script.Day1=27
                  [FertiliserRule].Script.Day2=52
                  [FertiliserRule].Script.Day3=67
                  [PlantandHarvest].Script.HarvestDate=2008-03-05
                Operations FertigationEvents
                  2007-11-23  [Fertiliser].Apply(0, Fertiliser.Types.UreaN, 10);
                  2008-01-10  [Fertiliser].Apply(48, Fertiliser.Types.UreaN, 10);
                  2008-01-29  [Fertiliser].Apply(40, Fertiliser.Types.UreaN, 10);
                  2008-02-12  [Fertiliser].Apply(40, Fertiliser.Types.UreaN, 10);
                  2008-02-28  [Fertiliser].Apply(40, Fertiliser.Types.UreaN, 10);
                  2008-02-29  [Fertiliser].Apply(20, Fertiliser.Types.UreaN, 10);
                  2008-03-06  [Fertiliser].Apply(40, Fertiliser.Types.UreaN, 10);
                  2008-03-16  [Fertiliser].Apply(40, Fertiliser.Types.UreaN, 10);
              CompositeFactor 3Dec
                Specifications:
                  [PlantandHarvest].Script.PlantingDate=2007-12-03
                  [FertigationEvents]
                  [FertiliserRule].Script.Day1=42
                  [FertiliserRule].Script.Day2=57
                  [FertiliserRule].Script.Day3=72
                  [PlantandHarvest].Script.HarvestDate=2008-04-14
                Operations FertigationEvents
                  2008-01-27  [Fertiliser].Apply(44, Fertiliser.Types.UreaN, 10);
                  2008-02-05  [Fertiliser].Apply(44, Fertiliser.Types.UreaN, 10);
                  2008-02-13  [Fertiliser].Apply(40, Fertiliser.Types.UreaN, 10);
                  2008-02-27  [Fertiliser].Apply(40, Fertiliser.Types.UreaN, 10);
                  2008-03-06  [Fertiliser].Apply(40, Fertiliser.Types.UreaN, 10);
                  2008-03-13  [Fertiliser].Apply(40, Fertiliser.Types.UreaN, 10);
                  2008-03-21  [Fertiliser].Apply(40, Fertiliser.Types.UreaN, 10);
              CompositeFactor 17Dec
                Specifications:
                  [PlantandHarvest].Script.PlantingDate=2007-12-17
                  [FertigationEvents]
                  [FertiliserRule].Script.Day1=28
                  [FertiliserRule].Script.Day2=43
                  [FertiliserRule].Script.Day3=58
                  [PlantandHarvest].Script.HarvestDate=2008-04-14
                Operations FertigationEvents: same as Validation.Australia.Parilla.Factors.Permutation.PlantingDate.3Dec.FertigationEvents
            Factor Nitrogen
              CompositeFactor LowN
                Specifications:
                  [FertiliserRule].Script.Fert1=0
                  [FertiliserRule].Script.Fert2=0
                  [FertiliserRule].Script.Fert3=0
              CompositeFactor MedN
                Specifications:
                  [FertiliserRule].Script.Fert1=37
                  [FertiliserRule].Script.Fert2=38
                  [FertiliserRule].Script.Fert3=25
              CompositeFactor HighN
                Specifications:
                  [FertiliserRule].Script.Fert1=75
                  [FertiliserRule].Script.Fert2=75
                  [FertiliserRule].Script.Fert3=50
        Simulation Parilla_base
          Weather: FileName=Lameroo.met
          Clock: Start=2007-11-22; End=2008-06-30
          Summary
          SoilArbitrator Soil Arbitrator
          Zone paddock: Area=1; Slope=0; AspectAngle=0; Altitude=50
            Soil: Latitude=0; Longitude=0
              Chemical: Thickness=[100, 200, 300, 300, 300, 300]; PH=[6.6, 6.2, 5.7, 5.5, 5.5, 5.5]; PHUnits=Water
              Water: Thickness=[100, 200, 300, 300, 300, 300]; InitialValues=[0.16, 0.16, 0.12, 0.12, 0.12, 0.12]; InitialPAWmm=102; RelativeTo=LL15; FilledFromTop=false
              Physical
                Thickness  BD   AirDry  LL15  DUL   SAT
                100        1.2  0.03    0.06  0.16  0.25
                200        1.2  0.05    0.06  0.16  0.25
                300        1.2  0.06    0.06  0.12  0.25
                300        1.2  0.06    0.06  0.12  0.25
                300        1.2  0.06    0.06  0.12  0.25
                300        1.2  0.06    0.06  0.12  0.25
                SoilCrop PotatoSoil: LL=[0.06, 0.06, 0.12, 0.12, 0.12, 0.12]; KL=[0.1, 0.1, 0.07, 0.05, 0.05, 0.05]; XF=[1, 1, 1, 1, 1, 1]
              WaterBalance SoilWater: SummerDate=1-Nov; SummerU=9; SummerCona=4.4; WinterDate=1-Apr; WinterU=9; WinterCona=4.4; DiffusConst=88; DiffusSlope=35.4; Salb=0.18; CN2Bare=68; CNRed=20; CNCov=0.8; DischargeWidth=0; CatchmentArea=0; PSIDul=-100
                Thickness  SWCON  KLAT
                100        0.9    0
                200        0.9    0
                300        0.9    0
                300        0.9    0
                300        0.9    0
                300        0.9    0
              Organic: FOMCNRatio=30; CarbonUnits=Total
                Thickness  Carbon  SoilCNRatio  FBiom  FInert  FOM
                100        0.7     11.5         0.025  0.3     1243.93
                200        0.5     11.5         0.025  0.4     833.832
                300        0.3     11.5         0.015  0.75    457.617
                300        0.3     11.5         0.01   0.9     251.145
                300        0.3     11.5         0.01   0.96    137.831
                300        0.3     11.5         0.01   0.96    75.6435
              CERESSoilTemperature Temperature
              Nutrient
              Solute NO3: Thickness=[100, 200, 300, 300, 300, 300]; InitialValues=[21.25, 19.125, 0.555556, 0.555556, 0.555556, 0.555556]; InitialValuesUnits=ppm; WaterTableConcentration=0; D0=0; DepthConstant=0; MaxDepthSoluteAccessible=0; RunoffEffectivenessAtMovingSolute=0; MaxEffectiveRunoff=0
              Solute NH4: same as Validation.New Zealand.FSP.FSPBase.Field.Soil.NH4
              Solute Urea: same as Validation.New Zealand.ABlock.RussetBurbank.Field.Soil.Urea
            Fertiliser
            Irrigation
            SurfaceOrganicMatter surface organic matter: InitialResidueName=wheat; InitialResidueType=wheat; InitialResidueMass=0; InitialStandingFraction=0; InitialCPR=0; InitialCNR=60
            MicroClimate: a_interception=0; b_interception=0; c_interception=0; d_interception=0; SoilHeatFluxFraction=0.4; MinimumHeightDiffForNewLayer=0; NightInterceptionFraction=0.5; ReferenceHeight=2
            Plant Potato
            Folder Manager folder
              Manager PlantandHarvest
                PlantingDate = 2007-11-23
                CultivarName = Coliban
                RowSpace = 280
                RowWidth = 770
                PlantingDepth = 170
                StemNumberPerSeedTuber = 2.4
                SetFinalLeafNumber = 28
                HarvestDate = 2008-03-05
                script: same as in Validation.New Zealand.FUE.FUE_base.paddock.Manager folder.PlantandHarvest
              Operations FertigationEvents
                2008-01-10  [Fertiliser].Apply(48, Fertiliser.Types.UreaN, 10);
                2008-01-29  [Fertiliser].Apply(40, Fertiliser.Types.UreaN, 10);
                2008-02-12  [Fertiliser].Apply(40, Fertiliser.Types.UreaN, 10);
                2008-02-28  [Fertiliser].Apply(40, Fertiliser.Types.UreaN, 10);
                2008-02-29  [Fertiliser].Apply(20, Fertiliser.Types.UreaN, 10);
                2008-03-06  [Fertiliser].Apply(40, Fertiliser.Types.UreaN, 10);
                2008-03-16  [Fertiliser].Apply(40, Fertiliser.Types.UreaN, 10);
              Operations IrrigationEvents
                2007-11-23  [Irrigation].Apply(9);
                2007-11-24  [Irrigation].Apply(9);
                2007-11-25  [Irrigation].Apply(9);
                2007-11-26  [Irrigation].Apply(9);
                2007-11-27  [Irrigation].Apply(9);
                2007-11-28  [Irrigation].Apply(9);
                2007-11-29  [Irrigation].Apply(9);
                2007-12-01  [Irrigation].Apply(9);
                2007-12-02  [Irrigation].Apply(9);
                2007-12-03  [Irrigation].Apply(9);
                2007-12-04  [Irrigation].Apply(9);
                2007-12-05  [Irrigation].Apply(9);
                2007-12-06  [Irrigation].Apply(9);
                2007-12-07  [Irrigation].Apply(9);
                2007-12-08  [Irrigation].Apply(9);
                2007-12-09  [Irrigation].Apply(9);
                2007-12-10  [Irrigation].Apply(9);
                2007-12-11  [Irrigation].Apply(9);
                2007-12-12  [Irrigation].Apply(9);
                2007-12-13  [Irrigation].Apply(9);
                2007-12-14  [Irrigation].Apply(9);
                2007-12-16  [Irrigation].Apply(9);
                2007-12-17  [Irrigation].Apply(9);
                2007-12-18  [Irrigation].Apply(9);
                2007-12-19  [Irrigation].Apply(9);
                2007-12-20  [Irrigation].Apply(9);
                2007-12-21  [Irrigation].Apply(9);
                2007-12-22  [Irrigation].Apply(9);
                2007-12-23  [Irrigation].Apply(9);
                2007-12-24  [Irrigation].Apply(9);
                2007-12-25  [Irrigation].Apply(9);
                2007-12-26  [Irrigation].Apply(9);
                2007-12-27  [Irrigation].Apply(9);
                2007-12-28  [Irrigation].Apply(9);
                2007-12-29  [Irrigation].Apply(9);
                2007-12-30  [Irrigation].Apply(9);
                2007-12-31  [Irrigation].Apply(9);
                2008-01-01  [Irrigation].Apply(9);
                2008-01-02  [Irrigation].Apply(9);
                2008-01-03  [Irrigation].Apply(9);
                2008-01-04  [Irrigation].Apply(9);
                2008-01-05  [Irrigation].Apply(9);
                2008-01-06  [Irrigation].Apply(9);
                2008-01-07  [Irrigation].Apply(9);
                2008-01-08  [Irrigation].Apply(9);
                2008-01-09  [Irrigation].Apply(9);
                2008-01-10  [Irrigation].Apply(9);
                2008-01-11  [Irrigation].Apply(9);
                2008-01-12  [Irrigation].Apply(9);
                2008-01-13  [Irrigation].Apply(9);
                2008-01-14  [Irrigation].Apply(9);
                2008-01-15  [Irrigation].Apply(9);
                2008-01-16  [Irrigation].Apply(9);
                2008-01-17  [Irrigation].Apply(9);
                2008-01-18  [Irrigation].Apply(9);
                2008-01-20  [Irrigation].Apply(9);
                2008-01-21  [Irrigation].Apply(9);
                2008-01-22  [Irrigation].Apply(9);
                2008-01-23  [Irrigation].Apply(9);
                2008-01-24  [Irrigation].Apply(9);
                2008-01-25  [Irrigation].Apply(9);
                2008-01-26  [Irrigation].Apply(9);
                2008-01-27  [Irrigation].Apply(9);
                2008-01-28  [Irrigation].Apply(9);
                2008-01-29  [Irrigation].Apply(9);
                2008-01-30  [Irrigation].Apply(9);
                2008-01-31  [Irrigation].Apply(9);
                2008-02-01  [Irrigation].Apply(9);
                2008-02-02  [Irrigation].Apply(9);
                2008-02-03  [Irrigation].Apply(9);
                2008-02-04  [Irrigation].Apply(9);
                2008-02-05  [Irrigation].Apply(9);
                2008-02-06  [Irrigation].Apply(9);
                2008-02-07  [Irrigation].Apply(9);
                2008-02-08  [Irrigation].Apply(9);
                2008-02-09  [Irrigation].Apply(9);
                2008-02-10  [Irrigation].Apply(9);
                2008-02-11  [Irrigation].Apply(9);
                2008-02-12  [Irrigation].Apply(9);
                2008-02-13  [Irrigation].Apply(9);
                2008-02-14  [Irrigation].Apply(9);
                2008-02-15  [Irrigation].Apply(9);
                2008-02-16  [Irrigation].Apply(9);
                2008-02-17  [Irrigation].Apply(9);
                2008-02-18  [Irrigation].Apply(9);
                2008-02-19  [Irrigation].Apply(9);
                2008-02-20  [Irrigation].Apply(9);
                2008-02-21  [Irrigation].Apply(9);
                2008-02-22  [Irrigation].Apply(9);
                2008-02-23  [Irrigation].Apply(9);
                2008-02-24  [Irrigation].Apply(9);
                2008-02-25  [Irrigation].Apply(9);
                2008-02-26  [Irrigation].Apply(9);
                2008-02-27  [Irrigation].Apply(9);
                2008-02-28  [Irrigation].Apply(9);
                2008-02-29  [Irrigation].Apply(9);
                2008-03-01  [Irrigation].Apply(9);
                2008-03-02  [Irrigation].Apply(9);
                2008-03-03  [Irrigation].Apply(9);
                2008-03-04  [Irrigation].Apply(9);
                2008-03-05  [Irrigation].Apply(9);
                2008-03-06  [Irrigation].Apply(9);
                2008-03-07  [Irrigation].Apply(9);
                2008-03-08  [Irrigation].Apply(9);
                2008-03-09  [Irrigation].Apply(9);
                2008-03-10  [Irrigation].Apply(9);
                2008-03-11  [Irrigation].Apply(9);
                2008-03-12  [Irrigation].Apply(9);
                2008-03-13  [Irrigation].Apply(9);
                2008-03-14  [Irrigation].Apply(9);
                2008-03-15  [Irrigation].Apply(9);
                2008-03-16  [Irrigation].Apply(9);
                2008-03-17  [Irrigation].Apply(9);
                2008-03-18  [Irrigation].Apply(9);
                2008-03-19  [Irrigation].Apply(9);
                2008-03-20  [Irrigation].Apply(9);
                2008-03-22  [Irrigation].Apply(9);
                2008-03-23  [Irrigation].Apply(9);
                2008-03-25  [Irrigation].Apply(9);
                2008-03-26  [Irrigation].Apply(9);
                2008-03-28  [Irrigation].Apply(9);
                2008-03-29  [Irrigation].Apply(9);
                2008-03-31  [Irrigation].Apply(9);
                2008-04-01  [Irrigation].Apply(9);
                2008-04-03  [Irrigation].Apply(9);
                2008-04-04  [Irrigation].Apply(9);
                2008-04-06  [Irrigation].Apply(9);
                2008-04-07  [Irrigation].Apply(9);
                2008-04-09  [Irrigation].Apply(9);
                2008-04-10  [Irrigation].Apply(9);
                2008-04-12  [Irrigation].Apply(9);
                2008-04-13  [Irrigation].Apply(9);
                2008-04-15  [Irrigation].Apply(9);
                2008-04-16  [Irrigation].Apply(9);
                2008-04-18  [Irrigation].Apply(9);
                2008-04-19  [Irrigation].Apply(9);
                2008-04-21  [Irrigation].Apply(9);
                2008-04-22  [Irrigation].Apply(9);
                2008-04-24  [Irrigation].Apply(9);
                2008-04-25  [Irrigation].Apply(9);
                2008-04-27  [Irrigation].Apply(9);
                2008-04-28  [Irrigation].Apply(9);
                2008-04-30  [Irrigation].Apply(9);
                2008-05-01  [Irrigation].Apply(9);
                2008-05-03  [Irrigation].Apply(9);
                2008-05-04  [Irrigation].Apply(9);
                2008-05-06  [Irrigation].Apply(9);
                2008-05-07  [Irrigation].Apply(9);
              Operations
                2000-05-02  [Fertiliser].Apply(300, Fertiliser.Types.UreaN, 10);
                2000-06-14  [Fertiliser].Apply(170, Fertiliser.Types.UreaN, 10);
            Report: EventNames=[Clock].DoReport
            Manager FertiliserRule
              Fert1 = 37.5
              Fert2 = 37.5
              Fert3 = 25
              Day1 = 27
              Day2 = 52
              Day3 = 67
```csharp
using Models.Soils;
using System;
using Models.Core;
using Models.PMF;
using APSIM.Shared.Utilities;
        
namespace Models
{
    [Serializable] 
    [System.Xml.Serialization.XmlInclude(typeof(Model))]
    public class Script : Model
    {
        [Link] Clock Clock;
        [Link] Fertiliser Fertiliser;
        [Description("N applied (kg/ha) on first fertiliser event")]
        public double Fert1 { get; set; }
        [Description("N applied (kg/ha) on 2nd fertiliser event")]
        public double Fert2 { get; set; }
        [Description("N applied (kg/ha) on 3rd fertiliser event")]
        public double Fert3 { get; set; }
        [Description("Days after sowing for first N application")]
        public double Day1 { get; set; }
        [Description("Days after sowing for second N application")]
        public double Day2 { get; set; }
        [Description("Days after sowing for third N application")]
        public double Day3 { get; set; }
                
        private double DaysAfterSowing = 0;
               
        [EventSubscribe("Sowing")]
        private void OnSowing(object sender, EventArgs e)
        {
            DaysAfterSowing = 0;
        }
        [EventSubscribe("DoManagement")]
        private void OnDoManagement(object sender, EventArgs e)
        {
            DaysAfterSowing += 1;
            if (DaysAfterSowing == Day1)
                Fertiliser.Apply(Fert1, Fertiliser.Types.UreaN, 10);
            if (DaysAfterSowing == Day2)
                Fertiliser.Apply(Fert2, Fertiliser.Types.UreaN, 10);
            if (DaysAfterSowing == Day3)
                Fertiliser.Apply(Fert3, Fertiliser.Types.UreaN, 10);
        }
    }
}
```
      Experiment Penola_0607
        Memo
          This experiment was conducted within a commercial field of 'Russet Burbank' potatos grown at Penola west in South Australia.  The paddock contained a Parapanic, Humic-Humosesquic, Semiaquic, Podsol (sandy loam) soil and the crop was sown on the 10/10/2006.  Nitrogen treatments were applied at different rates (0, 250, 500 and 750 kg/ha) in 8 split applications.
        Factors
          Factor Nitrogen: Specification=[FertiliserApplications]
            Operations 0
              2006-10-10  [Fertiliser].Apply(90, Fertiliser.Types.UreaN, 10);
            Operations 250
              2006-10-10  [Fertiliser].Apply(90, Fertiliser.Types.UreaN, 10);
              2006-11-19  [Fertiliser].Apply(25, Fertiliser.Types.UreaN, 10);
              2006-12-03  [Fertiliser].Apply(50, Fertiliser.Types.UreaN, 10);
              2006-12-17  [Fertiliser].Apply(50, Fertiliser.Types.UreaN, 10);
              2006-12-31  [Fertiliser].Apply(38, Fertiliser.Types.UreaN, 10);
              2007-01-14  [Fertiliser].Apply(38, Fertiliser.Types.UreaN, 10);
              2007-01-28  [Fertiliser].Apply(25, Fertiliser.Types.UreaN, 10);
              2007-02-11  [Fertiliser].Apply(25, Fertiliser.Types.UreaN, 10);
            Operations 500
              2006-10-10  [Fertiliser].Apply(90, Fertiliser.Types.UreaN, 10);
              2006-11-19  [Fertiliser].Apply(50, Fertiliser.Types.UreaN, 10);
              2006-12-03  [Fertiliser].Apply(100, Fertiliser.Types.UreaN, 10);
              2006-12-17  [Fertiliser].Apply(100, Fertiliser.Types.UreaN, 10);
              2006-12-31  [Fertiliser].Apply(75, Fertiliser.Types.UreaN, 10);
              2007-01-14  [Fertiliser].Apply(75, Fertiliser.Types.UreaN, 10);
              2007-01-28  [Fertiliser].Apply(50, Fertiliser.Types.UreaN, 10);
              2007-02-11  [Fertiliser].Apply(50, Fertiliser.Types.UreaN, 10);
            Operations 750
              2006-10-10  [Fertiliser].Apply(90, Fertiliser.Types.UreaN, 10);
              2006-11-19  [Fertiliser].Apply(75, Fertiliser.Types.UreaN, 10);
              2006-12-03  [Fertiliser].Apply(150, Fertiliser.Types.UreaN, 10);
              2006-12-17  [Fertiliser].Apply(150, Fertiliser.Types.UreaN, 10);
              2006-12-31  [Fertiliser].Apply(113, Fertiliser.Types.UreaN, 10);
              2007-01-14  [Fertiliser].Apply(113, Fertiliser.Types.UreaN, 10);
              2007-01-28  [Fertiliser].Apply(75, Fertiliser.Types.UreaN, 10);
              2007-02-11  [Fertiliser].Apply(75, Fertiliser.Types.UreaN, 10);
        Simulation Penola_0506Base
          Weather: FileName=Kalangadoo.met
          Clock: Start=2006-10-10; End=2007-06-01
          Summary
          SoilArbitrator Soil Arbitrator
          Zone paddock: Area=1; Slope=0; AspectAngle=0; Altitude=50
            Soil: Latitude=0; Longitude=0
              Chemical: Thickness=[100, 200, 300, 300, 300, 300]; PH=[6.6, 6.2, 5.7, 5.5, 5.5, 5.5]; PHUnits=Water
              Water: Thickness=[100, 200, 300, 300, 300, 300]; InitialValues=[0.18, 0.18, 0.12, 0.2, 0.35, 0.35]; InitialPAWmm=312; RelativeTo=LL15; FilledFromTop=false
              Physical
                Thickness  BD   AirDry  LL15  DUL   SAT
                100        1.2  0.03    0.06  0.18  0.35
                200        1.2  0.03    0.03  0.18  0.35
                300        1.2  0.03    0.03  0.12  0.3
                300        1.2  0.03    0.03  0.2   0.25
                300        1.2  0.03    0.03  0.35  0.4
                300        1.2  0.03    0.03  0.35  0.4
                SoilCrop WheatSoil: LL=[0.13, 0.13, 0.1, 0.08, 0.11, 0.11]; KL=[0.06, 0.06, 0.06, 0.06, 0.06, 0.06]; XF=[1, 1, 1, 1, 1, 1]
                SoilCrop Potato2Soil: LL=[0.06, 0.03, 0.03, 0.03, 0.03, 0.03]; KL=[0.1, 0.1, 0.07, 0.05, 0.05, 0.05]; XF=[1, 1, 1, 1, 0, 0]
                SoilCrop PotatoSoil: LL=[0.13, 0.13, 0.1, 0.15, 0.3, 0.3]; KL=[0.1, 0.1, 0.07, 0.05, 0.05, 0.05]; XF=[1, 1, 1, 1, 0, 0]
              WaterBalance SoilWater: SummerDate=1-Nov; SummerU=9; SummerCona=4.4; WinterDate=1-Apr; WinterU=9; WinterCona=4.4; DiffusConst=88; DiffusSlope=35.4; Salb=0.18; CN2Bare=68; CNRed=20; CNCov=0.8; DischargeWidth=0; CatchmentArea=0; PSIDul=-100
                Thickness  SWCON  KLAT
                100        0.9    0
                200        0.9    0
                300        0.9    0
                300        0.01   0
                300        0.01   0
                300        0.01   0
              Organic: FOMCNRatio=20; CarbonUnits=Total
                Thickness  Carbon  SoilCNRatio  FBiom  FInert  FOM
                100        1.82    11.5         0.025  0.3     10366.1
                200        1.47    11.5         0.025  0.4     6948.6
                300        1.2     11.5         0.015  0.75    3813.47
                300        1.03    11.5         0.01   0.9     2092.88
                300        0.47    11.5         0.01   0.96    1148.6
                300        0.47    11.5         0.01   0.96    630.363
              CERESSoilTemperature Temperature
              Nutrient
              Solute NO3: Thickness=[100, 200, 300, 300, 300, 300]; InitialValues=[13, 10, 8.33333, 8.33333, 1.38889, 1.38889]; InitialValuesUnits=ppm; WaterTableConcentration=0; D0=0; DepthConstant=0; MaxDepthSoluteAccessible=0; RunoffEffectivenessAtMovingSolute=0; MaxEffectiveRunoff=0
              Solute NH4: same as Validation.New Zealand.FSP.FSPBase.Field.Soil.NH4
              Solute Urea: same as Validation.New Zealand.ABlock.RussetBurbank.Field.Soil.Urea
            Fertiliser
            Irrigation
            SurfaceOrganicMatter surface organic matter: InitialResidueName=wheat; InitialResidueType=wheat; InitialResidueMass=2000; InitialStandingFraction=0; InitialCPR=0; InitialCNR=80
            MicroClimate: a_interception=0; b_interception=1; c_interception=0; d_interception=0; SoilHeatFluxFraction=0.4; MinimumHeightDiffForNewLayer=0; NightInterceptionFraction=0.5; ReferenceHeight=2
            Plant Potato
            Folder Manager folder
              Operations FertiliserApplications: same as Validation.Australia.Penola_0607.Factors.Nitrogen.750
              Operations IrrigationApplications
                2006-10-05  [Irrigation].Apply(5.4)
                2006-10-17  [Irrigation].Apply(3.8)
                2006-11-04  [Irrigation].Apply(6.8)
                2006-11-08  [Irrigation].Apply(3.6)
                2006-11-10  [Irrigation].Apply(3.8)
                2006-11-14  [Irrigation].Apply(4.2)
                2006-11-17  [Irrigation].Apply(5.6)
                2006-11-18  [Irrigation].Apply(11)
                2006-11-19  [Irrigation].Apply(5.6)
                2006-11-20  [Irrigation].Apply(5.6)
                2006-11-21  [Irrigation].Apply(4.2)
                2006-11-22  [Irrigation].Apply(5.4)
                2006-11-23  [Irrigation].Apply(5)
                2006-11-24  [Irrigation].Apply(5.6)
                2006-11-25  [Irrigation].Apply(5.4)
                2006-11-26  [Irrigation].Apply(6.2)
                2006-11-27  [Irrigation].Apply(8.4)
                2006-11-28  [Irrigation].Apply(13.2)
                2006-11-29  [Irrigation].Apply(6.6)
                2006-11-30  [Irrigation].Apply(13.8)
                2006-12-01  [Irrigation].Apply(10.6)
                2006-12-02  [Irrigation].Apply(5.6)
                2006-12-03  [Irrigation].Apply(5.8)
                2006-12-04  [Irrigation].Apply(9.7)
                2006-12-05  [Irrigation].Apply(9.6)
                2006-12-06  [Irrigation].Apply(6)
                2006-12-07  [Irrigation].Apply(6)
                2006-12-08  [Irrigation].Apply(11.6)
                2006-12-09  [Irrigation].Apply(10)
                2006-12-10  [Irrigation].Apply(10.4)
                2006-12-12  [Irrigation].Apply(11.2)
                2006-12-13  [Irrigation].Apply(5.8)
                2006-12-14  [Irrigation].Apply(11.4)
                2006-12-15  [Irrigation].Apply(6.2)
                2006-12-16  [Irrigation].Apply(13)
                2006-12-18  [Irrigation].Apply(12.6)
                2006-12-19  [Irrigation].Apply(6)
                2006-12-20  [Irrigation].Apply(6.2)
                2006-12-21  [Irrigation].Apply(11.4)
                2006-12-25  [Irrigation].Apply(4.3)
                2006-12-26  [Irrigation].Apply(4.6)
                2006-12-27  [Irrigation].Apply(6.8)
                2006-12-28  [Irrigation].Apply(6.2)
                2006-12-29  [Irrigation].Apply(13.2)
                2006-12-31  [Irrigation].Apply(6.8)
                2007-01-01  [Irrigation].Apply(6.6)
                2007-01-02  [Irrigation].Apply(11.8)
                2007-01-03  [Irrigation].Apply(6)
                2007-01-04  [Irrigation].Apply(12.4)
                2007-01-05  [Irrigation].Apply(5)
                2007-01-08  [Irrigation].Apply(5.5)
                2007-01-09  [Irrigation].Apply(13.8)
                2007-01-10  [Irrigation].Apply(5.4)
                2007-01-11  [Irrigation].Apply(6.2)
                2007-01-12  [Irrigation].Apply(6.2)
                2007-01-13  [Irrigation].Apply(13.4)
                2007-01-14  [Irrigation].Apply(5.6)
                2007-01-15  [Irrigation].Apply(13.6)
                2007-01-16  [Irrigation].Apply(6.2)
                2007-01-17  [Irrigation].Apply(6.2)
                2007-01-19  [Irrigation].Apply(40.4)
                2007-01-23  [Irrigation].Apply(5.8)
                2007-01-24  [Irrigation].Apply(7)
                2007-01-26  [Irrigation].Apply(14.8)
                2007-01-28  [Irrigation].Apply(9.2)
                2007-01-29  [Irrigation].Apply(5.6)
                2007-01-31  [Irrigation].Apply(13.4)
                2007-02-01  [Irrigation].Apply(7)
                2007-02-03  [Irrigation].Apply(12.4)
                2007-02-05  [Irrigation].Apply(8.6)
                2007-02-07  [Irrigation].Apply(12)
                2007-02-08  [Irrigation].Apply(5.8)
                2007-02-09  [Irrigation].Apply(5.8)
                2007-02-11  [Irrigation].Apply(5.4)
                2007-02-13  [Irrigation].Apply(7.4)
                2007-02-14  [Irrigation].Apply(3.8)
                2007-02-15  [Irrigation].Apply(6.8)
                2007-02-16  [Irrigation].Apply(6.2)
                2007-02-17  [Irrigation].Apply(5.8)
                2007-02-18  [Irrigation].Apply(5.2)
                2007-02-19  [Irrigation].Apply(5.6)
                2007-02-20  [Irrigation].Apply(6.2)
                2007-02-21  [Irrigation].Apply(6.2)
                2007-02-23  [Irrigation].Apply(6.4)
                2007-02-24  [Irrigation].Apply(5.8)
                2007-02-26  [Irrigation].Apply(12)
                2007-02-28  [Irrigation].Apply(6)
                2007-03-01  [Irrigation].Apply(11)
                2007-03-02  [Irrigation].Apply(5.2)
                2007-03-03  [Irrigation].Apply(5.8)
              Manager PlantandHarvest
                PlantingDate = 2006-10-10
                CultivarName = RussetBurbank
                RowSpace = 370
                RowWidth = 860
                PlantingDepth = 170
                StemNumberPerSeedTuber = 4.12
                SetFinalLeafNumber = 0
                HarvestDate = 2007-03-31
                script: same as in Validation.New Zealand.FUE.FUE_base.paddock.Manager folder.PlantandHarvest
              Manager RemoveRainfall
                StartDate = 2006-10-05
                EndDate = 2007-03-03
```csharp
using Models.Soils;
using System.Xml.Serialization;
using Models;
using Models.PMF;
using System.Text;
using System.Collections.Generic;
using APSIM.Shared.Utilities;
using Models.Core;
using System;
using Models.Climate;

namespace Models
{
    [Serializable] 
    [System.Xml.Serialization.XmlInclude(typeof(Model))]
    public class Script : Model
    {
        [Link] Weather Met;
        [Link] Clock Clock;
    
        [Description("Start Date")]
        public DateTime StartDate { get; set; }
        
        [Description("End Date")]
        public DateTime EndDate { get; set; }
 
    
        [EventSubscribe("PreparingNewWeatherData")]
        private void OnPreparingNewWeatherData(object sender, EventArgs e)
        {
            if ((Clock.Today.Date >= StartDate) && (Clock.Today.Date <= EndDate))
                Met.Rain = 0;        
        }
    }
}
```
            Report: EventNames=[Clock].DoReport
      Experiment Glenroy_0607
        Memo
          This experiment was conducted within a commercial field of 'Russet Burbank' potatos grown at Glenroy in South Australia.  The paddock contained a Melanic, Petrocalcic, Black Dermosol which had 30 cm of black clay over a compacted calcitrate sub soil.  The crop was sown on the 18/10/2005.  Nitrogen treatments were applied at different rates (0, 125, 250 and 500 kg/ha) in 8 split applications.
        Factors
          Factor Nitrogen: Specification=[FertiliserApplications]
            Operations 0
              2006-10-10  [Fertiliser].Apply(90, Fertiliser.Types.UreaN, 10);
              2006-11-14  [Fertiliser].Apply(5, Fertiliser.Types.UreaN, 10);
              2006-11-28  [Fertiliser].Apply(10, Fertiliser.Types.UreaN, 10);
              2006-12-08  [Fertiliser].Apply(10, Fertiliser.Types.UreaN, 10);
              2006-12-20  [Fertiliser].Apply(8, Fertiliser.Types.UreaN, 10);
              2007-01-05  [Fertiliser].Apply(8, Fertiliser.Types.UreaN, 10);
              2007-01-15  [Fertiliser].Apply(5, Fertiliser.Types.UreaN, 10);
              0001-01-01  [Fertiliser].Apply(5, Fertiliser.Types.UreaN, 10);
            Operations 125
              2006-10-10  [Fertiliser].Apply(90, Fertiliser.Types.UreaN, 10);
              2006-11-14  [Fertiliser].Apply(17.5, Fertiliser.Types.UreaN, 10);
              2006-11-28  [Fertiliser].Apply(35, Fertiliser.Types.UreaN, 10);
              2006-12-08  [Fertiliser].Apply(35, Fertiliser.Types.UreaN, 10);
              2006-12-20  [Fertiliser].Apply(26, Fertiliser.Types.UreaN, 10);
              2007-01-05  [Fertiliser].Apply(26, Fertiliser.Types.UreaN, 10);
              2007-01-15  [Fertiliser].Apply(18, Fertiliser.Types.UreaN, 10);
              0001-01-01  [Fertiliser].Apply(18, Fertiliser.Types.UreaN, 10);
            Operations 250
              2006-10-10  [Fertiliser].Apply(90, Fertiliser.Types.UreaN, 10);
              2006-11-14  [Fertiliser].Apply(30, Fertiliser.Types.UreaN, 10);
              2006-11-28  [Fertiliser].Apply(60, Fertiliser.Types.UreaN, 10);
              2006-12-08  [Fertiliser].Apply(60, Fertiliser.Types.UreaN, 10);
              2006-12-20  [Fertiliser].Apply(45, Fertiliser.Types.UreaN, 10);
              2007-01-05  [Fertiliser].Apply(45, Fertiliser.Types.UreaN, 10);
              2007-01-15  [Fertiliser].Apply(30, Fertiliser.Types.UreaN, 10);
              0001-01-01  [Fertiliser].Apply(30, Fertiliser.Types.UreaN, 10);
            Operations 500
              2006-10-10  [Fertiliser].Apply(90, Fertiliser.Types.UreaN, 10);
              2006-11-14  [Fertiliser].Apply(55, Fertiliser.Types.UreaN, 10);
              2006-11-28  [Fertiliser].Apply(110, Fertiliser.Types.UreaN, 10);
              2006-12-08  [Fertiliser].Apply(110, Fertiliser.Types.UreaN, 10);
              2006-12-20  [Fertiliser].Apply(83, Fertiliser.Types.UreaN, 10);
              2007-01-05  [Fertiliser].Apply(83, Fertiliser.Types.UreaN, 10);
              2007-01-15  [Fertiliser].Apply(55, Fertiliser.Types.UreaN, 10);
              0001-01-01  [Fertiliser].Apply(55, Fertiliser.Types.UreaN, 10);
        Simulation GlenRoy_0506Base
          Weather: FileName=Coonawarra.met
          Clock: Start=2006-10-10; End=2007-06-01
          Summary
          SoilArbitrator Soil Arbitrator
          Zone paddock: Area=1; Slope=0; AspectAngle=0; Altitude=50
            Soil: Latitude=0; Longitude=0
              Chemical: Thickness=[100, 200, 300, 300, 300, 300]; PH=[6.6, 6.2, 5.7, 5.5, 5.5, 5.5]; PHUnits=Water
              Water: Thickness=[100, 200, 300, 300, 300, 300]; InitialValues=[0.4, 0.3, 0.2, 0.02, 0.02, 0.02]; InitialPAWmm=55; RelativeTo=LL15; FilledFromTop=false
              Physical
                Thickness  BD   AirDry  LL15  DUL   SAT
                100        1.2  0.15    0.32  0.4   0.52
                200        1.2  0.26    0.26  0.3   0.52
                300        1.2  0.1     0.1   0.2   0.3
                300        1.2  0.01    0.01  0.02  0.03
                300        1.2  0.01    0.01  0.02  0.03
                300        1.2  0.01    0.01  0.02  0.03
                SoilCrop PotatoSoil: LL=[0.15, 0.26, 0.1, 0.01, 0.01, 0.01]; KL=[0.1, 0.1, 0.07, 0.05, 0.05, 0.05]; XF=[1, 1, 1, 1, 0, 0]
              WaterBalance SoilWater: same as Validation.New Zealand.Baxters.BaxtersBase.Field.Soil.SoilWater
              Organic: same as Validation.Australia.Penola_0607.Penola_0506Base.paddock.Soil.Organic
              CERESSoilTemperature Temperature
              Nutrient
              Solute NO3: Thickness=[100, 200, 300, 300, 300, 300]; InitialValues=[27.775, 9.375, 0.386111, 0.386111, 0.386111, 0.386111]; InitialValuesUnits=ppm; WaterTableConcentration=0; D0=0; DepthConstant=0; MaxDepthSoluteAccessible=0; RunoffEffectivenessAtMovingSolute=0; MaxEffectiveRunoff=0
              Solute NH4: Thickness=[100, 200, 300, 300, 300, 300]; InitialValuesUnits=ppm; WaterTableConcentration=0; D0=0; DepthConstant=0; MaxDepthSoluteAccessible=0; RunoffEffectivenessAtMovingSolute=0; MaxEffectiveRunoff=0
                InitialValues=[0.1, 0.0416667, 0.0277778, 0.0277778, 0.0277778, 0.0277778]
              Solute Urea: same as Validation.New Zealand.ABlock.RussetBurbank.Field.Soil.Urea
            Fertiliser
            Irrigation
            SurfaceOrganicMatter surface organic matter: InitialResidueName=wheat; InitialResidueType=wheat; InitialResidueMass=2000; InitialStandingFraction=0; InitialCPR=0; InitialCNR=80
            MicroClimate: a_interception=0; b_interception=1; c_interception=0; d_interception=0; SoilHeatFluxFraction=0.4; MinimumHeightDiffForNewLayer=0; NightInterceptionFraction=0.5; ReferenceHeight=2
            Plant Potato
            Folder Manager folder
              Operations FertiliserApplications: same as Validation.Australia.Glenroy_0607.Factors.Nitrogen.125
              Operations IrrigationApplications
                2006-10-18  [Irrigation].Apply(2.2)
                2006-10-19  [Irrigation].Apply(1.6)
                2006-10-20  [Irrigation].Apply(0.2)
                2006-10-22  [Irrigation].Apply(0.2)
                2006-10-25  [Irrigation].Apply(2.2)
                2006-10-26  [Irrigation].Apply(0.2)
                2006-10-27  [Irrigation].Apply(0.6)
                2006-10-28  [Irrigation].Apply(1.2)
                2006-10-29  [Irrigation].Apply(2.4)
                2006-11-01  [Irrigation].Apply(0.2)
                2006-11-02  [Irrigation].Apply(3.4)
                2006-11-04  [Irrigation].Apply(8.0)
                2006-11-06  [Irrigation].Apply(0.2)
                2006-11-07  [Irrigation].Apply(1.4)
                2006-11-08  [Irrigation].Apply(2.4)
                2006-11-09  [Irrigation].Apply(4.0)
                2006-11-10  [Irrigation].Apply(4.0)
                2006-11-11  [Irrigation].Apply(3.2)
                2006-11-12  [Irrigation].Apply(0.2)
                2006-11-13  [Irrigation].Apply(3.2)
                2006-11-14  [Irrigation].Apply(10.6)
                2006-11-15  [Irrigation].Apply(2.8)
                2006-11-16  [Irrigation].Apply(3.0)
                2006-11-17  [Irrigation].Apply(7.6)
                2006-11-19  [Irrigation].Apply(0.2)
                2006-11-20  [Irrigation].Apply(0.2)
                2006-11-21  [Irrigation].Apply(9.4)
                2006-11-22  [Irrigation].Apply(7.0)
                2006-11-23  [Irrigation].Apply(5.0)
                2006-11-24  [Irrigation].Apply(0.2)
                2006-11-25  [Irrigation].Apply(0.2)
                2006-11-26  [Irrigation].Apply(5.6)
                2006-11-28  [Irrigation].Apply(5.0)
                2006-11-29  [Irrigation].Apply(10.0)
                2006-11-30  [Irrigation].Apply(6.8)
                2006-12-01  [Irrigation].Apply(5.6)
                2006-12-02  [Irrigation].Apply(0.2)
                2006-12-03  [Irrigation].Apply(5.4)
                2006-12-04  [Irrigation].Apply(0.2)
                2006-12-05  [Irrigation].Apply(0.2)
                2006-12-06  [Irrigation].Apply(0.2)
                2006-12-07  [Irrigation].Apply(5.8)
                2006-12-08  [Irrigation].Apply(0.2)
                2006-12-09  [Irrigation].Apply(1.8)
                2006-12-10  [Irrigation].Apply(11.0)
                2006-12-11  [Irrigation].Apply(0.2)
                2006-12-12  [Irrigation].Apply(5.4)
                2006-12-14  [Irrigation].Apply(11.8)
                2006-12-15  [Irrigation].Apply(1.0)
                2006-12-16  [Irrigation].Apply(7.4)
                2006-12-17  [Irrigation].Apply(0.2)
                2006-12-18  [Irrigation].Apply(0.2)
                2006-12-19  [Irrigation].Apply(5.8)
                2006-12-20  [Irrigation].Apply(6.0)
                2006-12-21  [Irrigation].Apply(5.0)
                2006-12-22  [Irrigation].Apply(2.0)
                2006-12-23  [Irrigation].Apply(9.0)
                2006-12-24  [Irrigation].Apply(6.2)
                2006-12-25  [Irrigation].Apply(12.4)
                2006-12-27  [Irrigation].Apply(5.8)
                2006-12-29  [Irrigation].Apply(0.2)
                2006-12-31  [Irrigation].Apply(0.6)
                2007-01-01  [Irrigation].Apply(10.2)
                2007-01-02  [Irrigation].Apply(0.6)
                2007-01-03  [Irrigation].Apply(5.4)
                2007-01-04  [Irrigation].Apply(0.2)
                2007-01-05  [Irrigation].Apply(0.4)
                2007-01-06  [Irrigation].Apply(1.6)
                2007-01-07  [Irrigation].Apply(15.0)
                2007-01-09  [Irrigation].Apply(6.2)
                2007-01-10  [Irrigation].Apply(0.4)
                2007-01-11  [Irrigation].Apply(5.4)
                2007-01-12  [Irrigation].Apply(0.2)
                2007-01-13  [Irrigation].Apply(4.2)
                2007-01-14  [Irrigation].Apply(5.8)
                2007-01-15  [Irrigation].Apply(5.4)
                2007-01-16  [Irrigation].Apply(5.2)
                2007-01-17  [Irrigation].Apply(5.6)
                2007-01-19  [Irrigation].Apply(13.8)
                2007-01-20  [Irrigation].Apply(99.4)
                2007-01-21  [Irrigation].Apply(10.2)
                2007-01-22  [Irrigation].Apply(0.2)
                2007-01-25  [Irrigation].Apply(0.2)
                2007-01-26  [Irrigation].Apply(6.4)
                2007-01-27  [Irrigation].Apply(9.2)
                2007-01-28  [Irrigation].Apply(7.0)
                2007-01-29  [Irrigation].Apply(4.6)
                2007-01-30  [Irrigation].Apply(1.4)
                2007-01-31  [Irrigation].Apply(9.2)
                2007-02-01  [Irrigation].Apply(17.2)
                2007-02-02  [Irrigation].Apply(8.2)
                2007-02-03  [Irrigation].Apply(8.8)
                2007-02-04  [Irrigation].Apply(9.0)
                2007-02-05  [Irrigation].Apply(9.0)
                2007-02-07  [Irrigation].Apply(0.4)
                2007-02-08  [Irrigation].Apply(0.2)
                2007-02-11  [Irrigation].Apply(6.6)
                2007-02-12  [Irrigation].Apply(7.8)
                2007-02-14  [Irrigation].Apply(18.0)
                2007-02-15  [Irrigation].Apply(8.2)
                2007-02-16  [Irrigation].Apply(8.2)
                2007-02-18  [Irrigation].Apply(1.6)
                2007-02-19  [Irrigation].Apply(14.6)
                2007-02-20  [Irrigation].Apply(0.2)
                2007-02-21  [Irrigation].Apply(15.2)
                2007-02-24  [Irrigation].Apply(0.4)
                2007-02-25  [Irrigation].Apply(0.4)
                2007-02-28  [Irrigation].Apply(8.0)
                2007-03-01  [Irrigation].Apply(7.4)
                2007-03-02  [Irrigation].Apply(7.2)
                2007-03-03  [Irrigation].Apply(0.2)
                2007-03-06  [Irrigation].Apply(7.2)
                2007-03-16  [Irrigation].Apply(2.8)
                2007-03-17  [Irrigation].Apply(0.2)
              Manager PlantandHarvest
                PlantingDate = 2006-10-10
                CultivarName = RussetBurbank
                RowSpace = 370
                RowWidth = 860
                PlantingDepth = 120
                StemNumberPerSeedTuber = 2
                SetFinalLeafNumber = 0
                HarvestDate = 2007-03-22
                script: same as in Validation.New Zealand.FUE.FUE_base.paddock.Manager folder.PlantandHarvest
              Manager RemoveRainfall
                StartDate = 2006-10-18
                EndDate = 2007-03-17
                script: same as in Validation.Australia.Penola_0607.Penola_0506Base.paddock.Manager folder.RemoveRainfall
            Report: EventNames=[Clock].DoReport
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